Simulations: Version=5
  Memo TitlePage
    # APSIM Barley Model

    _Khaembah EN, Zyskowski, RF and Brown, HE._

    The APSIM Barley Model has been developed using the Plant Modelling Framework (PMF) of Brown et al. (2014). This framework provides a library of plant organ and process submodels that can be coupled, at runtime, to construct a model in much the same way that models can be coupled to construct a simulation. This means that dynamic composition of lower level process and organ classes (e.g. photosynthesis, leaf) into larger constructions (e.g. maize, wheat, sorghum) can be achieved by the model developer without additional coding.

    The model consists of:

    * a phenology model to simulate development between growth phases
    * a structure model to simulate plant morphology
    * a collection of organs to simulate the various plant parts
    * an arbitrator to allocate resources (N, biomass) to the various plant organs
  Memo References
    Brown HE, Huth NI, Holzworth DP et al. 2014. "Plant Modelling Framework: Software for building and running crop models on the APSIM platform." Environmental Modelling & Software 62: 385-398.

    Jamieson PD, Munro CA 1999. A simple method for the phenological evaluation of new cereal cultivars. Proceeding of the 29th Agronomy Society of New Zealand 29: 63-68.

    Jamieson PD, Martin RJ, Francis GS 1995. Drought influences on grain yield of barley, wheat, and maize, New Zealand Journal of Crop and Horticultural Science 23: 55-66

    Jamieson PD, Francis GS, Wilson DR, Martin RJ 1994. Effects of water deficits on evapotranspiration from barley, Agricultural and Forest Meteorology 76 (1995) 41-58

    Jamieson PD, Martin RJ, Francis GS, Wilson DR 1995. Drought effects on biomass production and radiation use efficiency in barley, Field Crops Research 43: 77-86
  Replacements
    Report DailyReport: EventNames=[Clock].DoReport
      VariableNames:
        [Clock].Today
        [Weather].MeanT
        [Soil].SoilWater.SW
        [Soil].SoilWater.SWmm
        sum([Soil].SoilWater.SWmm) as ProfileWater
        [Barley].AboveGround.N
        [Barley].AboveGround.Wt
        [Barley].AboveGroundLive.N
        [Barley].AboveGroundLive.N*10 as AboveGroundN
        [Barley].AboveGroundLive.Wt
        [Barley].AboveGroundDead.N
        [Barley].AboveGroundDead.Wt
        [Barley].Arbitrator.DMDemand
        [Barley].Arbitrator.DM.TotalFixationSupply
        [Barley].Ear.N
        [Barley].Ear.Nconc
        [Barley].Ear.Wt
        [Barley].Grain.N
        [Barley].Grain.NConc
        [Barley].Grain.Number
        [Barley].Grain.Size
        [Barley].Grain.Wt
        [Barley].Grain.Live.Wt
        [Barley].Leaf.AppearedCohortNo
        [Barley].Leaf.CoverDead
        [Barley].Leaf.CoverGreen
        [Barley].Leaf.CoverTotal
        [Barley].Leaf.Dead.N
        [Barley].Leaf.Dead.NConc
        [Barley].Leaf.Dead.Wt
        [Barley].Leaf.DeadCohortNo
        [Barley].Leaf.SenescingCohortNo
        [Barley].Leaf.ExpandedCohortNo
        [Barley].Leaf.Fn
        [Barley].Leaf.Fw
        [Barley].Leaf.Height
        [Barley].Leaf.InitialisedCohortNo
        [Barley].Leaf.LAI
        [Barley].Leaf.Live.N
        [Barley].Leaf.Live.NConc
        [Barley].Leaf.Live.Wt
        [Barley].Leaf.SpecificArea
        [Barley].Leaf.Transpiration
        [Barley].Phenology.CurrentPhaseName
        [Barley].Phenology.CurrentStageName
        [Barley].Phenology.DailyVernalisation.Value()
        [Barley].Phenology.MeanTemp.Value()
        [Barley].Phenology.Photoperiod.Value()
        [Barley].Phenology.Stage
        [Barley].Phenology.ThermalTime.Value()
        [Barley].Phenology.ThermalTime.Value ()
        [Barley].Phenology.Vrn1.Value()
        [Barley].Phenology.Vrn2.Value()
        [Barley].Phenology.Vrn4.Value()
        [Barley].Phenology.Zadok.Stage
        [Barley].Root.Depth
        [Barley].Root.N
        [Barley].Root.Wt
        [Barley].Root.Nconc
        [Barley].Root.WaterUptake
        [Barley].Spike.N
        [Barley].Spike.NConc
        [Barley].Spike.Wt
        [Barley].Spike.Live.NonStructuralWt
        [Barley].Stem.N
        [Barley].Stem.NConc
        [Barley].Stem.Wt
        [Barley].Stem.PercentWSC
        [Barley].Stem.Live.NonStructuralWt
        [Barley].StemPlusSpike.Wt
        [Barley].StemPlusSpike.N
        [Barley].SowingData.Cultivar
        [Barley].Structure.HaunStage.ValueTerminalSpikelet.Value()
        [Barley].Structure.HaunStage.Value()
        [Barley].Structure.Height
        [Barley].Structure.LeafTipsAppeared
        [Barley].Structure.MainStemFinalNodeNumber.Value()
        [Barley].Structure.MainStemFinalNodeNumber.ValueToHold.PhotoPLeaves.Value()
        [Barley].Structure.MainStemPopn
        [Barley].Structure.MeanTillerGrowthRate.Value()
        [Barley].Structure.TotalStemPopn
        [Barley].Total.N
        [Barley].Total.Wt
        [SurfaceOrganicMatter].Wt
        ([Barley].Leaf.Transpiration + [Soil].SoilWater.Es + [MicroClimate].interception) as ET
        sum([Soil].SoilNitrogen.NO3) as TotalSoilN
        [Barley].Phenology.FlagLeafDAS
        [Barley].Phenology.FloweringDAS
        [Barley].Phenology.MaturityDAS
        [Barley].Phenology.PhotoPeriod
        [Barley].Phenology.PhotoPeriodDeltaFunction
        [Barley].Phenology.Stage
        [Barley].Phenology.SoilTemperatureFunction.Value()
    Report EndTrialReport: EventNames=[Clock].EndOfSimulation
      VariableNames:
        [Barley].Structure.LeafTipsAppeared
        [Barley].Structure.MainStemFinalNodeNumber
        [Barley].Phenology.FlagLeafDAS
        [Barley].Phenology.FloweringDAS
        [Barley].Phenology.MaturityDAS
        [Script].CalcVals.SowMonth
    Plant Barley: CropType=Wheat
      Memo TitlePage
        # An APSIM Oat Model

        _Zyskowski,R.F, Brown, H.E. and Texiera,E._

        The APSIM Oat model has been developed using the Plant Modelling Framework (PMF) of [brown_plant_2014], and is heavily based on  many pricipals implemented within. This framework provides a library of plant organ and process submodels that can be coupled, at runtime, to construct a model in much the same way that models can be coupled to construct a simulation. This means that dynamic composition of lower level process and organ classes (e.g. photosynthesis, leaf) into larger constructions (e.g. maize, wheat, sorghum) can be achieved by the model developer without additional coding.

        The model consists of:

        * a phenology model to simulate development between growth phases
        * a structure model to simulate plant morphology
        * a collection of organs to simulate the various plant parts
        * an arbitrator to allocate resources (N, biomass) to the various plant organs
      Memo Rerferences
        Brown, H. E., et al. (2014). "Plant Modelling Framework: Software for building and running crop models on the APSIM platform." Environmental Modelling & Software 62: 385-398.

        Jamieson, P. D. and C. A. Munro (1999). A simple method for the phenological evaluation of new cereal cultivars. Agronomy Society of New Zealand - Proceedings, Twenty-Ninth Annual Conference, 1999. J. G. Hampton and K. M. Pollock. 29: 63-68.

        Martin, R. J., et al. (1998). The effect of daylength on final leaf number in drummond oats. Australian Agronomy Conference. Wagga Wagga.

        Sonego, M., et al. (1998). Cordination of apex and leaf deceolpment in oats. Austrlian Agronomy conference. Wagg Wagga.

        Martin, R. J. and I. N. C. Agron Soc New Zealand (1996). The effect of sowing date on growth and yield of two cultivars of oats.
        	Oats cvs. Cashel and Drummond were sown at Lincoln on 16 September, 2 November, and 21 December 1994; and on 7 February, 3 April, and 16 May 1995 in order to compare the effect of sowing date on their growth and yield. Biomass and leaf area were measured at one to four-week intervals from the end of tillering. Crops grew for periods ranging from just over 100 days to nearly 300 days. The crop sown in February died before maturity, and the one sown in April was affected by frost. Biomass production was much higher for the April sowing (over 20 t/ha) than the 7.5-15 t/ha for the other sowings, and was higher for Drummond than for Cashel at all sowing dates. Leaf area indices did not exceed 4.5 except for the February and April sowings of Drummond. There was a strong linear relationship between cumulative biomass production and intercepted radiation for all sowing dates, with the same rate of increase in biomass with radiation increase for both cultivars. Grain yields estimated from quadrat samples were higher than header yields for all sowings, but especially for the April sowing in which grain weights and harvest indices were lower than for the other sowings. Fifty-seven percent of grain yield came from post anthesis photosynthesis and 43% from remobilization from other plant parts. Oat yield is dependent on the amount of radiation intercepted by the crop and harvest index. Changes in conversion of radiation to biomass were not significantly affected by the range of conditions experienced by the crops in this study.

        Martin, R. J., et al. Effects of Timing and Intensity of Drought on the Yield of Oats (Avena sativa L.). Australian Agronomy
        Hobart.
        	The response of oats (Avena sativa L.) to timing and intensity of drought was determined in a mobile
        rainshelter, which excluded rainfall during crop growth. Ten irrigation treatments subjected the crops to
        drought of varying duration at different stages during plant growth; the crops were otherwise fully
        irrigated. Oat grain yield generally increased linearly with cumulative water use, and decreased linearly as
        the maximum potential soil moisture deficit experienced during crop growth increased, regardless of the
        timing of drought. The exception to this was the no drought (fully irrigated) treatment, where lodging
        reduced panicle number and grain weight compared to early drought treatments. Drought affected yield
        mainly by reducing panicle and grain number, effects on grain weight were small. . Relieving early drought
        through late irrigation led to more late tillers, more panicles, heavier grains, and later maturity. Full and
        late drought increased screenings.

        Sonego, M., et al. (1999). Development and growth of oat leaves at different temperatures and nitrogen levels. Agronomy Society of New Zealand - Proceedings, Twenty-Ninth Annual Conference, 1999. J. G. Hampton and K. M. Pollock. 29: 75-81.
        	This paper reports the development of a model to predict leaf appearance rate in oats (Avena sativa L.) based on the results of two field experiments and including a comparison of air and near-apex soil temperatures as predictors of leaf appearance. Oat genotype C&F 435 was sown on eight dates from April 1996 to November 1997. Nitrogen treatments (0 and 100 kg N/ha) were applied to the May and November 1997 crops. Observation of the number of visible leaf tips and leaf lamina length were taken at 2-7 day intervals. Near apex soil temperature and air temperature were recorded by data loggers. The number of visible tips was linearly related to temperature expressed as accumulated thermal time (base temperature of 0 degreesC). The rate of leaf appearance in thermal time, using either air or soil temperature, was nearly constant within a sowing date, but faster for spring sown than for autumn sown crops. Differences in this rate were less among sowing dates when near apex soil temperature was used to calculate thermal time than when screen temperatures were used. This indicated that the use of temperature near the shoot apex may improve phenological predictions from crop models. Nitrogen application had no effect on the rate of leaf appearance regardless of sowing date, but caused an average increase of 19% (P < 0.05) in the final leaf lamina length for the last five leaves.

        Sonego, M., et al. (1997). Phenological development of oat crops in response to sowing dates. Proceedings of the Twenty-Seventh Annual Conference of the Agronomy Society of New Zealand. 27: 115-118.
        	Observations of apical development in oats were made from sowings made on six occasions through an annual cycle. These were analysed to determine the effects of temperature and daylength on the duration of the period from sowing until anthesis. A simple, two-phase thermal time accumulation model, modified by daylength in the post emergence phase, accounted for most of the variation (n = 6, CV = 6%).

        Zhao, G. Q., et al. (2009). "Response of Nitrogen Uptake and Partitioning to Critical Nitrogen Supply in Oat Cultivars." Crop Science 49(3): 1040-1048.
        	Nitrogen uptake and partitioning in oat (Avena sativa L.) are not well documented. A greenhouse study was conducted to determine the critical timing of N supply on the growth, N uptake, and partitioning. Plants grown in plastic pots were subjected to five N fertilization regimes: (i) control, N supply from seedling to physiological maturity (PM); (ii) N supply from seedling to flag leaf; (iii) N supply from flag leaf to PM; (iv) N supply from seedling to heading; and (v) N supply from heading to PM. Leaf chlorophyll content, plant dry matter (DM), and N uptake and accumulation were measured. Total plant DM was 21% greater for naked 'VAO-2' than for covered 'Prescott', while both genotypes produced similar grain yields. Varietal differences in total plant N were significant (P < 0.05) with average of 18% higher N content for VAO-2, but most of its accumulated N was in the vegetative components. For both varieties, N supply was more critical before heading than thereafter. Compared with the control, restriction of N supply from seedling to flag leaf stage significantly reduced spikelet number (28%) and grain yield (26%). Withholding N supply until heading reduced yield by up to 65% and N uptake by 75%. No yield reduction occurred when N was withheld from flag leaf or heading to PM. Although naked VAO-2 accumulated more N than Prescott under the same conditions, partitioning of N to the grain in VAO-2 was less efficient.
      OrganArbitrator Arbitrator
        RelativeAllocation NArbitrator
        RelativeAllocation DMArbitrator
      Phenology: DaysAfterSowing=0
        Memo
          The oats varieties used in this model have shown no sign of winter vernilisation, and the models used here reflect that.

          The data  shows a slowdown in phenological developement in winter conditions, which could be due to temperature and photo period.

          Here we go with published data of Martin et al which usesa Photo Thermal model.
        MultiplyFunction ThermalTime
          Memo
            Photothermal time based on Sonego 1997

            TTbase = T-0

            FP = Max (0, (P -7)/9)

            TT = TTBase*FP

            Note.  Effectively Mid winter thermal time approaces 0, whereas midsummer approaches TTbase thus mabely accumlating a low temperature eefect.
          AirTemperatureFunction ThermalTimeB0
            XYPairs: X=[0, 15, 30, 40]; Y=[0, 15, 30, 0]
            Memo
              Thermal time determines the rate of developmental progress through many of the crops phases and is used by organs to determing potential growth rates.
          MaximumFunction FP
            Constant Zero: FixedValue=0
            DivideFunction
              SubtractFunction PP7
                VariableReference Photoperiod: VariableName=[Phenology].Photoperiod.Value()
                Constant Seven: FixedValue=7
              Constant Nine: FixedValue=9
        SoilTemperatureFunction: maxt_soil_surface=20; mint_soil_surface=10
          XYPairs: X=[0, 30, 40]; Y=[0, 30, 0]
        PhotoperiodFunction Photoperiod: Twilight=-6; DayLength=0
        PhotoperiodDeltaFunction: Twilight=-6
        PhaseLookup PercievedPhotoPeriod
          PhaseLookupValue ApexBelowGround: Start=Germination; End=Emergence
            Constant Photoperiod: FixedValue=0; Units=h
          PhaseLookupValue ApexAboveGround: Start=Emergence; End=HarvestRipe
            MultiplyFunction
              VariableReference Photoperiod: VariableName=[Phenology].Photoperiod.Value()
              LinearInterpolationFunction: XProperty=[Phenology].PhotoperiodDeltaFunction.Value()
                XYPairs: X=[-24, 0, 0.1, 24]; Y=[0, 0, 1, 1]
        Constant VrnSensitivity: FixedValue=0; Units=Leaves
          Memo
            The difference between Inherent earlyness leaf number and the number of leaves produced when the plant is unvernalisaed and grown in long photoperiod

            Not used in oats
        Constant MinimumLeafNumber: FixedValue=6; Units=Leaves
          Memo
            Number of leaves the plant will produce when fully vernalised early and grown in long photoperiod
        Constant VernLag: FixedValue=1; Units=Unitless
          Memo
            The amount of vernalising temperature required before vernalisation response will be evident.  Value of relative to the amount offl vernalisation temperature required from the end of the lag until vernalisation saturation.  A value of 0 means there is no lag, a value of 1 means the lag is the same (in vernal time) as the vernalisation requirement and a value of 2 means the lag is twice as long as the vernalisation response phase

            Not used in oats
        Constant PpSensitivity: FixedValue=6; Units=Leaves
          Memo
            The reduction in leaf number going from 8 to 16 h Pp

            Not used in current oat model
        Constant EarlyReproductivePpSensitivity: FixedValue=0
          Memo
            The phyllochrons duration for the plant to go from flag leaf ligual appearance at 16 h Pp compared to the phyllochron duration for the same phase at 8 h Pp.

            Not used in curreent oat model.
        Constant EarlyReproductiveLongDayBase: FixedValue=2.5
          Memo
            The phyllochrons duration for the plant to go from flag leaf ligual appearance at 16 h Pp.

            Not used in current oat model.
        GerminatingPhase Germinating: Start=Sowing; End=Germination
        EmergingPhase Emerging: Start=Germination; End=Emergence; ShootLag=40; ShootRate=3
          VariableReference ThermalTime: VariableName=[Phenology].ThermalTime.Value()
        GenericPhase Vegetative: Start=Emergence; End=VS
          Memo
            This is the first 4-6 leaf growth of the emerged oat plant, In the current model is decides the final leaf number based on Martin et al 1998.

            At the end of this grwth stage a trigger event occurs which calculates the FLN.

            Currently the leaf number is 4, due to March sowings in which th sixth leaf dosn'y emerge until after june.
          VariableReference ThermalTime: VariableName=[Phenology].ThermalTime.Value()
          MultiplyFunction Target
            Constant Six: FixedValue=4
            VariableReference Phyll: VariableName=[Structure].BasePhyllochron.Value()
        GenericPhase EarlyReproductive: Start=VS; End=TerminalSpikelet
          Memo
            Growth occurs until terminal spikelet occurs.

            In this case TS is driven fron the FLN

            Duration is (TS-6)*Phyllocgron
          VariableReference ThermalTime: VariableName=[Phenology].ThermalTime.Value()
          MultiplyFunction Target
            SubtractFunction
              VariableReference TST: VariableName=[Structure].TSLN.Value()
              Constant Six: FixedValue=6
            VariableReference Phyllochron: VariableName=[Structure].BasePhyllochron.Value()
        GenericPhase StemElongation: Start=TerminalSpikelet; End=FlagLeaf
          Memo
            The Time for the FlagLeaf to appear post TS

            1.5 * Phyylchron
          VariableReference ThermalTime: VariableName=[Phenology].ThermalTime.Value()
          MultiplyFunction Target
            VariableReference Phyllochron: VariableName=[Structure].BasePhyllochron.Value()
            Constant exp: FixedValue=1.5
        GenericPhase EarDevelopment: Start=FlagLeaf; End=Flowering
          VariableReference ThermalTime: VariableName=[Phenology].ThermalTime.Value()
          Memo
            The Time from flagLeaf  appearanace  to flowering

            Was constant at 100, however have cahnge it 1 Phyllchron.
          MultiplyFunction Target
            VariableReference Phyllochron: VariableName=[Structure].BasePhyllochron.Value()
            Constant exp: FixedValue=1
        GenericPhase GrainDevelopment: Start=Flowering; End=StartGrainFill
          Constant Target: FixedValue=240
          VariableReference ThermalTime: VariableName=[Phenology].ThermalTime.Value()
        GenericPhase GrainFilling: Start=StartGrainFill; End=EndGrainFill
          Constant Target: FixedValue=900
          VariableReference ThermalTime: VariableName=[Phenology].ThermalTime.Value()
        GenericPhase Maturing: Start=EndGrainFill; End=Maturity
          Constant Target: FixedValue=35
          VariableReference ThermalTime: VariableName=[Phenology].ThermalTime.Value()
        GenericPhase Ripening: Start=Maturity; End=HarvestRipe
          Constant Target: FixedValue=300
          VariableReference ThermalTime: VariableName=[Phenology].ThermalTime.Value()
        EndPhase ReadyForHarvesting: Start=HarvestRipe; End=Unused
          VariableReference ThermalTime: VariableName=[Phenology].ThermalTime.Value()
        ZadokPMF Zadok
        OnEventFunction FlagLeafDAS: SetEvent=FlagLeaf; ReSetEvent=never
          Memo
            A function is used to provide flowering date as days after sowing(DAS).
          Constant PreEventValue: FixedValue=0
          VariableReference PostEventValue: VariableName=[Phenology].DaysAfterSowing
        OnEventFunction FloweringDAS: SetEvent=Flowering; ReSetEvent=never
          Memo
            A function is used to provide flowering date as days after sowing(DAS).
          Constant PreEventValue: FixedValue=0
          VariableReference PostEventValue: VariableName=[Phenology].DaysAfterSowing
        OnEventFunction MaturityDAS: SetEvent=Maturity; ReSetEvent=never
          Memo
            A function is used to provide maturity date as days after sowing(DAS).
          Constant PreEventValue: FixedValue=0
          VariableReference PostEventValue: VariableName=[Phenology].DaysAfterSowing
      Structure: Initialised=false; Germinated=false; Emerged=false; CohortToInitialise=0; TipToAppear=0; ApexNum=0
        VariableReference ThermalTime: VariableName=[Phenology].ThermalTime.Value()
        MultiplyFunction MainStemNodeAppearanceRate
          Memo Rational
            Based on [Jamieson_SIRIUS_1998] where leaf appearace could be described by a base phyllochron determined between leaves 2 and 7 and a phyllochron that was 70% of base phyllochron for leaves < 2 and 130% of base phyllochron for leaves > 7
          LinearInterpolationFunction LeafStageFactor: XProperty=[Leaf].AppearedCohortNo
            XYPairs: X=[0, 2, 4, 6, 8, 14, 18]; Y=[0.75, 0.9, 1, 1.1, 1.2, 1.4, 1.5]
          LinearInterpolationFunction PhotoPeriodEffect: XProperty=[Phenology].Photoperiod.Value()
            XYPairs: X=[8, 12, 14]; Y=[1, 1, 1]
          VariableReference Phyllochron: VariableName=[Structure].BasePhyllochron.Value()
        MultiplyFunction BranchingRate
          PhaseLookup PotentialBranchingRate
            PhaseLookupValue Vegetative: Start=Emergence; End=TerminalSpikelet
              LinearInterpolationFunction PotentialBranchingRate: XProperty=[Structure].LeafTipsAppeared
                XYPairs: X=[1, 2, 3, 4, 5, 6, 7, 8]; Y=[0, 0, 1, 2, 4, 7, 12, 20]
            PhaseLookupValue Reproductive: Start=TerminalSpikelet; End=HarvestRipe
              Constant Zero: FixedValue=0
          MinimumFunction StressFactors
            LinearInterpolationFunction WSC: XProperty=[Stem].PercentWSC.Value()
              XYPairs: X=[0.2, 0.27]; Y=[1, 1]
            LinearInterpolationFunction Nitrogen: XProperty=[Arbitrator].FN
              XYPairs: X=[0.5, 2, 3]; Y=[0, 1, 1]
            LinearInterpolationFunction Cover: XProperty=[Leaf].CoverTotal
              XYPairs: X=[0, 0.1, 0.25]; Y=[1, 1, 0]
            LinearInterpolationFunction Growth: XProperty=[Structure].MeanTillerGrowthRate.Value()
              XYPairs: X=[0, 0.001, 0.005]; Y=[1, 1, 1]
            LinearInterpolationFunction PhotoPeriodEffect: XProperty=[Phenology].Photoperiod.Value()
              XYPairs: X=[11.99, 12, 14]; Y=[1, 1, 1]
            LinearInterpolationFunction TemperatureEffect: XProperty=[Weather].MeanT
              XYPairs: X=[4, 10, 14]; Y=[1, 1, 1]
        PhaseLookup BranchMortality
          PhaseLookupValue MortalityPhase: Start=FlagLeaf; End=Flowering
            MultiplyFunction Mortality
              LinearInterpolationFunction MortalityPerDegDay: XProperty=[Structure].MeanTillerGrowthRate.Value()
                XYPairs: X=[0, 0.005, 0.005]; Y=[0.002, 0, 0]
              VariableReference ThermalTime: VariableName=[Phenology].ThermalTime.Value()
        HeightFunction HeightModel
          LinearInterpolationFunction PotentialHeight: XProperty=[Phenology].Stage
            XYPairs: X=[3, 4, 5, 6, 7]; Y=[10, 200, 1000, 1100, 1200]
          LinearInterpolationFunction WaterStress: XProperty=[Barley].WaterSupplyDemandRatio
            XYPairs: X=[0.3, 1]; Y=[0, 1]
        MovingAverageFunction MeanTillerGrowthRate: NumberOfDays=5; InitialValue=0
          DivideFunction TillerGrowthRate
            VariableReference DailyGrowth: VariableName=[Arbitrator].DM.TotalFixationSupply
            VariableReference ThermalTime: VariableName=[Phenology].ThermalTime.Value()
            VariableReference StemPopulation: VariableName=[Structure].TotalStemPopn
        MovingAverageFunction MeanPhyllochron: NumberOfDays=300; InitialValue=80
          VariableReference Phyllochron: VariableName=[Structure].MainStemNodeAppearanceRate.Value()
        DivideFunction HaunStageTerminalSpikelet
          SubtractFunction FLNlessIntercept
            VariableReference FinalLeafNumber: VariableName=[Structure].MainStemFinalNodeNumber.Value()
            Constant Intercept: FixedValue=2.85
          Constant Slope: FixedValue=1.1
        AddFunction HaunStage
          VariableReference AppearedLeaves: VariableName=[Leaf].ExpandedCohortNo
          VariableReference ProportionOfExpandingLeaf: VariableName=[Leaf].NextExpandingLeafProportion
        PhaseLookup ThermalTimeP
          PhaseLookupValue SoilTemperature: Start=Sowing; End=TerminalSpikelet
            SoilTemperatureFunction: maxt_soil_surface=20; mint_soil_surface=10
              XYPairs: X=[0, 30, 40]; Y=[0, 30, 0]
          PhaseLookupValue AirTemperature: Start=TerminalSpikelet; End=HarvestRipe
            AirTemperatureFunction
              XYPairs: X=[0, 30, 40]; Y=[0, 30, 0]
        MinimumFunction MainStemFinalNodeNumber
          Memo
            An event driven method of calculating the final leaf number, Base on Martin et al 1998

            Event  occurs when vegtative stage switches to Reproductive, either 4 or 6 leaf appearance.

            If event occurs when PhotoPeriod is decreasing, then final leaf number is the MLN -2.

            Otherwise

            FLN = MLN - lc(PPS)

            For Drummond these values  MLN = 17 and Lc = 0.56

            THe model allows these to be cultivar deined.
          Constant MaxLN: FixedValue=15
          MinimumFunction FLN
            OnEventFunction AtLeafSix: SetEvent=VS; ReSetEvent=never
              VariableReference PreEventValue: VariableName=[Structure].MaxLN.Value()
              MaximumFunction PostEventValue
                Constant Zero: FixedValue=0
                LessThanFunction
                  VariableReference TestVariable: VariableName=[Phenology].PhotoperiodDeltaFunction.Value()
                  Constant Zero: FixedValue=0
                  SubtractFunction IfTrue
                    VariableReference MLN: VariableName=[Structure].MaxLN.Value()
                    Constant Two: FixedValue=2
                  SubtractFunction IfFalse
                    VariableReference MLN: VariableName=[Structure].MaxLN.Value()
                    MultiplyFunction Ic
                      VariableReference PP: VariableName=[Phenology].Photoperiod.Value()
                      VariableReference PPS: VariableName=[Structure].PPSlope.Value()
            VariableReference MLN: VariableName=[Structure].MaxLN.Value()
        MinimumFunction TSLN
          Memo
            Terminal spikelet leaf number

            This value is highly related to final leaf number, The FLN is probably dependent on TSLN rather than as cuurently defined.

            Calculation baed on Sonego 2000

            TSLN = FLN*0.995 - 1.95
          VariableReference MLN: VariableName=[Structure].MaxLN.Value()
          SubtractFunction
            MultiplyFunction
              VariableReference FLN: VariableName=[Structure].MainStemFinalNodeNumber.Value()
              Constant PS: FixedValue=0.995
            Constant LVS: FixedValue=1.95
        Constant MaxLN: FixedValue=17
        Constant BasePhyllochron: FixedValue=90; Units=oC.d
        Constant PPSlope: FixedValue=0.5
      ReproductiveOrgan Grain: GrowthRespiration=0; MaintenanceRespiration=0; RipeStage=Ripe
        Memo
          Grain model current a pure supply model, that is currently uses  a partition model to determine amount

          The grain Number model model left here does nothing, it is there so we can switch to it later if required.

          N conc values are from Zhao et al 2009
        Biomass Live
        Biomass Dead
        Constant MaxNConcDailyGrowth: FixedValue=0.03
        Constant WaterContent: FixedValue=0.12
        Constant MinimumNConc: FixedValue=0.032; Units=0.045
        Constant MaximumNConc: FixedValue=0.03
        Constant MaximumPotentialGrainSize: FixedValue=0.043; Units=g
        PhaseBasedSwitch NitrogenDemandSwitch: Start=Germination; End=Maturity
        AccumulateFunction AccumThermalTime: StartStageName=Flowering; EndStageName=Maturity
          VariableReference DailyThermalTimeValue: VariableName=[Phenology].ThermalTime.Value()
        AirTemperatureFunction FillingRate
          XYPairs: X=[0, 26, 30, 35]; Y=[0, 0.0015, 0.0015, 0.0015]
        PartitionFractionDemandFunction DMDemandFunction
          Memo
            Currently using Partitioning model based on SIRIUS rather tha grin filling model.
          PhaseLookup PartitionFraction
            PhaseLookupValue InitialPhase: Start=Flowering; End=StartGrainFill
              Constant: FixedValue=0.01
            PhaseLookupValue LinearPhase: Start=StartGrainFill; End=EndGrainFill
              MultiplyFunction
                Constant: FixedValue=0.6
                LinearInterpolationFunction FW: XProperty=[Leaf].Fw
                  XYPairs: X=[0, 0.5, 1]; Y=[1.5, 1, 1]
            PhaseLookupValue Ripening: Start=EndGrainFill; End=HarvestRipe
              Constant: FixedValue=0
        ExpressionFunction Protein
          Expression=([Grain].Live.N + [Grain].Dead.N)/([Grain].Live.Wt + [Grain].Dead.Wt) * 100 * 5.71
        DivideFunction GrowthRateGrainDevelopment
          AccumulateFunction AccumulatedGrowth: StartStageName=FlagLeaf; EndStageName=StartGrainFill
            VariableReference DailyBiomassProduction: VariableName=[Arbitrator].DM.TotalFixationSupply
          AccumulateFunction DaysOfGrainDevelopment: StartStageName=FlagLeaf; EndStageName=StartGrainFill
            Constant LenthOfADay: FixedValue=1; Units=days/day
        Constant InitialGrainProportion: FixedValue=0.2
        PhaseLookup NFillingRate
          PhaseLookupValue GrainFilling: Start=Flowering; End=EndGrainFill
            FillingRateFunction
              VariableReference NumberFunction: VariableName=[Grain].NumberFunction.Value()
              AddFunction FillingDuration
                VariableReference FloweringToGrainFilling: VariableName=[Phenology].GrainDevelopment.Target.Value()
                VariableReference GrainFilling: VariableName=[Phenology].GrainFilling.Target.Value()
              VariableReference ThermalTime: VariableName=[Phenology].ThermalTime.Value()
              MultiplyFunction PotentialSizeIncrement
                Constant MaximumFinalNConc: FixedValue=0.026; Units=g/g
                VariableReference MaximumSize: VariableName=[Grain].MaximumPotentialGrainSize.Value()
        BiomassRemoval BiomassRemovalDefaults
          OrganBiomassRemovalType Harvest: FractionLiveToRemove=1; FractionDeadToRemove=0; FractionLiveToResidue=0; FractionDeadToResidue=0
          OrganBiomassRemovalType Cut: FractionLiveToRemove=1; FractionDeadToRemove=0; FractionLiveToResidue=0; FractionDeadToResidue=0
          OrganBiomassRemovalType Prune: FractionLiveToRemove=0; FractionDeadToRemove=0; FractionLiveToResidue=0.8; FractionDeadToResidue=0
          OrganBiomassRemovalType Graze: FractionLiveToRemove=0.6; FractionDeadToRemove=0; FractionLiveToResidue=0.2; FractionDeadToResidue=0
          OrganBiomassRemovalType Thin: FractionLiveToRemove=0; FractionDeadToRemove=0; FractionLiveToResidue=0.05; FractionDeadToResidue=0
        HoldFunction NumberFunction: WhenToHold=Flowering
          MultiplyFunction ValueToHold
            Constant GrainsPerGramOfStem: FixedValue=22; Units=grains
            VariableReference StemMass: VariableName=[StemPlusSpike].Wt
              VariableReference StemMass: VariableName=[StemPlusSpike].Wt
      Root: GrowthRespiration=0; MaintenanceRespiration=0
        CompositeBiomass Live: Propertys=[[Root].LayerLive]
        CompositeBiomass Dead: Propertys=[[Root].LayerDead]
        LinearInterpolationFunction KLModifier: XProperty=[Leaf].LAI
          XYPairs: X=[0, 3]; Y=[1, 1]
        Constant SoilWaterEffect: FixedValue=1
        Constant MaxDailyNUptake: FixedValue=20
        Constant SenescenceRate: FixedValue=0.005
        Constant StructuralFraction: FixedValue=1
        Constant MaximumRootDepth: FixedValue=1000000
        PhaseLookup PartitionFraction
          PhaseLookupValue PreEmergence: Start=Germination; End=Emergence
            Constant Value: FixedValue=0
          PhaseLookupValue PreFlowering: Start=Emergence; End=Flowering
            Constant Value: FixedValue=0.2
          PhaseLookupValue PostFlowering: Start=Flowering; End=EndGrainFill
            Constant Value: FixedValue=0
        Constant MaximumNConc: FixedValue=0.01
        Constant MinimumNConc: FixedValue=0.01
        PhaseLookup RootFrontVelocity
          PhaseLookupValue PreEmergence: Start=Germination; End=Emergence
            Constant Value: FixedValue=5
          PhaseLookupValue PostEmergence: Start=Emergence; End=Maturity
            Constant Value: FixedValue=20
        PhaseBasedSwitch NitrogenDemandSwitch: Start=Germination; End=Maturity
        BiomassRemoval BiomassRemovalDefaults
          OrganBiomassRemovalType Harvest: FractionLiveToRemove=0; FractionDeadToRemove=0; FractionLiveToResidue=0.2; FractionDeadToResidue=0
          OrganBiomassRemovalType Cut: FractionLiveToRemove=0; FractionDeadToRemove=0; FractionLiveToResidue=0.3; FractionDeadToResidue=0
          OrganBiomassRemovalType Prune: FractionLiveToRemove=0; FractionDeadToRemove=0; FractionLiveToResidue=0.1; FractionDeadToResidue=0
          OrganBiomassRemovalType Graze: FractionLiveToRemove=0; FractionDeadToRemove=0; FractionLiveToResidue=0.15; FractionDeadToResidue=0
          OrganBiomassRemovalType Thin: FractionLiveToRemove=0; FractionDeadToRemove=0; FractionLiveToResidue=0.05; FractionDeadToResidue=0
        LinearInterpolationFunction KNO3: XProperty=[Root].RootLengthDenisty
          XYPairs: X=[0, 0.004]; Y=[0.002, 0.02]
        LinearInterpolationFunction KNH4: XProperty=[Root].RootLengthDenisty
          XYPairs: X=[0, 0.004]; Y=[0.001, 0.01]
        LinearInterpolationFunction NUptakeSWFactor: XProperty=[Root].RWC
          XYPairs: X=[0, 0.2, 1]; Y=[1, 1, 1]
        Constant InitialDM: FixedValue=0.2; Units=g/plant
        Constant SpecificRootLength: FixedValue=40; Units=m/g
      Leaf: MaxCover=1; Albedo=0.2; Gsmax=0.015; R50=150; MicroClimatePresent=true; KDead=0.3; MaximumMainStemLeafNumber=30
        zero: GrowthRespiration, MaintenanceRespiration, CurrentExpandingLeaf, StartFractionExpanded, FractionNextleafExpanded, DeadNodesYesterday, FRGR, PotentialEP, DMConversionEfficiency, TipsAtEmergence, CohortsAtInitialisation, FractionDied
        LeafCohort InitialLeaves[1]: DeltaWaterConstrainedArea=0; DeltaCarbonConstrainedArea=0; Rank=1; Area=200; MaintenanceRespiration=0
        LeafCohort InitialLeaves[2]: DeltaWaterConstrainedArea=0; DeltaCarbonConstrainedArea=0; Rank=2; Area=0; MaintenanceRespiration=0
        CompositeBiomass Live: Propertys=[[Leaf].CohortLive]
        CompositeBiomass Dead: Propertys=[[Leaf].CohortDead]
        ArrayBiomass CohortArrayLive: Propertys=[[Leaf].Live]; ArraySize=[Leaf].MaxNodeNo
        ArrayBiomass CohortArrayDead: Propertys=[[Leaf].Dead]; ArraySize=[Leaf].MaxNodeNo
        LeafCohortParameters CohortParameters
          Constant NReallocationFactor: FixedValue=1
          Constant MaintenanceRespirationFunction: FixedValue=0
          Constant NRetranslocationFactor: FixedValue=0.03
          Constant DMReallocationFactor: FixedValue=0
          Constant DMRetranslocationFactor: FixedValue=0.1
          MinimumFunction CellDivisionStress
            LinearInterpolationFunction WaterStressFactor: XProperty=[Barley].WaterSupplyDemandRatio
              XYPairs: X=[0, 1]; Y=[0.5, 1]
            LinearInterpolationFunction NitrogenStressFactor: XProperty=[Barley].Leaf.Fn
              XYPairs: X=[0, 0.5, 1]; Y=[0.1, 0.1, 1]
          MinimumFunction ExpansionStress
            LinearInterpolationFunction WaterStress: XProperty=[Barley].WaterSupplyDemandRatio
              XYPairs: X=[0, 0.7, 1]; Y=[0, 1, 1]
            LinearInterpolationFunction TemperatureEffect: XProperty=[Weather].MeanT
              XYPairs: X=[0, 12, 14]; Y=[0, 1, 1]
          MultiplyFunction MaxArea
            Constant AreaLargestLeaves: FixedValue=5000; Units=mm^2
            LinearInterpolationFunction AgeFactor: XProperty=[Phenology].Stage
              XYPairs: X=[3, 4, 5, 7, 9]; Y=[0.1, 0.5, 1, 0.5, 0]
              Memo
                Growth Stages and Phenology
                1 Sowing
                2 Germination
                3 Emergence
                4 VS
                5 TS
                6 FLag leaf
                7 Flowering
                8 SGF
                9 EGF
                10 HR
                11
          MultiplyFunction GrowthDuration
            Constant Multiplier: FixedValue=4
            VariableReference Phyllochron: VariableName=[Structure].MainStemNodeAppearanceRate.Value()
          PhaseLookup LagDurationP
            PhaseLookupValue VegetativeGrowth: Start=Emergence; End=TerminalSpikelet
              MultiplyFunction LagDuration
                VariableReference Phyllochron: VariableName=[Structure].MainStemNodeAppearanceRate.Value()
                LinearInterpolationFunction AgeFactor: XProperty=[Phenology].Stage
                  XYPairs: X=[0, 4, 9, 11]; Y=[1, 7, 9, 0]
                  Memo
                    Growth Stages and Phenology
                    1 Sowing
                    2 Germination
                    3 Emergence
                    4 VS
                    5 TS
                    6 FLag leaf
                    7 Flowering
                    8 SGF
                    9 EGF
                    10 HR
                    11
                Constant Multiplier: FixedValue=1
            PhaseLookupValue StemElongation: Start=TerminalSpikelet; End=Maturity
              SubtractFunction LagDuration
                AddFunction ThermalTimeToRipe
                  VariableReference GrainDevelopment: VariableName=[Phenology].GrainDevelopment.Target.Value()
                  VariableReference GrainFilling: VariableName=[Phenology].GrainFilling.Target.Value()
                  VariableReference Maturing: VariableName=[Phenology].Maturing.Target.Value()
                  VariableReference Ripening: VariableName=[Phenology].Ripening.Target.Value()
                ExpressionFunction SenescenceDuration: Expression=[Leaf].CohortParameters.SenescenceDuration.Value()
          MultiplyFunction LagDuration
            VariableReference Phyllochron: VariableName=[Structure].MainStemNodeAppearanceRate.Value()
            LinearInterpolationFunction AgeFactor: XProperty=[Phenology].Stage
              XYPairs: X=[0, 4, 9, 11]; Y=[1, 2, 3, 0]
              Memo
                Growth Stages and Phenology
                1 Sowing
                2 Germination
                3 Emergence
                4 VS
                5 TS
                6 FLag leaf
                7 Flowering
                8 SGF
                9 EGF
                10 HR
                11
            Constant Multiplier: FixedValue=1
          MultiplyFunction SenescenceDuration
            Constant Multiplier: FixedValue=1
            VariableReference Phyllochron: VariableName=[Structure].MainStemNodeAppearanceRate.Value()
            LinearInterpolationFunction: XProperty=[Leaf].CohortParameters.MaxArea.Value()
              XYPairs: X=[0, 2000, 4500, 6000]; Y=[1, 2, 3, 4]
            LinearInterpolationFunction AgeFactor: XProperty=[Phenology].Stage
              XYPairs: X=[2, 4, 9, 11]; Y=[2, 2, 6, 0]
              Memo
                Growth Stages and Phenology
                1 Sowing
                2 Germination
                3 Emergence
                4 VS
                5 TS
                6 FLag leaf
                7 Flowering
                8 SGF
                9 EGF
                10 HR
                11
          Constant DetachmentLagDuration: FixedValue=1000000
          Constant DetachmentDuration: FixedValue=1000000
          Constant RelativeBranchLeafSize: FixedValue=1
          LinearInterpolationFunction MaximumNConc: XProperty=[Phenology].Stage
            XYPairs: X=[3, 4, 6]; Y=[0.08, 0.05, 0.02]
          LinearInterpolationFunction CriticalNConc: XProperty=[Phenology].Stage
            XYPairs: X=[3, 4, 6]; Y=[0.07, 0.04, 0.015]
          LinearInterpolationFunction MinimumNConc: XProperty=[Phenology].Stage
            XYPairs: X=[3, 4]; Y=[0.01, 0.005]
          AddFunction DroughtInducedLagAcceleration
            Constant One: FixedValue=1
            MultiplyFunction Stress
              Constant StressResponseCoefficient: FixedValue=1
              LinearInterpolationFunction StressFactor: XProperty=[Barley].WaterSupplyDemandRatio
                XYPairs: X=[0, 0.7]; Y=[1, 0]
          AddFunction DroughtInducedSenAcceleration: same as Replacements.Barley.Leaf.CohortParameters.DroughtInducedLagAcceleration
          LinearInterpolationFunction SpecificLeafAreaMax: XProperty=[Phenology].Stage
            XYPairs: X=[4, 5]; Y=[35000, 50000]
            Memo
              Growth Stages and Phenology
              1 Sowing
              2 Germination
              3 Emergence
              4 VS
              5 TS
              6 FLag leaf
              7 Flowering
              8 SGF
              9 EGF
              10 HR
              11
          Constant SpecificLeafAreaMin: FixedValue=25000
          Constant InitialNConc: FixedValue=0
          Constant NonStructuralFraction: FixedValue=0.5
          Constant LeafSizeShapeParameter: FixedValue=0.3
          Constant SenessingLeafRelativeSize: FixedValue=1; Units=0-1
          MultiplyFunction ShadeInducedSenescenceRate
            LinearInterpolationFunction RatePerDegDay: XProperty=[Leaf].CohortCurrentRankCoverAbove
              XYPairs: X=[0.99, 1]; Y=[0, 0]
              Memo
                1% per degree day means it takes one phyllochron for a shaded leaf to fully sceness
            VariableReference ThermalTime: VariableName=[Phenology].ThermalTime.Value()
          PhaseLookup StructuralFraction
            PhaseLookupValue VegetativeGrowth: Start=Emergence; End=StartGrainFill
              Constant: FixedValue=0.5
            PhaseLookupValue StemElongation: Start=StartGrainFill; End=Maturity
              Constant: FixedValue=0
        RUEModel Photosynthesis
          Constant RUE: FixedValue=1.5
          WeightedTemperatureFunction FT: MaximumTemperatureWeighting=1
            XYPairs: X=[0, 4, 9, 15, 40]; Y=[0, 0, 1, 1, 1]
          LinearInterpolationFunction FVPD: XProperty=[Leaf].Photosynthesis.VPD
            XYPairs: X=[0, 10, 50]; Y=[1, 1, 1]
          LinearInterpolationFunction FN: XProperty=[Leaf].Fn
            XYPairs: X=[0, 1, 1.5]; Y=[0, 1, 1]
          LinearInterpolationFunction FW: XProperty=[Leaf].Fw
            XYPairs: X=[0, 0.3, 1]; Y=[0, 1, 1]
          RUECO2Function FCO2: PhotosyntheticPathway=C3
          VariableReference RadnInt: VariableName=[Leaf].RadIntTot
        LinearInterpolationFunction FrostFraction: XProperty=[Weather].MinT
          XYPairs: X=[-1, 0]; Y=[0, 0]
        VariableReference ThermalTime: VariableName=[Phenology].ThermalTime.Value()
        MinimumFunction FRGRFunction
          VariableReference RUE_FT: VariableName=[Leaf].Photosynthesis.FT.Value()
          MinimumFunction Others
            VariableReference RUE_FN: VariableName=[Leaf].Photosynthesis.FN.Value()
            VariableReference RUE_FVPD: VariableName=[Leaf].Photosynthesis.FVPD.Value()
        BiomassRemoval BiomassRemovalDefaults
          OrganBiomassRemovalType Harvest: FractionLiveToRemove=0; FractionDeadToRemove=0; FractionLiveToResidue=0.3; FractionDeadToResidue=0.3
          OrganBiomassRemovalType Cut: FractionLiveToRemove=0.8; FractionDeadToRemove=0.8; FractionLiveToResidue=0; FractionDeadToResidue=0
          OrganBiomassRemovalType Prune: FractionLiveToRemove=0; FractionDeadToRemove=0; FractionLiveToResidue=0.6; FractionDeadToResidue=0.6
          OrganBiomassRemovalType Graze: FractionLiveToRemove=0.6; FractionDeadToRemove=0.6; FractionLiveToResidue=0.1; FractionDeadToResidue=0.1
          OrganBiomassRemovalType Thin: FractionLiveToRemove=0; FractionDeadToRemove=0; FractionLiveToResidue=0.05; FractionDeadToResidue=0.05
        Constant ExtinctionCoeff: FixedValue=0.5
        Constant StructuralFraction: FixedValue=0
        Constant DMConversionEfficiencyFunction: FixedValue=1; Units=0-1
      GenericOrgan Spike
        PopulationBasedDemandFunction DMDemandFunction
          VariableReference ThermalTime: VariableName=[Phenology].ThermalTime.Value()
          Constant ExpansionStress: FixedValue=1
          VariableReference OrganPopulation: VariableName=[Spike].HeadNumber.Value()
          Constant StartStage: FixedValue=4.5
          Constant MaximumOrganWt: FixedValue=0.2
          AddFunction GrowthDuration
            VariableReference EarlyReproductive: VariableName=[Phenology].EarlyReproductive.Target.Value()
            VariableReference GrainDevelopment: VariableName=[Phenology].GrainDevelopment.Target.Value()
        Biomass Live
        Biomass Dead
        Constant NReallocationFactor: FixedValue=0
        Constant NRetranslocationFactor: FixedValue=0.1
        Constant MaximumNConc: FixedValue=0.01
        Constant StructuralFraction: FixedValue=0.9
        Constant SenescenceRate: FixedValue=0; Units=/d
        Constant MinimumNConc: FixedValue=0.003
        MultiplyFunction HeadNumber
          Constant FertileTillers: FixedValue=1
          VariableReference StemPopulation: VariableName=[Structure].TotalStemPopn
        BiomassRemoval BiomassRemovalDefaults
          OrganBiomassRemovalType Harvest: FractionLiveToRemove=0.5; FractionDeadToRemove=0; FractionLiveToResidue=0.1; FractionDeadToResidue=0
          OrganBiomassRemovalType Cut: FractionLiveToRemove=0.8; FractionDeadToRemove=0; FractionLiveToResidue=0; FractionDeadToResidue=0
          OrganBiomassRemovalType Prune: FractionLiveToRemove=0; FractionDeadToRemove=0; FractionLiveToResidue=0.6; FractionDeadToResidue=0
          OrganBiomassRemovalType Graze: FractionLiveToRemove=0.6; FractionDeadToRemove=0; FractionLiveToResidue=0.2; FractionDeadToResidue=0
          OrganBiomassRemovalType Thin: FractionLiveToRemove=0; FractionDeadToRemove=0; FractionLiveToResidue=0.05; FractionDeadToResidue=0
        PhaseBasedSwitch NitrogenDemandSwitch: Start=Emergence; End=StartGrainFill
        PhaseLookup DMRetranslocationFactor
          PhaseLookupValue VegetativeGrowth: Start=Emergence; End=StartGrainFill
            Constant DMRetranslocationFactor: FixedValue=0
          PhaseLookupValue ReproductiveGrowth: Start=StartGrainFill; End=EndGrainFill
            Constant DMRetranslocationFactor: FixedValue=0.5
        Constant InitialWtFunction: FixedValue=0; Units=g/m^2
        Constant DetachmentRateFunction: FixedValue=0; Units=/d
        Constant MaintenanceRespirationFunction: FixedValue=0; Units=0-1
        Constant DMConversionEfficiency: FixedValue=1; Units=0-1
      GenericOrgan Stem
        Memo
          The stem model  currently uses  a partition model to determine amount allocated

          N conc values are from Zhao et al 2009
        Biomass Live
        Biomass Dead
        PhaseLookup StructuralFraction
          PhaseLookupValue VegetativeGrowth: Start=Sowing; End=FlagLeaf
            Constant Fraction: FixedValue=0.7
          PhaseLookupValue ReproductiveGrowth: Start=FlagLeaf; End=Flowering
            Constant Fraction: FixedValue=0.7
          PhaseLookupValue GrainFilling: Start=Flowering; End=EndGrainFill
            Constant Fraction: FixedValue=1
          PhaseLookupValue EndStemGrowth: Start=EndGrainFill; End=Maturity
            Constant Fraction: FixedValue=1
        Constant SenescenceRate: FixedValue=0; Units=/d
        LinearInterpolationFunction MaximumNConc: XProperty=[Phenology].Stage
          XYPairs: X=[3, 4, 5, 6]; Y=[0.045, 0.045, 0.045, 0.045]
        LinearInterpolationFunction MinimumNConc: XProperty=[Phenology].Stage
          XYPairs: X=[3, 4, 6]; Y=[0.0025, 0.0025, 0.0025]
        PhaseBasedSwitch NitrogenDemandSwitch: Start=Emergence; End=StartGrainFill
        Constant NReallocationFactor: FixedValue=0
        PhaseLookup NRetranslocationFactor
          PhaseLookupValue VegetativeGrowth: Start=Sowing; End=Flowering
            Constant Fraction: FixedValue=0
          PhaseLookupValue ReproductiveGrowth: Start=Flowering; End=HarvestRipe
            Constant Fraction: FixedValue=0.5
        PhaseLookup DMRetranslocationFactor: same as Replacements.Barley.Spike.DMRetranslocationFactor
        PartitionFractionDemandFunction DMDemandFunction
          PhaseLookup PartitionFraction
            PhaseLookupValue PreStemElongation: Start=Emergence; End=TerminalSpikelet
              Constant StemFraction: FixedValue=0.4
            PhaseLookupValue StemElongation: Start=TerminalSpikelet; End=FlagLeaf
              Constant StemFraction: FixedValue=0.6
            PhaseLookupValue EarEmergence: Start=FlagLeaf; End=Flowering
              Constant StemFraction: FixedValue=0.4
            PhaseLookupValue PostEarEmergence: Start=Flowering; End=StartGrainFill
              Constant StemFraction: FixedValue=0.4
              SubtractFunction
                Constant: FixedValue=0
            PhaseLookupValue BGF: Start=StartGrainFill; End=EndGrainFill
              Constant StemFraction: FixedValue=0.1
              SubtractFunction
                Constant: FixedValue=0
            PhaseLookupValue PostGrainFill: Start=EndGrainFill; End=HarvestRipe
              Constant One: FixedValue=0
              VariableReference: VariableName=[Grain].PartitionFraction.Value()
        BiomassRemoval BiomassRemovalDefaults: same as Replacements.Barley.Spike.BiomassRemovalDefaults
        DivideFunction PercentWSC
          VariableReference WSC: VariableName=[Stem].Live.NonStructuralWt
          VariableReference StemWt: VariableName=[Stem].Live.Wt
        Constant InitialWtFunction: FixedValue=0; Units=g/m^2
        Constant DetachmentRateFunction: FixedValue=0; Units=/d
        Constant MaintenanceRespirationFunction: FixedValue=0; Units=0-1
        Constant DMConversionEfficiency: FixedValue=1; Units=0-1
      CompositeBiomass AboveGround
        Propertys=[[Leaf].Live, [Leaf].Dead, [Stem].Live, [Stem].Dead, [Spike].Live, [Spike].Dead, [Grain].Live, [Grain].Dead]
      CompositeBiomass AboveGroundLive: Propertys=[[Leaf].Live, [Stem].Live, [Spike].Live, [Grain].Live]
      CompositeBiomass AboveGroundDead: Propertys=[[Leaf].Dead, [Stem].Dead, [Spike].Dead, [Grain].Dead]
      CompositeBiomass BelowGround: Propertys=[[Root].Live, [Root].Dead]
      CompositeBiomass Total
        Propertys=[[Leaf].Live, [Leaf].Dead, [Stem].Live, [Stem].Dead, [Root].Live, [Root].Dead, [Spike].Live, [Spike].Dead, [Grain].Live, [Grain].Dead]
      CompositeBiomass TotalLive
        Propertys=[[Leaf].Live, [Stem].Live, [Root].Live, [Spike].Live, [Grain].Live]
      CompositeBiomass TotalDead
        Propertys=[[Leaf].Dead, [Stem].Dead, [Root].Dead, [Spike].Dead, [Grain].Dead]
      CompositeBiomass Ear: Propertys=[[Spike].Live, [Grain].Live, [Spike].Dead, [Grain].Dead]
        Memo
          The Ear composite biomass object includes the Live and dead pools of all organs within the Ear to allow output for total dry matter and Nutrient contents, including total structural, non-structural and metabolic pools.
      CompositeBiomass StemPlusSpike: Propertys=[[Stem].Live, [Spike].Live, [Stem].Dead, [Spike].Dead]
      CultivarFolder Cultivars
        Cultivar Triumph
          Command:
            [Phenology].MinimumLeafNumber.FixedValue = 9
            [Phenology].VrnSensitivity.FixedValue = 7
            [Phenology].PpSensitivity.FixedValue = 3
            [Structure].BasePhyllochron.FixedValue = 80
  DataStore
    Input Biomass9596: ErrorMessage=The specified file does not exist.; FileName=ObservedData\RS_Barley_9596_biomass_observed.txt
    Input SW9596: ErrorMessage=The specified file does not exist.; FileName=ObservedData\RS_Barley_9596_soilwater_observed.txt
    Input Biomass8889: ErrorMessage=The specified file does not exist.; FileName=ObservedData\RS_Barley_8889_Biomass_obs.txt
    Input SW8889: ErrorMessage=The specified file does not exist.; FileName=ObservedData\RS_Barley_8889_soilwater_observed.txt
  Folder ModelTesting
    Memo
      The Apsim Barley model has been tested using data from rainfed and rain shelter experiments. The rain shelter experiment evaluated different levels of drought on crop growth and development. Some of the data have been reported in published papers (xx, xx). Graphs of model performance are provided for yield, biomass production, canopy development, phenological development, water and nitrogen uptake, and grain yield components.
  Experiment RS_9596
    Memo
      This is a water response trial run in the rain out shelter at Plant and Food Research in Lincoln, New Zealand.  It is described in full by [Jamieson_WaterResponse_1995] but briefly.  A winter crop of 'Batten' Barley was sown at 300 plants/m^2^ on the 8th of June 1991 and range of irrigation amount and timing treatments were applied.  Six of these treatments have been included in this validation:

      01. Full irrigation where measured ET was replaced weekly
      03. Short Early Drought where irrigation was withheld from sowing until late October then full irrigation was applied
      05. Long Early Drought where irrigation was withheld from sowing until mid December then full irrigation was applied
      06. Long Late Drought where full irrigation was applied from sowing until mid September then withheld for the rest of the season
      07. Moderate Late Drought where full irrigation was applied from sowing until mid October then withheld for the rest of the season
      08. Short Late Drought where full irrigation was applied from sowing until Early November then withheld for the rest of the season
      11. Nil where no water was applied and the crop grew on soil stored water only.

      Irrigation was applied at weekly intervals through and assemply of low rate drip emitters on each plot.  Soil water content was measured weekly with a neutron probe and biomass was measured at 10 - 14 day intervals.  Samples throughtout the crop were from two 0.1m^2^ quatrants and the final harvest sample was from a 1 m^2^ quadrant.  Each treatment was replicated twice and there was considerable soil variation from plot to plot so each treatment was initianilised with unique soil parameters which best described the soil they were growing on.
    Factors
      Factor _
        Factor Rainfed
          Specifications:
            [Water]
            [Initial water]
          Water
            Thickness  BD   AirDry  LL15  DUL   SAT
            200        1.3  0.08    0.08  0.29  0.44
            200        1.3  0.07    0.07  0.3   0.4
            200        1.3  0.07    0.07  0.28  0.4
            200        1.3  0.09    0.09  0.26  0.38
            200        1.3  0.11    0.11  0.26  0.38
            200        1.3  0.16    0.16  0.28  0.38
            200        1.3  0.15    0.15  0.27  0.38
            200        1.3  0.12    0.12  0.22  0.38
            SoilCrop BarleySoil: LL=[0.08, 0.07, 0.07, 0.09, 0.11, 0.16, 0.15, 0.12]; KL=[0.05, 0.03, 0.02, 0.03, 0.03, 0.03, 0.01, 0.01]; XF=[1, 0.2, 0.3, 1, 1, 1, 1, 1]
          Sample Initial water: Thickness=[200, 200, 200, 200, 200, 200, 200, 200]; SW=[0.27, 0.3, 0.28, 0.25, 0.24, 0.27, 0.27, 0.21]; NO3Units=ppm; NH4Units=ppm; SWUnits=Volumetric; OCUnits=Total; PHUnits=Water
        Factor Full_Irrigation
          Specifications:
            [IrrigationEvents]
            [Water]
            [Initial water]
          Operations IrrigationEvents
            1995-10-28  [Irrigation].Apply(2);
            1995-11-04  [Irrigation].Apply(0);
            1995-11-15  [Irrigation].Apply(0);
            1995-11-28  [Irrigation].Apply(30);
            1995-12-05  [Irrigation].Apply(5);
            1995-12-05  [Irrigation].Apply(5);
            1995-12-12  [Irrigation].Apply(30.5);
            1995-12-18  [Irrigation].Apply(5);
            1995-12-19  [Irrigation].Apply(32.1);
            1995-12-27  [Irrigation].Apply(0);
            1996-01-03  [Irrigation].Apply(77.2);
            1996-01-09  [Irrigation].Apply(41.9);
            1996-01-16  [Irrigation].Apply(30.1);
            1996-01-23  [Irrigation].Apply(24.1);
            1996-01-30  [Irrigation].Apply(20.7);
            1996-02-07  [Irrigation].Apply(0);
            1996-02-12  [Irrigation].Apply(0);
          Water
            Thickness  BD    AirDry  LL15  DUL      SAT
            200        0.08  0.05    0.08  0.279    0.44
            200        0.12  0.05    0.12  0.2677   0.44
            200        0.12  0.05    0.12  0.26     0.44
            200        0.12  0.05    0.12  0.27045  0.44
            200        0.15  0.05    0.15  0.311    0.44
            200        0.16  0.05    0.16  0.25355  0.44
            200        0.15  0.05    0.15  0.27635  0.44
            200        0.08  0.05    0.08  0.1422   0.44
            SoilCrop BarleySoil: LL=[0.08, 0.12, 0.12, 0.12, 0.15, 0.16, 0.15, 0.08]; KL=[0.05, 0.03, 0.02, 0.03, 0.03, 0.03, 0.01, 0.01]; XF=[1, 0.2, 0.3, 1, 1, 1, 1, 1]
          Sample Initial water: Thickness=[200, 200, 200, 200, 200, 200, 200, 200]; NO3Units=ppm; NH4Units=ppm; SWUnits=Volumetric; OCUnits=Total; PHUnits=Water
            SW=[0.279, 0.2677, 0.2491, 0.27045, 0.311, 0.25355, 0.27635, 0.1422]
        Factor Early_Drought
          Specifications:
            [IrrigationEvents]
            [Water]
            [Initial water]
          Operations IrrigationEvents
            1995-10-28  [Irrigation].Apply(2);
            1995-11-28  [Irrigation].Apply(31.2);
            1995-12-05  [Irrigation].Apply(5);
            1995-12-18  [Irrigation].Apply(5);
            1995-12-19  [Irrigation].Apply(32.1);
            1996-01-03  [Irrigation].Apply(79.3);
            1996-01-09  [Irrigation].Apply(44.7);
            1996-01-16  [Irrigation].Apply(38.8);
            1996-01-23  [Irrigation].Apply(30);
            1996-01-30  [Irrigation].Apply(21.4);
          Water
            Thickness  BD   AirDry  LL15  DUL      SAT
            200        1.3  0.06    0.06  0.31     0.44
            200        1.3  0.09    0.09  0.3      0.44
            200        1.3  0.07    0.07  0.28     0.44
            200        1.3  0.12    0.12  0.31145  0.44
            200        1.3  0.16    0.16  0.3079   0.44
            200        1.3  0.16    0.16  0.3007   0.44
            200        1.3  0.15    0.15  0.28705  0.44
            200        1.3  0.16    0.16  0.3117   0.44
            SoilCrop BarleySoil: LL=[0.06, 0.09, 0.07, 0.12, 0.16, 0.16, 0.15, 0.16]; KL=[0.05, 0.03, 0.02, 0.03, 0.03, 0.03, 0.01, 0.01]; XF=[1, 0.2, 0.3, 1, 1, 1, 1, 1]
          Sample Initial water: Thickness=[200, 200, 200, 200, 200, 200, 200, 200]; NO3Units=ppm; NH4Units=ppm; SWUnits=Volumetric; OCUnits=Total; PHUnits=Water
            SW=[0.2655, 0.27, 0.209, 0.31145, 0.3079, 0.3007, 0.28705, 0.3117]
        Factor Late_Drought
          Specifications:
            [IrrigationEvents]
            [Water]
            [Initial water]
          Operations IrrigationEvents
            1995-10-28  [Irrigation].Apply(2);
            1995-11-28  [Irrigation].Apply(47);
            1995-12-05  [Irrigation].Apply(5);
            1995-12-05  [Irrigation].Apply(5);
            1995-12-12  [Irrigation].Apply(30.5);
            1995-12-18  [Irrigation].Apply(5);
            1995-12-19  [Irrigation].Apply(3.1);
          Water
            Thickness  BD   AirDry  LL15  DUL    SAT
            200        1.3  0.08    0.08  0.281  0.44
            200        1.3  0.08    0.08  0.28   0.44
            200        1.3  0.09    0.09  0.27   0.44
            200        1.3  0.12    0.12  0.296  0.44
            200        1.3  0.11    0.11  0.231  0.44
            200        1.3  0.16    0.16  0.245  0.44
            200        1.3  0.1     0.1   0.204  0.44
            200        1.3  0.08    0.08  0.156  0.44
            SoilCrop BarleySoil: LL=[0.08, 0.08, 0.09, 0.12, 0.11, 0.16, 0.1, 0.08]; KL=[0.05, 0.03, 0.02, 0.03, 0.03, 0.03, 0.01, 0.01]; XF=[1, 0.2, 0.3, 1, 1, 1, 1, 1]
          Sample Initial water: Thickness=[200, 200, 200, 200, 200, 200, 200, 200]; NO3Units=ppm; NH4Units=ppm; SWUnits=Volumetric; OCUnits=Total; PHUnits=Water
            SW=[0.2805, 0.27965, 0.27, 0.296, 0.23105, 0.2453, 0.2042, 0.15605]
        Factor Full_Drought
          Specifications:
            [IrrigationEvents]
            [Water]
            [Initial water]
          Operations IrrigationEvents
            1995-10-28  [Irrigation].Apply(2);
            1995-11-28  [Irrigation].Apply(31.2);
            1995-12-05  [Irrigation].Apply(5);
            1995-12-18  [Irrigation].Apply(5);
            1995-12-19  [Irrigation].Apply(5);
          Water
            Thickness  BD   AirDry  LL15  DUL      SAT
            200        1.3  0.08    0.08  0.31     0.44
            200        1.3  0.07    0.07  0.27     0.44
            200        1.3  0.06    0.06  0.25355  0.44
            200        1.3  0.09    0.09  0.2364   0.44
            200        1.3  0.15    0.15  0.2635   0.44
            200        1.3  0.16    0.16  0.27705  0.44
            200        1.3  0.15    0.15  0.3392   0.44
            200        1.3  0.08    0.08  0.2      0.44
            SoilCrop BarleySoil: LL=[0.08, 0.07, 0.06, 0.09, 0.15, 0.16, 0.15, 0.08]; KL=[0.05, 0.03, 0.02, 0.03, 0.03, 0.03, 0.01, 0.01]; XF=[1, 0.2, 0.3, 1, 1, 1, 1, 1]
          Sample Initial water: Thickness=[200, 200, 200, 200, 200, 200, 200, 200]; NO3Units=ppm; NH4Units=ppm; SWUnits=Volumetric; OCUnits=Total; PHUnits=Water
            SW=[0.278, 0.26825, 0.25355, 0.2364, 0.2635, 0.27705, 0.3392, 0.2]
    Simulation Base_Rainfed
      Weather: FileName=%root%\Prototypes\Wheat\lincoln.met
      Clock: StartDate=1995-10-01; EndDate=1996-03-15
      Summary summaryfile
      SoilArbitrator Soil Arbitrator
      Zone Paddock: Area=1; Slope=0
        Soil: SoilType=NZ_sedementary; Region=Plains; State=Canterbury; Country=New Zealnd; Latitude=0; Longitude=0
          Analysis: Thickness=[100, 200, 300, 300, 300, 300]; PH=[6.6, 6.2, 5.7, 5.5, 5.5, 5.5]; PHUnits=Water; BoronUnits=HotWater
          Water
            Thickness  BD    AirDry  LL15  DUL   SAT   KS
            200        1.23  0.05    0.14  0.33  0.48  4832.039
            200        1.23  0.05    0.14  0.33  0.48  389.229
            200        1.59  0.16    0.13  0.29  0.4   16.362
            200        1.57  0.17    0.11  0.28  0.38  97.995
            200        1.57  0.17    0.17  0.3   0.37  97.995
            200        1.6   0.17    0.17  0.3   0.36  97.995
            200        1.6   0.17    0.17  0.3   0.36  97.995
            200        1.6   0.12    0.12  0.3   0.32  97.995
            SoilCrop BarleySoil: LL=[0.1, 0.1, 0.157, 0.173, 0.173, 0.165, 0.165, 0.115]; KL=[0.1, 0.1, 0.1, 0.1, 0.1, 0.1, 0.1, 0.1]; XF=[1, 1, 1, 1, 1, 1, 1, 1]
          SoilWater: SummerDate=1-Nov; SummerU=6; SummerCona=2; WinterDate=1-Apr; WinterU=9; WinterCona=4.4; DiffusConst=0; DiffusSlope=0; Salb=0.18; CN2Bare=68; CNRed=20; CNCov=0.8; slope=0; discharge_width=0; catchment_area=0; max_pond=0; residueinterception=0
            Thickness  SWCON  KLAT
            200        0.9    0
            200        0.6    0
            200        0.4    0
            200        0.4    0
            200        0.4    0
            200        0.9    0
            200        0.9    0
            200        0.9    0
          SoilNitrogen: fom_type=[default, manure, mucuna, lablab, shemp, stable]; fract_carb=[0.2, 0.3, 0.54, 0.57, 0.45, 0]; fract_cell=[0.7, 0.3, 0.37, 0.37, 0.47, 0.1]; fract_lign=[0.1, 0.4, 0.09, 0.06, 0.08, 0.9]; wfpsN2N2O_x=[22, 88]; wfpsN2N2O_y=[0.1, 1]; oc=[1.83566, 1.46334, 1.19884, 1.0301, 0.470338, 0.470138]
          SoilOrganicMatter: RootCN=31.5; RootWt=1500; SoilCN=11; EnrACoeff=7.4; EnrBCoeff=0.2; OCUnits=Total
            Thickness  OC    FBiom  FInert
            100        2.68  0.025  0.45
            200        2.78  0.025  0.6
            300        1.45  0.015  0.75
            200        0.38  0.01   0.9
            100        0.24  0.01   0.96
            200        0.24  0.01   0.96
            100        0.24  0.01   0.96
            300        0.24  0.01   0.96
          Sample Initial nitrogen: NO3Units=ppm; NH4Units=ppm; SWUnits=Volumetric; OCUnits=Total; PHUnits=Water
            Thickness  NO3  NH4  SW
            100        23   2.2  0.31
            200        18   2    0.31
            300        15   1.8  0.16
            200        1.5  1    0.15
            100        1.5  1    0.1
            200        1    0.9  0.1
            100        1    0.1  0.11
            300        1    0.1  0.12
          Sample Initial water: Thickness=[200, 200, 200, 200, 200, 200, 200, 200]; SW=[0.31, 0.31, 0.16, 0.15, 0.1, 0.1, 0.11, 0.12]; NO3Units=kgha; NH4Units=ppm; SWUnits=Volumetric; OCUnits=Total; PHUnits=Water
          CERESSoilTemperature
        Plant Barley: CropType=Wheat
        SurfaceOrganicMatter Surface Organic Matter: PoolName=wheat_stubble; type=wheat; mass=1500; standing_fraction=0; cnr=80; CriticalResidueWeight=2000; OptimumDecompTemp=20; MaxCumulativeEOS=20; CNRatioDecompCoeff=0.277; CNRatioDecompThreshold=25; TotalLeachRain=25; MinRainToLeach=10; CriticalMinimumOrganicC=0.004; DefaultCPRatio=0; DefaultStandingFraction=0; StandingExtinctCoeff=0.5; FractionFaecesAdded=0.5
          Pools:
            {PoolName=wheat_stubble, ResidueType=wheat, Mass=1500, CNRatio=80, StandingFraction=0}
          ResidueTypes: LoadFromResource=ResidueTypes
        MicroClimate: a_interception=0; b_interception=1; c_interception=0; d_interception=0; soil_albedo=0.3; sun_angle=15; soil_heat_flux_fraction=0.4; night_interception_fraction=0.5; refheight=2; albedo=0.293662; emissivity=0.96; RadIntTotal=0
        Irrigation
        Fertiliser
        Folder Manager folder
          Operations SowingEvent
            1995-10-16  [Barley].Sow(population:250, cultivar:"Triumph", depth:40, rowSpacing:150);
          Operations IrrigationEvents
            1995-10-28  [Irrigation].Apply(2);
            1995-11-04  [Irrigation].Apply(3.8);
            1995-11-15  [Irrigation].Apply(5.2);
            1995-11-28  [Irrigation].Apply(21.3);
            1995-12-05  [Irrigation].Apply(0.3);
            1995-12-05  [Irrigation].Apply(5);
            1995-12-12  [Irrigation].Apply(1.5);
            1995-12-18  [Irrigation].Apply(5);
            1995-12-19  [Irrigation].Apply(11.3);
            1995-12-27  [Irrigation].Apply(5.3);
            1996-01-03  [Irrigation].Apply(2.8);
            1996-01-09  [Irrigation].Apply(8.4);
            1996-01-16  [Irrigation].Apply(5.9);
            1996-01-23  [Irrigation].Apply(0.7);
            1996-01-30  [Irrigation].Apply(0.7);
          Operations FertiliserEvents
            1995-10-28  [Fertiliser].Apply(50, Fertiliser.Types.NO3N,0);
            1995-12-05  [Fertiliser].Apply(50, Fertiliser.Types.NO3N,0);
            1995-12-18  [Fertiliser].Apply(50, Fertiliser.Types.NO3N,0);
        Manager ClimateControl
          StartDate = 1995-10-15
          EndDate = 1996-04-01
```csharp
using System;
using Models.Core;
using APSIM.Shared.Utilities;



using System.Collections.Generic;
using System.Text;
using Models.PMF;
using Models;
using System.Xml.Serialization;

namespace Models
{
	[Serializable] 
	[System.Xml.Serialization.XmlInclude(typeof(Model))]
	public class Script : Model
	{
		[Link] Weather Met;
		[Link] Clock Clock;
    
		[Description("Start Date")]
		public DateTime StartDate { get; set; }
        
		[Description("End Date")]
		public DateTime EndDate { get; set; }
 
    
		[EventSubscribe("PreparingNewWeatherData")]
		private void OnPreparingNewWeatherData(object sender, EventArgs e)
		{
			if ((Clock.Today.Date >= StartDate) && (Clock.Today.Date <= EndDate))
				Met.Rain = 0;		
		}
	}
}
```
        Manager Harvesting
```csharp
using System;
using Models.Core;
using System.Collections.Generic;
using System.Text;
using Models.Soils;
using Models.PMF;
using Models;
using System.Xml.Serialization;
using APSIM.Shared.Utilities;

namespace Models
{
	[Serializable] 
	public class Script : Model
	{
		[Link] Plant Barley;
		[EventSubscribe("DoManagement")]
		private void OnDoManagement(object sender, EventArgs e)
		{
			if (Barley.Phenology.CurrentPhaseName == "Ripening")
			{
				Barley.Harvest();
				Barley.EndCrop();
			}
		}
	}
}
```
        Report DailyReport: EventNames=[Clock].DoReport
          VariableNames:
            [Clock].Today
            [Weather].MeanT
            [Soil].SoilWater.SW
            [Soil].SoilWater.SWmm
            sum([Soil].SoilWater.SWmm) as ProfileWater
            [Barley].AboveGround.N
            [Barley].AboveGround.Wt
            [Barley].AboveGroundLive.N
            [Barley].AboveGroundLive.N*10 as AboveGroundN
            [Barley].AboveGroundLive.Wt
            [Barley].AboveGroundDead.N
            [Barley].AboveGroundDead.Wt
            [Barley].Arbitrator.DMDemand
            [Barley].Arbitrator.DM.TotalFixationSupply
            [Barley].Ear.N
            [Barley].Ear.Nconc
            [Barley].Ear.Wt
            [Barley].Grain.N
            [Barley].Grain.NConc
            [Barley].Grain.Number
            [Barley].Grain.Size
            [Barley].Grain.Wt
            [Barley].Grain.Live.Wt
            [Barley].Leaf.AppearedCohortNo
            [Barley].Leaf.CoverDead
            [Barley].Leaf.CoverGreen
            [Barley].Leaf.CoverTotal
            [Barley].Leaf.Dead.N
            [Barley].Leaf.Dead.NConc
            [Barley].Leaf.Dead.Wt
            [Barley].Leaf.DeadCohortNo
            [Barley].Leaf.SenescingCohortNo
            [Barley].Leaf.ExpandedCohortNo
            [Barley].Leaf.Fn
            [Barley].Leaf.Fw
            [Barley].Leaf.Height
            [Barley].Leaf.InitialisedCohortNo
            [Barley].Leaf.LAI
            [Barley].Leaf.Live.N
            [Barley].Leaf.Live.NConc
            [Barley].Leaf.Live.Wt
            [Barley].Leaf.SpecificArea
            [Barley].Leaf.Transpiration
            [Barley].Phenology.CurrentPhaseName
            [Barley].Phenology.CurrentStageName
            [Barley].Phenology.DailyVernalisation.Value()
            [Barley].Phenology.MeanTemp.Value()
            [Barley].Phenology.Photoperiod.Value()
            [Barley].Phenology.Stage
            [Barley].Phenology.ThermalTime.Value()
            [Barley].Phenology.ThermalTime.Value
            [Barley].Phenology.Vrn1.Value()
            [Barley].Phenology.Vrn2.Value()
            [Barley].Phenology.Vrn4.Value()
            [Barley].Phenology.Zadok.Stage
            [Barley].Root.Depth
            [Barley].Root.N
            [Barley].Root.Wt
            [Barley].Root.Nconc
            [Barley].Root.WaterUptake
            [Barley].Spike.N
            [Barley].Spike.NConc
            [Barley].Spike.Wt
            [Barley].Spike.Live.NonStructuralWt
            [Barley].Stem.N
            [Barley].Stem.NConc
            [Barley].Stem.Wt
            [Barley].Stem.PercentWSC
            [Barley].Stem.Live.NonStructuralWt
            [Barley].StemPlusSpike.Wt
            [Barley].StemPlusSpike.N
            [Barley].SowingData.Cultivar
            [Barley].Structure.HaunStage.ValueTerminalSpikelet.Value()
            [Barley].Structure.HaunStage.Value()
            [Barley].Structure.Height
            [Barley].Structure.LeafTipsAppeared
            [Barley].Structure.MainStemFinalNodeNumber.Value()
            [Barley].Structure.MainStemFinalNodeNumber.ValueToHold.PhotoPLeaves.Value()
            [Barley].Structure.MainStemPopn
            [Barley].Structure.MeanTillerGrowthRate.Value()
            [Barley].Structure.TotalStemPopn
            [Barley].Total.N
            [Barley].Total.Wt
            [SurfaceOrganicMatter].Wt
            ([Barley].Leaf.Transpiration + [Soil].SoilWater.Es + [MicroClimate].interception) as ET
            sum([Soil].SoilNitrogen.NO3) as TotalSoilNitrogen
            [Barley].Phenology.FlagLeafDAS
            [Barley].Phenology.FloweringDAS
            [Barley].Phenology.MaturityDAS
            [Barley].Phenology.PhotoPeriod
            [Barley].Phenology.PhotoPeriodDeltaFunction
            [Barley].Phenology.Stage
            [Barley].Phenology.SoilTemperatureFunction.Value()
        Report EndTrialReport: EventNames=[Clock].EndOfSimulation
          VariableNames:
            [Barley].Structure.LeafTipsAppeared
            [Barley].Structure.MainStemFinalNodeNumber
            [Barley].Phenology.FlagLeafDAS
            [Barley].Phenology.FloweringDAS
            [Barley].Phenology.MaturityDAS
            [Script].CalcVals.SowMonth
        SoluteManager
  Experiment RS_8889
    Memo: same as RS_9596.Memo
    Factors
      Factor _
        Factor Control: same as RS_9596.Factors._.Rainfed
        Factor Early_Drought
          Specifications:
            [IrrigationEvents]
            [Water]
            [Initial water]
          Factor 1
            Specifications:
              [IrrigationEvents]
              [Water]
              [Initial water]
            Operations IrrigationEvents
              1988-11-03  [Irrigation].Apply(45);
              1988-11-10  [Irrigation].Apply(47);
              1988-11-17  [Irrigation].Apply(32);
              1988-10-24  [Irrigation].Apply(18);
              1988-12-01  [Irrigation].Apply(35);
              1988-12-08  [Irrigation].Apply(24);
              1988-12-15  [Irrigation].Apply(43);
              1988-12-22  [Irrigation].Apply(32);
              1988-12-29  [Irrigation].Apply(36);
              1989-01-05  [Irrigation].Apply(35);
            Water: same as RS_9596.Factors._.Early_Drought.Water
            Sample Initial water: Thickness=[200, 200, 200, 200, 200, 200, 200, 200]; NO3Units=ppm; NH4Units=ppm; SWUnits=Volumetric; OCUnits=Total; PHUnits=Water
              SW=[0.2655, 0.27, 0.209, 0.31145, 0.3079, 0.3007, 0.28705, 0.3117]
          Factor 2
            Specifications:
              [IrrigationEvents]
              [Water]
              [Initial water]
            Operations IrrigationEvents
              1988-11-17  [Irrigation].Apply(57);
              1988-10-24  [Irrigation].Apply(18);
              1988-12-01  [Irrigation].Apply(35);
              1988-12-08  [Irrigation].Apply(24);
              1988-12-15  [Irrigation].Apply(43);
              1988-12-22  [Irrigation].Apply(32);
              1988-12-29  [Irrigation].Apply(36);
              1989-01-05  [Irrigation].Apply(35);
              1989-01-12  [Irrigation].Apply(26);
              1989-01-19  [Irrigation].Apply(22);
            Water: same as RS_9596.Factors._.Early_Drought.Water
            Sample Initial water: Thickness=[200, 200, 200, 200, 200, 200, 200, 200]; NO3Units=ppm; NH4Units=ppm; SWUnits=Volumetric; OCUnits=Total; PHUnits=Water
              SW=[0.2655, 0.27, 0.209, 0.31145, 0.3079, 0.3007, 0.28705, 0.3117]
          Factor 3
            Specifications:
              [IrrigationEvents]
              [Water]
              [Initial water]
            Operations IrrigationEvents
              1988-10-24  [Irrigation].Apply(43);
              1988-12-01  [Irrigation].Apply(35);
              1988-12-08  [Irrigation].Apply(24);
              1988-12-15  [Irrigation].Apply(43);
              1988-12-22  [Irrigation].Apply(32);
              1988-12-29  [Irrigation].Apply(36);
              1989-01-05  [Irrigation].Apply(35);
              1989-01-12  [Irrigation].Apply(26);
              1989-01-19  [Irrigation].Apply(22);
            Water: same as RS_9596.Factors._.Early_Drought.Water
            Sample Initial water: Thickness=[200, 200, 200, 200, 200, 200, 200, 200]; NO3Units=ppm; NH4Units=ppm; SWUnits=Volumetric; OCUnits=Total; PHUnits=Water
              SW=[0.2655, 0.27, 0.209, 0.31145, 0.3079, 0.3007, 0.28705, 0.3117]
          Factor 4
            Specifications:
              [IrrigationEvents]
              [Water]
              [Initial water]
            Operations IrrigationEvents
              1988-12-01  [Irrigation].Apply(35);
              1988-12-08  [Irrigation].Apply(50);
              1988-12-15  [Irrigation].Apply(43);
              1988-12-22  [Irrigation].Apply(32);
              1988-12-29  [Irrigation].Apply(36);
              1989-01-05  [Irrigation].Apply(35);
              1989-01-12  [Irrigation].Apply(26);
              1989-01-19  [Irrigation].Apply(22);
              1989-01-26  [Irrigation].Apply(20);
              1989-02-02  [Irrigation].Apply(17);
              1989-02-09  [Irrigation].Apply(15);
            Water: same as RS_9596.Factors._.Early_Drought.Water
            Sample Initial water: Thickness=[200, 200, 200, 200, 200, 200, 200, 200]; NO3Units=ppm; NH4Units=ppm; SWUnits=Volumetric; OCUnits=Total; PHUnits=Water
              SW=[0.2655, 0.27, 0.209, 0.31145, 0.3079, 0.3007, 0.28705, 0.3117]
        Factor Middle_Drought
          Specifications:
            [IrrigationEvents]
            [Water]
            [Initial water]
          Factor 1
            Specifications:
              [IrrigationEvents]
              [Water]
              [Initial water]
            Operations IrrigationEvents
              1988-10-06  [Irrigation].Apply(27);
              1988-10-13  [Irrigation].Apply(10);
              1988-10-20  [Irrigation].Apply(30);
              1988-10-27  [Irrigation].Apply(25);
              1988-11-03  [Irrigation].Apply(25);
              1988-11-24  [Irrigation].Apply(43);
              1988-12-01  [Irrigation].Apply(35);
              1988-12-08  [Irrigation].Apply(24);
              1988-12-15  [Irrigation].Apply(43);
              1988-12-22  [Irrigation].Apply(32);
              1988-12-29  [Irrigation].Apply(36);
            Water: same as RS_9596.Factors._.Early_Drought.Water
            Sample Initial water: Thickness=[200, 200, 200, 200, 200, 200, 200, 200]; NO3Units=ppm; NH4Units=ppm; SWUnits=Volumetric; OCUnits=Total; PHUnits=Water
              SW=[0.2655, 0.27, 0.209, 0.31145, 0.3079, 0.3007, 0.28705, 0.3117]
          Factor 2
            Specifications:
              [IrrigationEvents]
              [Water]
              [Initial water]
            Operations IrrigationEvents
              1988-10-06  [Irrigation].Apply(27);
              1988-10-13  [Irrigation].Apply(10);
              1988-10-20  [Irrigation].Apply(30);
              1988-10-27  [Irrigation].Apply(25);
              1988-11-03  [Irrigation].Apply(25);
              1988-11-24  [Irrigation].Apply(0);
              1988-12-01  [Irrigation].Apply(35);
              1988-12-08  [Irrigation].Apply(50);
              1988-12-15  [Irrigation].Apply(43);
              1988-12-22  [Irrigation].Apply(32);
              1988-12-29  [Irrigation].Apply(36);
            Water: same as RS_9596.Factors._.Early_Drought.Water
            Sample Initial water: Thickness=[200, 200, 200, 200, 200, 200, 200, 200]; NO3Units=ppm; NH4Units=ppm; SWUnits=Volumetric; OCUnits=Total; PHUnits=Water
              SW=[0.2655, 0.27, 0.209, 0.31145, 0.3079, 0.3007, 0.28705, 0.3117]
          Factor 3
            Specifications:
              [IrrigationEvents]
              [Water]
              [Initial water]
            Operations IrrigationEvents
              1988-10-06  [Irrigation].Apply(27);
              1988-10-13  [Irrigation].Apply(10);
              1988-10-20  [Irrigation].Apply(30);
              1988-10-27  [Irrigation].Apply(25);
              1988-11-03  [Irrigation].Apply(25);
              1988-11-24  [Irrigation].Apply(0);
              1988-12-01  [Irrigation].Apply(0);
              1988-12-08  [Irrigation].Apply(0);
              1988-12-15  [Irrigation].Apply(43);
              1988-12-22  [Irrigation].Apply(32);
              1988-12-29  [Irrigation].Apply(36);
            Water: same as RS_9596.Factors._.Early_Drought.Water
            Sample Initial water: Thickness=[200, 200, 200, 200, 200, 200, 200, 200]; NO3Units=ppm; NH4Units=ppm; SWUnits=Volumetric; OCUnits=Total; PHUnits=Water
              SW=[0.2655, 0.27, 0.209, 0.31145, 0.3079, 0.3007, 0.28705, 0.3117]
          Factor 4
            Specifications:
              [IrrigationEvents]
              [Water]
              [Initial water]
            Operations IrrigationEvents
              1988-10-06  [Irrigation].Apply(27);
              1988-10-13  [Irrigation].Apply(10);
              1988-10-20  [Irrigation].Apply(30);
              1988-10-27  [Irrigation].Apply(25);
              1988-11-03  [Irrigation].Apply(0);
              1988-11-24  [Irrigation].Apply(0);
              1988-12-01  [Irrigation].Apply(0);
              1988-12-08  [Irrigation].Apply(0);
              1988-12-15  [Irrigation].Apply(0);
              1988-12-22  [Irrigation].Apply(0);
              1988-12-29  [Irrigation].Apply(0);
            Water: same as RS_9596.Factors._.Early_Drought.Water
            Sample Initial water: Thickness=[200, 200, 200, 200, 200, 200, 200, 200]; NO3Units=ppm; NH4Units=ppm; SWUnits=Volumetric; OCUnits=Total; PHUnits=Water
              SW=[0.2655, 0.27, 0.209, 0.31145, 0.3079, 0.3007, 0.28705, 0.3117]
        Factor Late_Drought
          Specifications:
            [IrrigationEvents]
            [Water]
            [Initial water]
          Factor 1
            Specifications:
              [IrrigationEvents]
              [Water]
              [Initial water]
            Operations IrrigationEvents
              1988-10-06  [Irrigation].Apply(27);
              1988-10-13  [Irrigation].Apply(10);
              1988-10-20  [Irrigation].Apply(30);
              1988-10-27  [Irrigation].Apply(25);
              1988-11-03  [Irrigation].Apply(25);
              1988-11-10  [Irrigation].Apply(47);
              1988-11-17  [Irrigation].Apply(32);
            Water: same as RS_9596.Factors._.Early_Drought.Water
            Sample Initial water: Thickness=[200, 200, 200, 200, 200, 200, 200, 200]; NO3Units=ppm; NH4Units=ppm; SWUnits=Volumetric; OCUnits=Total; PHUnits=Water
              SW=[0.2655, 0.27, 0.209, 0.31145, 0.3079, 0.3007, 0.28705, 0.3117]
          Factor 2
            Specifications:
              [IrrigationEvents]
              [Water]
              [Initial water]
            Operations IrrigationEvents
              1988-10-06  [Irrigation].Apply(27);
              1988-10-13  [Irrigation].Apply(10);
              1988-10-20  [Irrigation].Apply(30);
              1988-10-24  [Irrigation].Apply(18);
              1988-10-27  [Irrigation].Apply(25);
              1988-11-03  [Irrigation].Apply(25);
              1988-11-10  [Irrigation].Apply(47);
              1988-11-17  [Irrigation].Apply(32);
            Water: same as RS_9596.Factors._.Early_Drought.Water
            Sample Initial water: Thickness=[200, 200, 200, 200, 200, 200, 200, 200]; NO3Units=ppm; NH4Units=ppm; SWUnits=Volumetric; OCUnits=Total; PHUnits=Water
              SW=[0.2655, 0.27, 0.209, 0.31145, 0.3079, 0.3007, 0.28705, 0.3117]
          Factor 3
            Specifications:
              [IrrigationEvents]
              [Water]
              [Initial water]
            Operations IrrigationEvents
              1988-10-06  [Irrigation].Apply(27);
              1988-10-13  [Irrigation].Apply(10);
              1988-10-20  [Irrigation].Apply(30);
              1988-10-24  [Irrigation].Apply(18);
              1988-10-27  [Irrigation].Apply(25);
              1988-11-03  [Irrigation].Apply(25);
              1988-11-10  [Irrigation].Apply(47);
              1988-11-17  [Irrigation].Apply(32);
              1988-12-01  [Irrigation].Apply(35);
            Water: same as RS_9596.Factors._.Early_Drought.Water
            Sample Initial water: Thickness=[200, 200, 200, 200, 200, 200, 200, 200]; NO3Units=ppm; NH4Units=ppm; SWUnits=Volumetric; OCUnits=Total; PHUnits=Water
              SW=[0.2655, 0.27, 0.209, 0.31145, 0.3079, 0.3007, 0.28705, 0.3117]
        Factor Full_Irrigation
          Specifications:
            [IrrigationEvents]
            [Water]
            [Initial water]
          Operations IrrigationEvents
            1988-10-06  [Irrigation].Apply(28);
            1988-10-13  [Irrigation].Apply(13);
            1988-10-20  [Irrigation].Apply(32);
            1988-10-27  [Irrigation].Apply(26);
            1988-11-03  [Irrigation].Apply(46);
            1988-11-10  [Irrigation].Apply(21);
            1988-11-17  [Irrigation].Apply(37);
            1988-10-24  [Irrigation].Apply(19);
            1988-12-01  [Irrigation].Apply(40);
            1988-12-08  [Irrigation].Apply(31);
            1988-12-15  [Irrigation].Apply(43);
            1988-12-22  [Irrigation].Apply(40);
            1988-12-29  [Irrigation].Apply(56);
          Water: same as RS_9596.Factors._.Full_Drought.Water
          Sample Initial water: Thickness=[200, 200, 200, 200, 200, 200, 200, 200]; NO3Units=ppm; NH4Units=ppm; SWUnits=Volumetric; OCUnits=Total; PHUnits=Water
            SW=[0.278, 0.26825, 0.25355, 0.2364, 0.2635, 0.27705, 0.3392, 0.2]
        Factor Rainfed
          Specifications:
            [Water]
            [Initial water]
          Operations IrrigationEvents
            1988-10-06  [Irrigation].Apply(1.2);
            1988-10-13  [Irrigation].Apply(3.3);
            1988-10-20  [Irrigation].Apply(1.5);
            1988-10-27  [Irrigation].Apply(0.8);
            1988-11-03  [Irrigation].Apply(21.1);
            1988-11-10  [Irrigation].Apply(1.2);
            1988-11-17  [Irrigation].Apply(4.7);
            1988-10-24  [Irrigation].Apply(1.1);
            1988-12-01  [Irrigation].Apply(5.2);
            1988-12-08  [Irrigation].Apply(6.8);
            1988-12-15  [Irrigation].Apply(0);
            1988-12-22  [Irrigation].Apply(8.2);
            1988-12-29  [Irrigation].Apply(19.7);
          Water: same as RS_9596.Factors._.Rainfed.Water
          Sample Initial water: Thickness=[200, 200, 200, 200, 200, 200, 200, 200]; SW=[0.27, 0.3, 0.28, 0.25, 0.24, 0.27, 0.27, 0.21]; NO3Units=ppm; NH4Units=ppm; SWUnits=Volumetric; OCUnits=Total; PHUnits=Water
    Simulation Base_Control
      Weather: FileName=%root%\Prototypes\Wheat\lincoln.met
      Clock: StartDate=1988-09-01; EndDate=1989-03-01
      Summary summaryfile
      SoilArbitrator Soil Arbitrator
      Zone Paddock: Area=1; Slope=0
        Soil: Region=Plains; State=Canterbury; Country=New Zealand; Latitude=0; Longitude=0
          DataSource=Generic profile descriptions provided by Trevor Webb and data for functional horizions based on SWAMP project results
          Comments=Bulk density values were measured on the fine earth fraction so values entered into apsim soil are adjusted down to account for stone content (assuming stones are inert from all soil process so their mass and volume is removed from model paramaters).  SAT, DUL, LL15 and Air dry have been adjusted down to account for stone content.  OC has not been adjusted so the model will get the correct carbon and N amounts using the adjusted BD.
          Analysis: Thickness=[100, 200, 200, 100, 300, 200, 100, 300]; PH=[6, 6, 6, 6, 6, 6, 6, 6]; PHUnits=Water; BoronUnits=HotWater
          Water
            Thickness  BD     AirDry  LL15   DUL   SAT
            100        1.23   0.05    0.14   0.33  0.48
            200        1.23   0.05    0.14   0.33  0.48
            300        1.59   0.157   0.13   0.29  0.4
            200        1.57   0.173   0.11   0.28  0.38
            100        1.57   0.173   0.173  0.3   0.366
            200        1.6    0.165   0.165  0.3   0.358
            100        1.6    0.165   0.165  0.3   0.358
            300        1.601  0.115   0.115  0.3   0.316
            SoilCrop BarleySoil: LL=[0.1, 0.1, 0.157, 0.173, 0.173, 0.165, 0.165, 0.115]; KL=[0.1, 0.1, 0.1, 0.1, 0.1, 0.1, 0.1, 0.1]; XF=[1, 1, 1, 1, 1, 1, 1, 1]
          SoilWater: SummerDate=1-oct; SummerU=9; SummerCona=4.4; WinterDate=1-Apr; WinterU=2; WinterCona=1.5; DiffusConst=88; DiffusSlope=35; Salb=0.13; CN2Bare=73; CNRed=20; CNCov=0.8; max_pond=0; Thickness=[100, 200, 300, 200, 100, 200, 100, 300]; SWCON=[0.9, 0.6, 0.4, 0.4, 0.4, 0.9, 0.9, 0.9]; residueinterception=0
          SoilNitrogen: fom_type=[default, manure, mucuna, lablab, shemp, stable]; fract_carb=[0.2, 0.3, 0.54, 0.57, 0.45, 0]; fract_cell=[0.7, 0.3, 0.37, 0.37, 0.47, 0.1]; fract_lign=[0.1, 0.4, 0.09, 0.06, 0.08, 0.9]; wfpsN2N2O_x=[22, 88]; wfpsN2N2O_y=[0.1, 1]
          SoilOrganicMatter: RootCN=31.5; RootWt=1500; SoilCN=11; EnrACoeff=7.4; EnrBCoeff=0.2; OCUnits=Total
            Thickness  OC     FBiom  FInert
            100        2.677  0.025  0.45
            200        2.784  0.025  0.6
            300        1.454  0.015  0.75
            200        0.383  0.01   0.9
            100        0.243  0.01   0.96
            200        0.243  0.01   0.96
            100        0.243  0.01   0.96
            300        0.243  0.01   0.96
          Sample Initial N: NO3Units=kgha; NH4Units=kgha; SWUnits=Volumetric; OCUnits=Total; PHUnits=Water
            Thickness  NO3  NH4
            100        23   2.2
            200        18   2
            300        15   1.8
            200        1.5  1
            100        1.5  1
            200        1    0.9
            100        1    0.1
            300        1    0.1
          InitialWater: PercentMethod=FilledFromTop; FractionFull=0.9
          Sample Initial water: Thickness=[200, 200, 200, 200, 200, 200, 200, 200]; SW=[0.31, 0.31, 0.16, 0.15, 0.1, 0.1, 0.11, 0.12]; NO3Units=kgha; NH4Units=ppm; SWUnits=Volumetric; OCUnits=Total; PHUnits=Water
          CERESSoilTemperature
        Plant Barley: CropType=Wheat
        SurfaceOrganicMatter Surface Organic Matter: PoolName=wheat_stubble; type=wheat; mass=1000; standing_fraction=0; cnr=80; CriticalResidueWeight=2000; OptimumDecompTemp=20; MaxCumulativeEOS=20; CNRatioDecompCoeff=0.277; CNRatioDecompThreshold=25; TotalLeachRain=25; MinRainToLeach=10; CriticalMinimumOrganicC=0.004; DefaultCPRatio=0; DefaultStandingFraction=0; StandingExtinctCoeff=0.5; FractionFaecesAdded=0.5
          Pools:
            {PoolName=wheat_stubble, ResidueType=wheat, Mass=1000, CNRatio=80, StandingFraction=0}
          ResidueTypes: LoadFromResource=ResidueTypes
        MicroClimate: a_interception=0; b_interception=1; c_interception=0; d_interception=0; soil_albedo=0.3; sun_angle=15; soil_heat_flux_fraction=0.4; night_interception_fraction=0.5; refheight=2; albedo=0.293662; emissivity=0.96; RadIntTotal=0
        Irrigation
        Fertiliser
        Folder Manager folder
          Operations SowingEvent
            1988-09-07  [Barley].Sow(population:250, cultivar:"Triumph", depth:40, rowSpacing:150);
          Operations IrrigationEvents
            1988-10-06  [Irrigation].Apply(27);
            1988-10-13  [Irrigation].Apply(10);
            1988-10-20  [Irrigation].Apply(30);
            1988-10-27  [Irrigation].Apply(25);
            1988-11-03  [Irrigation].Apply(25);
            1988-11-10  [Irrigation].Apply(47);
            1988-11-17  [Irrigation].Apply(32);
            1988-11-24  [Irrigation].Apply(18);
            1988-12-01  [Irrigation].Apply(35);
            1988-12-08  [Irrigation].Apply(24);
            1988-12-15  [Irrigation].Apply(43);
            1988-12-22  [Irrigation].Apply(32);
            1988-12-29  [Irrigation].Apply(36);
          Operations FertiliserEvents
            1988-09-26  [Fertiliser].Apply(50, Fertiliser.Types.NO3N,10);
            1988-11-02  [Fertiliser].Apply(70, Fertiliser.Types.NO3N,10);
        Manager ClimateControl
          StartDate = 1988-10-15
          EndDate = 1989-04-01
          script: same as in RS_9596.Base_Rainfed.Paddock.ClimateControl
        Manager Harvesting: same as RS_9596.Base_Rainfed.Paddock.Harvesting
        Report DailyReport: same as RS_9596.Base_Rainfed.Paddock.DailyReport
        Report EndTrialReport: EventNames=[Clock].EndOfSimulation
          VariableNames:
            [Barley].Structure.LeafTipsAppeared
            [Barley].Structure.MainStemFinalNodeNumber
            [Barley].Phenology.FlagLeafDAS
            [Barley].Phenology.FloweringDAS
            [Barley].Phenology.MaturityDAS
            [Script].CalcVals.SowMonth
        SoluteManager
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