Simulations: Version=25
  Memo TitlePage
    # The APSIM Grapevine Model

    ZHU, J., Brown, H.E., Parker, A.K.,Trought, M.C.T.

    ##Building the model.
    The APSIM Grapevine model has been adapted from the potato model [Brown_etal_2011] and developed using the Plant Modelling Framework (PMF) of [brown_plant_2014]. This new framework provides a library of plant organ and process submodels that can be coupled, at runtime, to construct a model in much the same way that models can be coupled to construct a simulation. This means that dynamic composition of lower level process and organ classes (e.g. photosynthesis, leaf) into larger constructions (e.g. maize, wheat, sorghum) can be achieved by the model developer without additional coding.

    The model consists of:
    * a phenology model to simulate development between growth phases
    * a structure model to simulate plant morphology
    * a collection of organs to simulate the various plant parts
    * an arbitrator to allocate resources (N, biomass) to the various plant organs

    ##Pecularities of Grapevine
    Grapevine is a challenging crop to model because it is a perennial woody plant.
    A budding phase was added for simulating the start of the vegetative phase. This budding phase was similar to the emergence phase for annual crop.
    There are an enormous number of Grapevine cultivars and trainning systems. They differ in phenology and vegetative growth.

    ##Including a Grapevine crop in an APSIM simulation
    To indluce a Grapevine crop in a simulation the grapevine plant needs to be added to the vineyard, field or zone in which it is to be grown.  This can be done by right clicking on the vineyard, selecting Add from the drop down menu and then selecting Plant from the list that comes up.
    ###Setting plant density and bud number (budNumber number and early canopy growth)
    The Grapevine Management script sets the number of stems that will appear from plant.
    ###Setting final leaf number (Crop duration)
    The duration of a Grapevine crop is determined by the number of leaves that the mainstem produces and how long it takes for these to appear and seness.
  Replacements
    Plant Grapevine: CropType=Grapevine
      Cultivar SauvignonBlanc
      Phenology: DaysAfterSowing=0
        Memo
          Dormancy sequence: Paradormancy (Apical dominance), Endodormancy(Chilling requirement), Ecodormancy (forcing unit)
          Sarvas (1974) separates bud dormancy in two periods: the "rest" period is defined as the period when buds are dormant due to physiological conditions (endodormancy), and the "quiescence" period is when buds remain dormant due to unfavourable environmental conditions (ecodormancy). The current phenological models assume the dormancy starts at March 1st, and budburst is regulated by temperature. EndDormancy is induced by a period with chilling temperatures, and then followed by a period with forcing temperatures till bud burst (Chuine et al., 2003).

          We then simulated the time of flowering, fruitSet,veraison, leaf fall. After one cycle, bud goes to dormancy at March 1st.

          Paradormancy, which is the suspension of growth caused by factors outside the meristem but within the plant. It is typically an influence of one organ over another, and includes an apical bud preventing outgrowth of a lower bud, which relates to apical dominance (see Martin 1987 for review).
        WangEngelTempFunction ThermalTime: MinTemp=4; OptTemp=28; MaxTemp=40; RefTemp=25; MaximumTemperatureWeighting=0.5
        GenericPhase EndoDormancy: Start=StartDormancy; End=EndDormancy
          Constant Target: FixedValue=13.5; Units=days
          AirTemperatureFunction ThermalTime
            XYPairs: X=[0, 4, 8, 20]; Y=[1, 1, 0, 0]
        BuddingPhase Budding: Start=EndDormancy; End=BudBurst
          WangEngelTempFunction ThermalTime: MinTemp=0; OptTemp=22; MaxTemp=40; RefTemp=25; MaximumTemperatureWeighting=0.5
          MultiplyFunction Target
            Constant Base: FixedValue=150
            LinearInterpolationFunction ChillingTadjustment: XProperty=[Budding].AccChill.Value()
              XYPairs: X=[5, 13.8, 23.3, 32.7, 42]; Y=[1, 0.66, 0.53, 0.46, 0.43]
          AccumulateFunction AccChill: StartStageName=StartDormancy; EndStageName=BudBurst; ResetStageName=Veraison; FractionRemovedOnCut=0; FractionRemovedOnHarvest=0; FractionRemovedOnGraze=0; FractionRemovedOnPrune=0
            VariableReference ThermalTime: VariableName=[Phenology].EndoDormancy.ThermalTime.Value()
          MultiplyFunction FractionOfBudBurst
            Constant CaneDiameter: FixedValue=1
            SigmoidFunction BudNumberEffect
              VariableReference XValue: VariableName=[Structure].PrimaryBudNo
              Constant Ymax: FixedValue=1.4
              Constant Xo: FixedValue=100
              Constant b: FixedValue=-54.8977
        GenericPhase Flowering: Start=BudBurst; End=StartFlowering
          Constant Target: FixedValue=29
          VariableReference ThermalTime: VariableName=[Phenology].ThermalTime.Value()
        GenericPhase FruitSet: Start=StartFlowering; End=FruitSet
          Constant Target: FixedValue=7; Units=d
          VariableReference ThermalTime: VariableName=[Phenology].ThermalTime.Value()
        GenericPhase BerryDevelopment: Start=FruitSet; End=Veraison
          MultiplyFunction Target
            Constant Base: FixedValue=20
            LinearInterpolationFunction LAIAdjustment: XProperty=[Grapevine].Leaf.LAI
              XYPairs: X=[0, 1, 2, 3, 4, 5]; Y=[1.5, 1.2, 1.1, 1, 0.9, 0.8]
          VariableReference ThermalTime: VariableName=[Phenology].ThermalTime.Value()
        LeafDeathPhase: Start=Veraison; End=LeafFall
          VariableReference ThermalTime: VariableName=[Phenology].ThermalTime.Value()
        GotoPhase: Start=LeafFall; End=Unused; FractionComplete=0; PhaseNameToGoto=EndoDormancy
        OnEventFunction BudBurstDOY: SetEvent=BudBurst; ReSetEvent=StartDormancy
          Memo
            A function is used to provide flowering date as days after sowing(DAS).
          Constant PreEventValue: FixedValue=0
          VariableReference PostEventValue: VariableName=[Clock].Today.DayOfYear
          VariableReference PostEventValue1: VariableName=[Grapevine].DOYFromJuly1st.Value()
        OnEventFunction FloweringDOY: SetEvent=StartFlowering; ReSetEvent=StartDormancy
          Memo
            A function is used to provide flowering date as days after sowing(DAS).
          Constant PreEventValue: FixedValue=0
          VariableReference PostEventValue: VariableName=[Clock].Today.DayOfYear
        OnEventFunction VeraisonDOY: SetEvent=Veraison; ReSetEvent=StartDormancy
          Memo
            A function is used to provide flowering date as days after sowing(DAS).
          Constant PreEventValue: FixedValue=0
          VariableReference PostEventValue: VariableName=[Clock].Today.DayOfYear
        OnEventFunction CurrentSeason: SetEvent=BudBurst; ReSetEvent=StartDormancy
          Memo
            A function is used to capture the year of the current season as in the south hemisphere the growing season extends to the second year.
          Constant PreEventValue: FixedValue=0
          VariableReference PostEventValue: VariableName=[Clock].Today.Year
      Structure: Initialised=false; Germinated=false; Emerged=false; CohortToInitialise=0; TipToAppear=0; ApexNum=0
        MultiplyFunction ThermalTime
          Constant RefTem: FixedValue=25
          WangEngelTempFunction TempRes: MinTemp=10; OptTemp=25; MaxTemp=37; RefTemp=25; MaximumTemperatureWeighting=0.5
        PhaseLookupValue MainStemPrimordiaInitiationRate: Start=BudBurst; End=Veraison
          Constant: FixedValue=20; Units=degree day
        PhaseLookupValue Phyllochron: Start=BudBurst; End=Veraison
          MultiplyFunction
            Constant: FixedValue=30
            LinearInterpolationFunction: XProperty=[Leaf].AppearedCohortNo
              XYPairs: X=[1, 5, 10, 24]; Y=[0.5, 0.5, 0.7, 1]
        Constant FinalLeafNumber: FixedValue=24; Units=number
        LinearInterpolationFunction HeightModel: XProperty=[Shoot].Live.Wt
          XYPairs: X=[0, 200, 1200, 4000]; Y=[1800, 1800, 1800, 1800]
        MultiplyFunction BranchingRate
          LinearInterpolationFunction Potential_Branching_Rate: XProperty=[Structure].LeafTipsAppeared
            XYPairs: X=[0, 7, 8, 13, 14, 34]; Y=[0, 0, 0, 0, 0, 0]
          LinearInterpolationFunction: XProperty=[Leaf].CoverGreen
            XYPairs: X=[0, 0.4, 0.55, 0.8, 1]; Y=[1, 1, 0.45, 0, 0]
        Constant BranchMortality: FixedValue=0
        Constant DroughtInducedBranchMortality: FixedValue=0
        Constant StemSenescenceAge: FixedValue=0
      Leaf: GrowthRespiration=0; MaintenanceRespiration=0; CurrentExpandingLeaf=34; StartFractionExpanded=0.83819; FractionNextleafExpanded=0.926641; DeadNodesYesterday=0; MaxCover=1; Albedo=0.25; Gsmax=0.01; R50=200; FRGR=0; PotentialEP=0; MicroClimatePresent=true; KDead=0.03; MaximumMainStemLeafNumber=24; TipsAtEmergence=0; CohortsAtInitialisation=0; FractionDied=0
        VariableReference ThermalTime: VariableName=[Structure].ThermalTime.Value()
        LeafCohort InitialLeaf1: Rank=1; Area=1000
          zero: NReallocationFactor, DMReallocationFactor, NRetranslocationFactor, DMRetranslocationFactor, ShadeInducedSenRate, SenescedFrac, DeltaPotentialArea, DeltaStressConstrainedArea, DeltaCarbonConstrainedArea, PotentialStructuralDMAllocation, PotentialMetabolicDMAllocation, MetabolicNReallocated, MetabolicWtReallocated, StorageNReallocated, StorageWtReallocated, MetabolicNRetranslocated, StorageNRetrasnlocated, DMRetranslocated, MetabolicNAllocation, StructuralDMAllocation, MetabolicDMAllocation, MaintenanceRespiration
        LeafCohort InitialLeaf2: Rank=2
          zero: NReallocationFactor, DMReallocationFactor, NRetranslocationFactor, DMRetranslocationFactor, ShadeInducedSenRate, SenescedFrac, DeltaPotentialArea, DeltaStressConstrainedArea, DeltaCarbonConstrainedArea, PotentialStructuralDMAllocation, PotentialMetabolicDMAllocation, MetabolicNReallocated, MetabolicWtReallocated, StorageNReallocated, StorageWtReallocated, MetabolicNRetranslocated, StorageNRetrasnlocated, DMRetranslocated, MetabolicNAllocation, StructuralDMAllocation, MetabolicDMAllocation, Area, MaintenanceRespiration
        LeafCohort InitialLeaf3: Rank=3
          zero: NReallocationFactor, DMReallocationFactor, NRetranslocationFactor, DMRetranslocationFactor, ShadeInducedSenRate, SenescedFrac, DeltaPotentialArea, DeltaStressConstrainedArea, DeltaCarbonConstrainedArea, PotentialStructuralDMAllocation, PotentialMetabolicDMAllocation, MetabolicNReallocated, MetabolicWtReallocated, StorageNReallocated, StorageWtReallocated, MetabolicNRetranslocated, StorageNRetrasnlocated, DMRetranslocated, MetabolicNAllocation, StructuralDMAllocation, MetabolicDMAllocation, Area, MaintenanceRespiration
        LeafCohortParameters CohortParameters: ExpansionStressValue=0
          LinearInterpolationFunction MaxArea: XProperty=[Structure].RelativeNodeApperance
            XYPairs: X=[0, 0.15, 1]; Y=[5000, 15000, 10000]
          LinearInterpolationFunction GrowthDuration: XProperty=[Structure].RelativeNodeApperance
            XYPairs: X=[0, 0.3, 0.4, 1]; Y=[150, 150, 150, 150]
          LinearInterpolationFunction LagDuration: XProperty=[Structure].RelativeNodeApperance
            XYPairs: X=[0, 0.15, 0.3, 0.4, 0.73, 1]; Y=[600, 800, 1000, 1000, 1000, 1000]
          LinearInterpolationFunction SenescenceDuration: XProperty=[Structure].RelativeNodeApperance
            XYPairs: X=[0, 0.2, 1]; Y=[400, 600, 800]
          Constant DetachmentLagDuration: FixedValue=1000000; Units=degreeDay
          Constant DetachmentDuration: FixedValue=1000000; Units=degreeDay
          LinearInterpolationFunction SpecificLeafAreaMax: XProperty=[Structure].RelativeNodeApperance
            XYPairs: X=[0, 1]; Y=[40000, 25000]
          Constant SpecificLeafAreaMin: FixedValue=20000; Units=mm2/g
          Constant StructuralFraction: FixedValue=0.8; Units=percentage
          Constant MaximumNConc: FixedValue=0.05; Units=g/g
          Constant MinimumNConc: FixedValue=0.01; Units=g/g
          Constant InitialNConc: FixedValue=0.04; Units=g/g
          Constant NReallocationFactor: FixedValue=0; Units=percentage
          Constant NRetranslocationFactor: FixedValue=0; Units=percentage
          LinearInterpolationFunction ExpansionStress: XProperty=[Grapevine].WaterSupplyDemandRatio
            XYPairs: X=[0, 1]; Y=[1, 1]
          Constant CriticalNConc: FixedValue=0.03; Units=g/g
          Constant DMRetranslocationFactor: FixedValue=0; Units=percentage
          LinearInterpolationFunction ShadeInducedSenescenceRate: XProperty=[Leaf].CohortCurrentRankCoverAbove
            XYPairs: X=[0, 0.5, 0.8, 1]; Y=[0, 0, 0, 0]
          Constant StorageFraction: FixedValue=0.2; Units=percentage
          Constant SenessingLeafRelativeSize: FixedValue=1; Units=0-1
          Constant DMReallocationFactor: FixedValue=0.1; Units=percentage
          Constant LeafSizeShapeParameter: FixedValue=0.01
            Units=parameter controls the logistic growth of the leaf in growth stage
          Constant MaintenanceRespirationFunction: FixedValue=0; Units=g/g
          Constant DroughtInducedLagAcceleration: FixedValue=1
          Constant DroughtInducedSenAcceleration: FixedValue=1
          Constant CellDivisionStress: FixedValue=1; Units=0-1
          ArrayFunction LagDurationAgeMultiplier: Values=1 1 1
          ArrayFunction SenescenceDurationAgeMultiplier: Values=1 1 1
          ArrayFunction LeafSizeAgeMultiplier: Values=1 1 1 1 1 1 1 1 1 1 1 1
          Constant RemobilisationCost: FixedValue=0
          Constant CarbonConcentration: FixedValue=0.4
        RUEModel Photosynthesis
          PhaseLookup RUE
            PhaseLookupValue Juvenile: Start=BudBurst; End=FruitSet
              Constant: FixedValue=1.2; Units=g/MJ
            PhaseLookupValue Vegetative: Start=FruitSet; End=Veraison
              Constant: FixedValue=1.05; Units=g/MJ
            PhaseLookupValue Reproductive: Start=Veraison; End=LeafFall
              Constant: FixedValue=1.5; Units=g/MJ
          Constant RUE1: FixedValue=1; Units=g/MJ
          RUECO2Function FCO2: PhotosyntheticPathway=C3
          LinearInterpolationFunction FN: XProperty=[Leaf].Fn
            XYPairs: X=[0, 1, 1.5]; Y=[0, 1, 1]
          WeightedTemperatureFunction FT: MaximumTemperatureWeighting=0.75
            XYPairs: X=[5, 20, 30, 45]; Y=[0, 1, 1, 0]
          LinearInterpolationFunction FW: XProperty=[Leaf].Fw
            XYPairs: X=[0, 1, 1.5]; Y=[0, 1, 1]
          LinearInterpolationFunction FVPD: XProperty=[Leaf].Photosynthesis.VPD
            XYPairs: X=[0, 10, 50]; Y=[1, 1, 1]
          VariableReference RadnInt: VariableName=[Leaf].RadIntTot
        MinimumFunction FRGRFunction
          VariableReference RUE_FT: VariableName=[Leaf].Photosynthesis.FT.Value()
          MinimumFunction Others
            VariableReference RUE_FN: VariableName=[Leaf].Photosynthesis.FN.Value()
            VariableReference RUE_FVPD: VariableName=[Leaf].Photosynthesis.FVPD.Value()
        MultiplyFunction ExtinctionCoeff
          Constant: FixedValue=0.5
        CompositeBiomass Total: Propertys=[[Leaf].Live, [Leaf].Dead]
        ArrayBiomass CohortArrayLive: Propertys=[[Leaf].Live]; ArraySize=[Leaf].MaxNodeNo
        ArrayBiomass CohortArrayDead: Propertys=[[Leaf].Dead]; ArraySize=[Leaf].MaxNodeNo
        BiomassRemoval BiomassRemovalDefaults
          OrganBiomassRemovalType Harvest: FractionLiveToRemove=0.2; FractionDeadToRemove=0; FractionLiveToResidue=0; FractionDeadToResidue=1
          OrganBiomassRemovalType Cut: FractionLiveToRemove=0; FractionDeadToRemove=0; FractionLiveToResidue=0.2; FractionDeadToResidue=0.3
          OrganBiomassRemovalType Prune: FractionLiveToRemove=0; FractionDeadToRemove=0; FractionLiveToResidue=0.5; FractionDeadToResidue=0.5
          OrganBiomassRemovalType Graze: FractionLiveToRemove=0.6; FractionDeadToRemove=0; FractionLiveToResidue=0.1; FractionDeadToResidue=0
        PhaseLookupValue FrostFraction: Start=Veraison; End=LeafFall
          LinearInterpolationFunction: XProperty=[Weather].MinT
            XYPairs: X=[4, 3]; Y=[0, 0]
        Constant DMConversionEfficiency: FixedValue=1
        ApexStandard
        Constant RemobilisationCost: FixedValue=0
        Constant CarbonConcentration: FixedValue=0.4
        Constant StructuralFraction: FixedValue=0.8; Units=g/g
      GenericOrgan Shoot
        Constant NReallocationFactor: FixedValue=0.2; Units=percentage
        Constant NRetranslocationFactor: FixedValue=0.05; Units=percentage
        PhaseBasedSwitch NitrogenDemandSwitch: Start=BudBurst; End=LeafFall
        Constant DMRetranslocationFactor: FixedValue=0; Units=percentage
        LinearInterpolationFunction MaximumNConc: XProperty=[Phenology].Stage
          XYPairs: X=[3, 4, 5.3]; Y=[0.06, 0.05, 0.025]
        Constant MinimumNConc: FixedValue=0.006; Units=g/g
        BiomassRemoval BiomassRemovalDefaults
          OrganBiomassRemovalType Harvest: FractionLiveToRemove=0.5; FractionDeadToRemove=0; FractionLiveToResidue=0.1; FractionDeadToResidue=0
          OrganBiomassRemovalType Cut: FractionLiveToRemove=0.8; FractionDeadToRemove=0; FractionLiveToResidue=0; FractionDeadToResidue=0
          OrganBiomassRemovalType Prune: FractionLiveToRemove=0; FractionDeadToRemove=0; FractionLiveToResidue=0.6; FractionDeadToResidue=0
          OrganBiomassRemovalType Graze: FractionLiveToRemove=0.6; FractionDeadToRemove=0; FractionLiveToResidue=0.2; FractionDeadToResidue=0
        Constant InitialWtFunction: FixedValue=0; Units=g/m^2
        Constant StructuralFraction: FixedValue=1; Units=g/g
        Constant DetachmentRateFunction: FixedValue=0; Units=1/d
        Constant SenescenceRate: FixedValue=0; Units=/d
        Constant MaintenanceRespirationFunction: FixedValue=0; Units=0-1
        Constant DMConversionEfficiency: FixedValue=1; Units=0-1
        PartitionFractionDemandFunction DMDemandFunction
          Constant PartitionFraction: FixedValue=0.2
        Constant DMReallocationFactor: FixedValue=0
        VariableReference CriticalNConc: VariableName=[Shoot].MinimumNConc.Value()
        Constant RemobilisationCost: FixedValue=0
        Constant CarbonConcentration: FixedValue=0.4
      GenericOrgan Cordon
        Constant DMReallocationFactor: FixedValue=0.2
        Constant NReallocationFactor: FixedValue=0; Units=percentage
        Constant NRetranslocationFactor: FixedValue=0.05; Units=percentage
        PhaseBasedSwitch NitrogenDemandSwitch: Start=BudBurst; End=LeafFall
        Constant DMRetranslocationFactor: FixedValue=0; Units=percentage
        LinearInterpolationFunction MaximumNConc: XProperty=[Phenology].Stage
          XYPairs: X=[3, 4, 5.3]; Y=[0.06, 0.05, 0.025]
        Constant MinimumNConc: FixedValue=0.006; Units=g/g
        BiomassRemoval BiomassRemovalDefaults
          OrganBiomassRemovalType Harvest: FractionLiveToRemove=0; FractionDeadToRemove=0; FractionLiveToResidue=0; FractionDeadToResidue=0
          OrganBiomassRemovalType Cut: FractionLiveToRemove=0; FractionDeadToRemove=0; FractionLiveToResidue=0; FractionDeadToResidue=0
          OrganBiomassRemovalType Prune: FractionLiveToRemove=0; FractionDeadToRemove=0; FractionLiveToResidue=0; FractionDeadToResidue=0
          OrganBiomassRemovalType Graze: FractionLiveToRemove=0; FractionDeadToRemove=0; FractionLiveToResidue=0; FractionDeadToResidue=0
        Constant InitialWtFunction: FixedValue=200; Units=g/m^2
        Constant StructuralFraction: FixedValue=0.8; Units=percentage
        Constant DetachmentRateFunction: FixedValue=0; Units=/d
        Constant SenescenceRate: FixedValue=0; Units=/d
        Constant MaintenanceRespirationFunction: FixedValue=0.001; Units=0-1
        Constant DMConversionEfficiency: FixedValue=1; Units=0-1
        PartitionFractionDemandFunction DMDemandFunction
          Constant PartitionFraction: FixedValue=0.01
        VariableReference CriticalNConc: VariableName=[Cordon].MinimumNConc.Value()
        Constant RemobilisationCost: FixedValue=0
        Constant CarbonConcentration: FixedValue=0.4
        Constant CaneDiameter: FixedValue=10
      GenericOrgan Trunk
        Constant NReallocationFactor: FixedValue=0
        Constant NRetranslocationFactor: FixedValue=0.05
        PhaseBasedSwitch NitrogenDemandSwitch: Start=BudBurst; End=LeafFall
        Constant DMRetranslocationFactor: FixedValue=0
        LinearInterpolationFunction MaximumNConc: XProperty=[Phenology].Stage
          XYPairs: X=[3, 4, 5.3]; Y=[0.06, 0.05, 0.025]
        Constant MinimumNConc: FixedValue=0.006
        BiomassRemoval BiomassRemovalDefaults: same as Replacements.Grapevine.Cordon.BiomassRemovalDefaults
        Constant InitialWtFunction: FixedValue=2000; Units=g/m^2
        Constant StructuralFraction: FixedValue=0.8; Units=g/g
        Constant DetachmentRateFunction: FixedValue=0; Units=/d
        Constant SenescenceRate: FixedValue=0; Units=/d
        Constant MaintenanceRespirationFunction: FixedValue=0.001; Units=0-1
        Constant DMConversionEfficiency: FixedValue=1; Units=0-1
        PartitionFractionDemandFunction DMDemandFunction
          Constant PartitionFraction: FixedValue=0.05
        Constant DMReallocationFactor: FixedValue=0.2
        VariableReference CriticalNConc: VariableName=[Trunk].MinimumNConc.Value()
        Constant RemobilisationCost: FixedValue=0
        Constant CarbonConcentration: FixedValue=0.4
      ReproductiveOrgan Berry: GrowthRespiration=0; MaintenanceRespiration=0; RipeStage=Ripe
        Memo
          The final yield was calculated by vines per hectare, shoots per vine, bunches per shoot, flower number per bunch, berries per bunch,and mean berry weight. The effects of temperature and carbon status were or will be considered on bunches per shoot, flower number per bunch, berries per bunch,and mean berry weight.
        DivideFunction MeanTempInitiation
          AccumulateFunction Temperature: StartStageName=StartFlowering; EndStageName=Veraison; ResetStageName=StartFlowering; FractionRemovedOnCut=0; FractionRemovedOnHarvest=0; FractionRemovedOnGraze=0; FractionRemovedOnPrune=0
            AirTemperatureFunction
              XYPairs: X=[0, 40]; Y=[0, 40]
          AccumulateFunction Time: StartStageName=StartFlowering; EndStageName=Veraison; ResetStageName=StartFlowering; FractionRemovedOnCut=0; FractionRemovedOnHarvest=0; FractionRemovedOnGraze=0; FractionRemovedOnPrune=0
            Constant Days: FixedValue=1; Units=days/day
        DivideFunction MeanTempBudBurst
          AccumulateFunction Temperature: StartStageName=EndDormancy; EndStageName=BudBurst; ResetStageName=StartDormancy; FractionRemovedOnCut=0; FractionRemovedOnHarvest=0; FractionRemovedOnGraze=0; FractionRemovedOnPrune=0
            AirTemperatureFunction
              XYPairs: X=[0, 40]; Y=[0, 40]
          AccumulateFunction Time: StartStageName=EndDormancy; EndStageName=BudBurst; ResetStageName=StartDormancy; FractionRemovedOnCut=0; FractionRemovedOnHarvest=0; FractionRemovedOnGraze=0; FractionRemovedOnPrune=0
            Constant Days: FixedValue=1; Units=days/day
        DivideFunction MeanTempFlowering
          AccumulateFunction Temperature: StartStageName=StartFlowering; EndStageName=FruitSet; ResetStageName=StartFlowering; FractionRemovedOnCut=0; FractionRemovedOnHarvest=0; FractionRemovedOnGraze=0; FractionRemovedOnPrune=0
            AirTemperatureFunction
              XYPairs: X=[0, 40]; Y=[0, 40]
          AccumulateFunction Time: StartStageName=StartFlowering; EndStageName=FruitSet; ResetStageName=StartFlowering; FractionRemovedOnCut=0; FractionRemovedOnHarvest=0; FractionRemovedOnGraze=0; FractionRemovedOnPrune=0
            Constant Days: FixedValue=1; Units=days/day
        DivideFunction MeanCHOInitiation
          AccumulateFunction CHO: StartStageName=StartFlowering; EndStageName=Veraison; ResetStageName=StartFlowering; FractionRemovedOnCut=0; FractionRemovedOnHarvest=0; FractionRemovedOnGraze=0; FractionRemovedOnPrune=0
            LinearInterpolationFunction CHOSupplyDemand: XProperty=[Arbitrator].FDM
              XYPairs: X=[0, 1, 2]; Y=[0, 1, 1]
          AccumulateFunction Time: StartStageName=StartFlowering; EndStageName=Veraison; ResetStageName=StartFlowering; FractionRemovedOnCut=0; FractionRemovedOnHarvest=0; FractionRemovedOnGraze=0; FractionRemovedOnPrune=0
            Constant Days: FixedValue=1; Units=days/day
        DivideFunction MeanCHOBudBurst
          AccumulateFunction CHO: StartStageName=EndDormancy; EndStageName=BudBurst; ResetStageName=EndDormancy; FractionRemovedOnCut=0; FractionRemovedOnHarvest=0; FractionRemovedOnGraze=0; FractionRemovedOnPrune=0
            LinearInterpolationFunction CHOSupplyDemand: XProperty=[Arbitrator].FDM
              XYPairs: X=[0, 1, 2]; Y=[0, 1, 1]
          AccumulateFunction Time: StartStageName=EndDormancy; EndStageName=BudBurst; ResetStageName=StartDormancy; FractionRemovedOnCut=0; FractionRemovedOnHarvest=0; FractionRemovedOnGraze=0; FractionRemovedOnPrune=0
            Constant Days: FixedValue=1; Units=days/day
        DivideFunction MeanCHOFlowering
          AccumulateFunction CHO: StartStageName=StartFlowering; EndStageName=FruitSet; ResetStageName=StartFlowering; FractionRemovedOnCut=0; FractionRemovedOnHarvest=0; FractionRemovedOnGraze=0; FractionRemovedOnPrune=0
            LinearInterpolationFunction CHOSupplyDemand: XProperty=[Arbitrator].FDM
              XYPairs: X=[0, 1, 2]; Y=[0, 1, 1]
          AccumulateFunction Time: StartStageName=StartFlowering; EndStageName=FruitSet; ResetStageName=StartFlowering; FractionRemovedOnCut=0; FractionRemovedOnHarvest=0; FractionRemovedOnGraze=0; FractionRemovedOnPrune=0
            Constant Days: FixedValue=1; Units=days/day
        OnEventFunction MeanTempInitiationY0: SetEvent=Veraison; ReSetEvent=StartFlowering
          Constant PreEventValue: FixedValue=13
          VariableReference PostEventValue: VariableName=[Berry].MeanTempInitiation.Value()
        OnEventFunction MeanCHOInitiationY0: SetEvent=Veraison; ReSetEvent=StartFlowering
          Constant PreEventValue: FixedValue=1
          VariableReference PostEventValue: VariableName=[Berry].MeanCHOInitiation.value()
        OnEventFunction BunchesPerShoot: SetEvent=BudBurst; ReSetEvent=EndDormancy
          Memo
            here we use a trigger function for bunches per shoot as the value of mean flowering temperature Y0 is updating itself during the growing season, which would cause inconvience if we directly correlates the bunches per shoot and mean flowering temperature Y0.

            Numbers were guessed based on Eltom 2013 Fig. 7.7. y=0.0981*Ta + 0.35

             Bunches per shoot is affected by the temperature and CHO during initiation, it is further affected by the CHO during bud burst. The later decided whether the potential initiated inflorescence can grow out successfully or been realized.

            For simiplicity, right now, the CHO effect during bud burst is expressed as a function of number of buds retained.
          Constant PreEventValue: FixedValue=1.7
          MultiplyFunction PostEventValue
            Constant meanBunchesPerShoot: FixedValue=1.7
            LinearInterpolationFunction TempInitiation: XProperty=[Berry].MeanTempInitiationY0.Value()
              XYPairs: X=[0, 10, 14, 15, 17, 20, 40]; Y=[0, 0.76, 1, 1.0588, 1.176, 1.35, 1.4]
            LinearInterpolationFunction CHOInitiation: XProperty=[Berry].MeanCHOInitiationY0.Value()
              XYPairs: X=[0, 1, 2]; Y=[1, 1, 1]
            LinearInterpolationFunction RetainedBudNum: XProperty=[Structure].PrimaryBudNo
              XYPairs: X=[0, 20, 40, 108]; Y=[1, 1, 0.85, 0.65]
            LinearInterpolationFunction CaneDiameter: XProperty=[Cordon].CaneDiameter.Value()
              XYPairs: X=[0, 20]; Y=[1, 1]
        MultiplyFunction FlowersPerBunch
          Memo
            Numbers were guessed based on Eltom 2013 Fig. 6.3. However, this is based on the mean daily temperature from 12 days pre-budbreak. the model only work forward, and can not know the budburst date before it actually happens. Furthermore, for the moment, it always require to calculate from certain phenological stage instead of actual date.

            Flowers per bunch is affected by the temperature and CHO during initiation, which affects the number of primary branches, temperature and CHO during bud burst, which affect the secondary braches and flower initiation,
          Constant meanFlowersPerBunch: FixedValue=300
          LinearInterpolationFunction TempInitiation: XProperty=[Berry].MeanTempInitiationY0.Value()
            XYPairs: X=[0, 10, 14, 15, 17, 20, 40]; Y=[0, 0.76, 1, 1.0588, 1.176, 1.35, 1.4]
          LinearInterpolationFunction TempBudBurst: XProperty=[Berry].MeanTempBudBurst.Value()
            XYPairs: X=[8, 10, 11, 11.6, 12.2, 14]; Y=[1.5, 1.5, 1.3, 1, 0.7, 0.7]
          LinearInterpolationFunction CHOInitiation: XProperty=[Berry].MeanCHOInitiationY0.Value()
            XYPairs: X=[0, 1]; Y=[1, 1]
          LinearInterpolationFunction CHOBudBurst: XProperty=[Berry].MeanCHOBudBurst.Value()
            XYPairs: X=[0, 1]; Y=[1, 1]
        MultiplyFunction BerriesPerBunch
          Memo
            Percentage of fruit set were guessed based on mean daily temperature during anthesis (Eltom 2013 Fig. 6.5, y = 0.5*x-8 (wrong equation)). temperature range is 15.5 to 16.2 degree.

            The minimum function was try to cap the maximum berry number and the predicted yield. Due to the size of the peducle or bunch frame, it was not able to sustain lots of berries at harvest even so there was more at fruit set.
          VariableReference FlowersPerBunch: VariableName=[Berry].FlowersPerBunch.Value()
          LinearInterpolationFunction TempFlowering: XProperty=[Berry].MeanTempFlowering.Value()
            XYPairs: X=[14, 15.5, 15.8, 16, 16.2, 20]; Y=[0.14, 0.15, 0.3, 0.42, 0.5, 0.55]
          LinearInterpolationFunction CHOFlowering: XProperty=[Berry].MeanCHOFlowering.Value()
            XYPairs: X=[0, 1]; Y=[1, 1]
          LinearInterpolationFunction FlowerNum: XProperty=[Berry].FlowersPerBunch.Value()
            XYPairs: X=[200, 300, 400]; Y=[1, 0.9, 0.8]
        MultiplyFunction NumberFunction
          VariableReference Shoots: VariableName=[Structure].MainStemPopn
          VariableReference BunchesPerShoot: VariableName=[Berry].BunchesPerShoot.Value()
          VariableReference BerriesPerBunch: VariableName=[Berry].BerriesPerBunch.Value()
        MultiplyFunction PotentialBerrySizeAdj
          Memo
            Temperature or rainful during flowering to fruitset would affect the pollination. a good pollination will result in a high fertility and large seed. the size of the seeds would affect the potential size of the berry. See Adam Friend's thesis.

            Pollination alone results in the development of small, hard green berries (live green ovaries or LGO). Further development requires fertilization of grape ovaries and subsequent seed development (Friend et al. 2009). Should ovules not fully develop, leaving seed traces,  the berries will ripen, but remain small, while successful fertilization of one or more ovule will result in complete berry development, with the berry mass generally reflecting seed mass. The success of fertilization depends on the pollen viability and environmental factors such as temperature, carbohydrate availability and vine nutrition.

            (Ojeda et al. 2001) analysed the effects of water deficits after anthesis on pericarp cell division and enlargement of cv. Syrah berries. They found water deficits after anthesis did not affect cell division, but mainly limiting cell expansion. These results support the hypothesis that early water deficits modify the structural properties of the cell components and consequently cell wall extensibility, thereby limiting the subsequent enlargement of pericarp cells even with good water status after véraison. (Korkutal et al. 2011) shown water deficit with predawn water potential smaller than -0.6 MPa starting from 17 E-L stage did not affect the pollen viability and pollen germination ratios, but reduced berry set ratio, and delayed berry development.
          LinearInterpolationFunction TempFlowering: XProperty=[Berry].MeanTempFlowering.Value()
            XYPairs: X=[14, 15.6, 15.8, 16, 16.2, 20, 30]; Y=[0.8, 0.95, 1, 1.05, 1.1, 1.2, 1.3]
          LinearInterpolationFunction WaterFlowering: XProperty=[Grapevine].Leaf.Fw
            XYPairs: X=[0, 1]; Y=[0, 1]
        MultiplyFunction BerryFreshWeight
          BerryFillingRateFunction BerryFillingRate: FirstPhase=BerryDevelopment; SecondPhase=LeafDeathPhase; Wo1=0.0001; Wf1=1; Mu1=0.07; Wo2=0.0001; Wf2=2; Mu2=0.1
            VariableReference TT: VariableName=[Structure].ThermalTime.Value()
          VariableReference BerryNumber: VariableName=[Berry].NumberFunction.Value()
          VariableReference potentialBerrySizeAdj: VariableName=[Berry].PotentialBerrySizeAdj.Value()
        MultiplyFunction DMDemandFunction
          BerryFillingRateFunction BerryFillingRate: FirstPhase=BerryDevelopment; SecondPhase=LeafDeathPhase; Wo1=0.0001; Wf1=0.15; Mu1=0.007; Wo2=0.0001; Wf2=0.3; Mu2=0.011
            VariableReference TT: VariableName=[Structure].ThermalTime.Value()
          VariableReference BerryNumber: VariableName=[Berry].NumberFunction.Value()
          VariableReference potentialBerrySizeAdj: VariableName=[Berry].PotentialBerrySizeAdj.Value()
        AccumulateFunction ThermalTimeAfterVeraison: StartStageName=Veraison; EndStageName=LeafFall; ResetStageName=Veraison; FractionRemovedOnCut=0; FractionRemovedOnHarvest=0; FractionRemovedOnGraze=0; FractionRemovedOnPrune=0
          VariableReference ThermalTime: VariableName=[Phenology].ThermalTime.Value()
        AccumulateFunction ThermalTimeAfterFlowering: StartStageName=FruitSet; EndStageName=LeafFall; ResetStageName=FruitSet; FractionRemovedOnCut=0; FractionRemovedOnHarvest=0; FractionRemovedOnGraze=0; FractionRemovedOnPrune=0
          VariableReference ThermalTime: VariableName=[Phenology].ThermalTime.Value()
        ExponentialFunction SolubleSolidsConc: A=24; B=-15.6582; C=-0.040501
          VariableReference ThermalTime: VariableName=[Berry].DaysAfterVeraison.Value()
        LinearInterpolationFunction ReadyForHarvest: XProperty=[Berry].ThermalTimeAfterVeraison.Value()
          XYPairs: X=[0, 200, 201]; Y=[0, 0, 1]
        Constant MaxNConcDailyGrowth: FixedValue=0.01; Units=g/g
        Constant NFillingRate: FixedValue=0
        Constant MinimumNConc: FixedValue=0
        Constant MaximumNConc: FixedValue=0.0001
        BiomassRemoval BiomassRemovalDefaults
          OrganBiomassRemovalType Harvest: FractionLiveToRemove=1; FractionDeadToRemove=0; FractionLiveToResidue=0; FractionDeadToResidue=0
          OrganBiomassRemovalType Cut: FractionLiveToRemove=1; FractionDeadToRemove=0; FractionLiveToResidue=0; FractionDeadToResidue=0
          OrganBiomassRemovalType Prune: FractionLiveToRemove=0; FractionDeadToRemove=0; FractionLiveToResidue=1; FractionDeadToResidue=0
          OrganBiomassRemovalType Graze: FractionLiveToRemove=0; FractionDeadToRemove=0; FractionLiveToResidue=0; FractionDeadToResidue=0
          OrganBiomassRemovalType Thin: FractionLiveToRemove=0; FractionDeadToRemove=0; FractionLiveToResidue=0; FractionDeadToResidue=0
        Constant MaximumPotentialGrainSize: FixedValue=2.5; Units=g fresh or dry
        SubtractFunction WaterContent
          Constant: FixedValue=0.903
          PhaseLookupValue: Start=Veraison; End=LeafFall
            LinearInterpolationFunction: XProperty=[Berry].ThermalTimeAfterVeraison.Value()
              XYPairs: X=[0, 100, 200, 300, 400, 600]; Y=[0, 0.01, 0.02, 0.04, 0.15, 0.15]
        Constant DMConversionEfficiency: FixedValue=1
        Constant RemobilisationCost: FixedValue=0
        Constant CarbonConcentration: FixedValue=0.4
        Live Biomass
        Dead Biomass
      Root: GrowthRespiration=0; MaintenanceRespiration=0
        PhaseBasedSwitch NitrogenDemandSwitch: Start=BudBurst; End=LeafFall
        Constant MinimumNConc: FixedValue=0.01; Units=g/g
        Constant MaximumNConc: FixedValue=0.01; Units=g/g
        Constant MaximumRootDepth: FixedValue=1000000; Units=mm
        LinearInterpolationFunction KLModifier: XProperty=[Leaf].LAI
          XYPairs: X=[0, 3]; Y=[1, 1]
        LinearInterpolationFunction SenescenceRate: XProperty=[Leaf].FractionDied
          XYPairs: X=[0, 1]; Y=[0, 0.1]
        BiomassRemoval BiomassRemovalDefaults: same as Replacements.Grapevine.Cordon.BiomassRemovalDefaults
        LinearInterpolationFunction NUptakeSWFactor: XProperty=[Root].RWC
          XYPairs: X=[0, 1]; Y=[0, 1]
        Constant InitialDM: FixedValue=2500; Units=g/plant
        Constant SpecificRootLength: FixedValue=40; Units=m/g
        Constant RootFrontVelocity: FixedValue=10; Units=mm/d
        Constant KNO3: FixedValue=0.02
        Constant KNH4: FixedValue=0.003
        Constant MaxDailyNUptake: FixedValue=6
        PartitionFractionDemandFunction DMDemandFunction
          Constant PartitionFraction: FixedValue=0.35
        Constant DMConversionEfficiency: FixedValue=1
        Constant MaintenanceRespirationFunction: FixedValue=2
        Constant RemobilisationCost: FixedValue=0
        Constant CarbonConcentration: FixedValue=0.4
      OrganArbitrator Arbitrator
        RelativeAllocation NArbitrator
        RelativeAllocation DMArbitrator
    Report: EventNames=[Clock].DoReport
      VariableNames:
        [Clock].Today
        [Clock].Today.Year
        [Clock].Today.DayOfYear
        [Grapevine].Phenology.CurrentSeason.Value()
        [Grapevine].Phenology.Stage
        [Grapevine].Phenology.AccumulatedEmergedTT
        [Grapevine].Phenology.BudBurstDOY.Value()
        [Grapevine].Phenology.FloweringDOY.Value()
        [Grapevine].Phenology.VeraisonDOY.Value()
        [Grapevine].Phenology.CurrentStageName
        [Grapevine].Phenology.Budding.AccChill.Value()
        [Grapevine].Phenology.Budding.FractionOfBudBurst.Value()
        [Grapevine].Structure.PrimaryBudNo
        [Grapevine].Structure.MainStemPopn
        [Grapevine].Structure.LeafTipsAppeared
        [Grapevine].Leaf.LAI
        [Grapevine].Leaf.InitialisedCohortNo
        [Grapevine].Leaf.DeadCohortNo
        [Grapevine].Leaf.AppearedCohortNo
        [Grapevine].Leaf.CohortSize
        [Grapevine].Leaf.Fn
        [Grapevine].Leaf.Fw
        [Grapevine].Shoot.Wt
        [Grapevine].Root.Live.Wt
        [Grapevine].Arbitrator.FDM
        [Berry].Live.Wt
        [Berry].BerryFreshWeight.Value()
        [Berry].MeanTempInitiationY0.Value()
        [Berry].MeanTempFlowering.Value()
        [Berry].BunchesPerShoot.Value()
        [Berry].FlowersPerBunch.Value()
        [Berry].BerriesPerBunch.Value()
        [Berry].NumberFunction.Value()
        [Berry].NumberFunction.Shoots.Value()
    Manager Pruning
      PruneDateString = 1-May
```csharp
using System;
using System.Collections.Generic;
using Models.Core;
using Models.PMF;
using Models.PMF.Interfaces;
using System.Xml.Serialization;

namespace Models
{
    [Serializable] 
    [System.Xml.Serialization.XmlInclude(typeof(Model))]
    public class Script : Model
    {
        [Link] Plant Grapevine;
        [Link] Clock Clock;

        [Description("Prune Date")]
        public string PruneDateString { get; set; }
        [XmlIgnore] private DateTime PruneDate { get; set; }
        [XmlIgnore] private RemovalFractions Remove { get; set; }
        
        [EventSubscribe("Commencing")]
        private void OnSimulationCommencing(object sender, EventArgs e)
        {
            Remove = new RemovalFractions();
        }
        
        [EventSubscribe("DoManagement")]
        private void OnDoManagement(object sender, EventArgs e)
        {
            //Set up  array of remove fractions to send with Cut method.  Each member in the array corresponds to an organ in the same order they are set up in.
            PruneDate = DateTime.Parse(PruneDateString);
                        
            if (PruneDate.Month == Clock.Today.Month && PruneDate.Day == Clock.Today.Day)
            {
                Remove.SetPhenologyStage = 1;
                Grapevine.RemoveBiomass("Prune", Remove);
            }
        }
    }
}
```
    Operations
      2005-01-01  [Grapevine].Sow(population: 0.231481, cultivar: "SauvignonBlanc", depth: 150, rowSpacing: 2400, budNumber:24);
  DataStore
    ExcelInput PhenoObs: FileName=Observations\Marlborough_Sauvignon_blanc_PhenologyObs.xlsx; SheetNames=[Data]
    PredictedObserved PhenoPredObs: PredictedTableName=Report; ObservedTableName=Data; FieldNameUsedForMatch=Grapevine.Phenology.CurrentSeason.Value(); FieldName2UsedForMatch=Grapevine.Phenology.CurrentStageName
      Tests: POName=PhenoPredObs
        AcceptedStats:
          {Name=Grapevine.Phenology.BudBurstDOY.Value(), n=28, Slope=0.894701, Intercept=24.3971, SEslope=0.184787, SEintercept=51.6024, R2=0.474142, RMSE=7.90569, NSE=-0.49815, ME=-5, MAE=6.42857, RSR=1.20193}
          {Name=Grapevine.Phenology.FloweringDOY.Value(), n=28, Slope=0.721061, Intercept=83.4064, SEslope=0.118227, SEintercept=40.9894, R2=0.58859, RMSE=13.931, NSE=-3.87604, ME=-13.2857, MAE=13.2857, RSR=2.16839}
          {Name=Grapevine.Phenology.VeraisonDOY.Value(), n=28, Slope=0.534054, Intercept=-12.9508, SEslope=0.125269, SEintercept=6.00932, R2=0.411437, RMSE=35.5488, NSE=-19.4047, ME=-35, MAE=35, RSR=4.43576}
        AcceptedStatsName=Name n Slope Intercept SEslope SEintercept R2 RMSE NSE ME MAE RSR
  Simulation BaseSim
    Zone Vineyard: Area=1; Slope=0
      Memo
        Double Guyôt-trained vines, pruned each year to retain 24 nodes were monitored. Vines were trained using vertical shoot positioning (VSP), with an exposed leaf area height of 1.2 m, and trimmed to maintain a compact canopy. Vines were planted 1.8 m apart within the row, and 2.4 m apart between rows. Average flowering date was determined by monitoring all the inflorescences on one cane on a vine in each plot on a regular basis throughout flowering. Likewise, regular berry samples (at least weekly) were taken from before the date of véraison until harvest at a soluble solids concentration value of 21.5 oBrix.
      Soil: SoilType=Sedementary; LocalName=Lincoln; Latitude=0; Longitude=0
        Water
          Thickness  BD   AirDry  LL15  DUL   SAT
          100        1.2  0.08    0.16  0.33  0.5
          200        1.2  0.16    0.16  0.33  0.5
          300        1.2  0.15    0.15  0.31  0.44
          300        1.2  0.13    0.13  0.27  0.46
          300        1.2  0.15    0.15  0.3   0.44
          300        1.2  0.15    0.15  0.3   0.44
          SoilCrop GrapevineSoil: LL=[0.13, 0.13, 0.1, 0.15, 0.3, 0.3]; KL=[0.1, 0.06, 0.04, 0.01, 0, 0]; XF=[1, 1, 1, 1, 0, 0]
        SoilWater: SummerDate=1-Nov; SummerU=9; SummerCona=4.4; WinterDate=1-Apr; WinterU=9; WinterCona=4.4; DiffusConst=88; DiffusSlope=35.4; Salb=0.18; CN2Bare=0; CNRed=-9E-05; CNCov=0; slope=0; discharge_width=0; catchment_area=0; max_pond=0; residueinterception=0
          Thickness  SWCON  KLAT
          100        0.55   0
          200        0.55   0
          300        0.55   0
          300        0.55   0
          300        0.55   0
          300        0.55   0
        SoilNitrogen: fom_type=[default, manure, mucuna, lablab, shemp, stable]; fract_carb=[0.2, 0.3, 0.54, 0.57, 0.45, 0]; fract_cell=[0.7, 0.3, 0.37, 0.37, 0.47, 0.1]; fract_lign=[0.1, 0.4, 0.09, 0.06, 0.08, 0.9]
        SoilOrganicMatter: RootCN=30; RootWt=3000; SoilCN=11.5; EnrACoeff=7.4; EnrBCoeff=0.2; OCUnits=Total
          Thickness  OC    FBiom  FInert
          100        3.5   0.025  0.3
          200        2.5   0.025  0.4
          300        1.2   0.015  0.75
          300        1.03  0.01   0.9
          300        0.47  0.01   0.96
          300        0.47  0.01   0.96
        Analysis: Thickness=[100, 200, 300, 300, 300, 300]; PH=[6.6, 6.2, 5.7, 5.5, 5.5, 5.5]; PHUnits=Water; BoronUnits=HotWater
        InitialWater Initial water: PercentMethod=FilledFromTop; FractionFull=1
        Sample: NO3Units=kgha; NH4Units=kgha; SWUnits=Volumetric; OCUnits=Total; PHUnits=Water
          Thickness  NO3   NH4
          100        40    0.1
          200        30    0.1
          300        14    0.1
          300        14    0.1
          300        1.38  0.1
          300        1.38  0.1
        CERESSoilTemperature
      SurfaceOrganicMatter: PondActive=no; ReportAdditions=no; ReportRemovals=no; PoolName=Grapevine; type=Grapevine; mass=2000; standing_fraction=0; cnr=80; CriticalResidueWeight=2000; OptimumDecompTemp=20; MaxCumulativeEOS=20; CNRatioDecompCoeff=0.277; CNRatioDecompThreshold=25; TotalLeachRain=25; MinRainToLeach=10; CriticalMinimumOrganicC=0.004; DefaultCPRatio=0; DefaultStandingFraction=0; StandingExtinctCoeff=0.5; FractionFaecesAdded=0.5
        Pools:
          {PoolName=Grapevine, ResidueType=Grapevine, Mass=2000, CNRatio=80, StandingFraction=0}
        ResidueTypes: LoadFromResource=ResidueTypes
        TillageTypes TillageTypesList
      MicroClimate: a_interception=0; b_interception=1; c_interception=0; d_interception=0; soil_albedo=0.23; sun_angle=15; soil_heat_flux_fraction=0.4; night_interception_fraction=0.5; refheight=2; albedo=0.15; emissivity=0.96; RadIntTotal=0
      Irrigation
      Fertiliser
      Plant Grapevine: CropType=Grapevine
      Operations
        2005-01-01  [Grapevine].Sow(population: 0.231481, cultivar: "SauvignonBlanc", depth: 1500, rowSpacing: 2400, budNumber:24);
      Report: EventNames=[Clock].DoReport
      Manager Pruning
        PruneDateString = 1-March
        script: same as in Replacements.Pruning
      SoluteManager
    Weather: FileName=Blenheim.met
    Clock: StartDate=2005-01-01; EndDate=2008-10-31
    Summary
    SoilArbitrator Soil Arbitrator
  Experiment PhenoTest
    Factors
      Factor Climate
        Specifications=[Weather].FileName = Site1001_BRA.met,Site1002_OYB.met,Site1003_SEA.met,Site1004_RPC.met
    Simulation PhenologyBase
      Weather: FileName=Site1001_BRA.met
      Clock: StartDate=2005-01-01; EndDate=2012-09-29
      Summary
      SoilArbitrator Soil Arbitrator
      Zone Vineyard: Area=1; Slope=0
        Memo: same as BaseSim.Vineyard.Memo
        Soil: same as BaseSim.Vineyard.Soil
        SurfaceOrganicMatter: same as BaseSim.Vineyard.SurfaceOrganicMatter
        MicroClimate: a_interception=0; b_interception=1; c_interception=0; d_interception=0; soil_albedo=0.23; sun_angle=15; soil_heat_flux_fraction=0.4; night_interception_fraction=0.5; refheight=2; albedo=0.15; emissivity=0.96; RadIntTotal=0
        Irrigation
        Fertiliser
        Plant Grapevine: CropType=Grapevine
        Operations
          2005-01-01  [Grapevine].Sow(population: 0.231481, cultivar: "SauvignonBlanc", depth: 150, rowSpacing: 2400, budNumber:24);
        Report: EventNames=[Clock].DoReport
        Manager Pruning: same as BaseSim.Vineyard.Pruning
        SoluteManager
  Experiment ParameterOptimize
    Factors
      Factor EndoDormancy: Specifications=[ParameterTest].Script.EndoTarget = 13
      Factor BudBurst: Specifications=[ParameterTest].Script.BudBurstBase = 140,150
    Simulation OptimizationBase
      Weather: FileName=Site1004_RPC.met
      Clock: StartDate=2005-01-01; EndDate=2012-09-29
      Summary
      SoilArbitrator Soil Arbitrator
      Zone Vineyard: Area=1; Slope=0
        Soil: SoilType=Sedementary; LocalName=Lincoln; Latitude=0; Longitude=0
          Water
            Thickness  BD   AirDry  LL15  DUL   SAT
            100        1.2  0.08    0.16  0.33  0.5
            200        1.2  0.16    0.16  0.33  0.5
            300        1.2  0.15    0.15  0.31  0.44
            300        1.2  0.13    0.13  0.27  0.46
            300        1.2  0.15    0.15  0.3   0.44
            300        1.2  0.15    0.15  0.3   0.44
            SoilCrop GrapevineSoil: LL=[0.13, 0.23, 0.16, 0.15, 0.3, 0.3]; KL=[0.1, 0.06, 0.04, 0.01, 0, 0]; XF=[1, 1, 1, 1, 0, 0]
          SoilWater: same as BaseSim.Vineyard.Soil.SoilWater
          SoilNitrogen: fom_type=[default, manure, mucuna, lablab, shemp, stable]; fract_carb=[0.2, 0.3, 0.54, 0.57, 0.45, 0]; fract_cell=[0.7, 0.3, 0.37, 0.37, 0.47, 0.1]; fract_lign=[0.1, 0.4, 0.09, 0.06, 0.08, 0.9]
          SoilOrganicMatter: same as BaseSim.Vineyard.Soil.SoilOrganicMatter
          Analysis: Thickness=[100, 200, 300, 300, 300, 300]; PH=[6.6, 6.2, 5.7, 5.5, 5.5, 5.5]; PHUnits=Water; BoronUnits=HotWater
          InitialWater Initial water: PercentMethod=FilledFromTop; FractionFull=1
          Sample: NO3Units=kgha; NH4Units=kgha; SWUnits=Volumetric; OCUnits=Total; PHUnits=Water
            Thickness  NO3   NH4
            100        40    0.1
            200        30    0.1
            300        14    0.1
            300        14    0.1
            300        1.38  0.1
            300        1.38  0.1
          CERESSoilTemperature
        SurfaceOrganicMatter: same as BaseSim.Vineyard.SurfaceOrganicMatter
        MicroClimate: a_interception=0; b_interception=1; c_interception=0; d_interception=0; soil_albedo=0.23; sun_angle=15; soil_heat_flux_fraction=0.4; night_interception_fraction=0.5; refheight=2; albedo=0.15; emissivity=0.96; RadIntTotal=0
        Irrigation
        Fertiliser
        Plant Grapevine: CropType=Grapevine
        Operations
          2005-05-13  [Grapevine].Sow(population: 0.1667, cultivar: "SauvignonBlanc", depth: 50, rowSpacing: 3100, budNumber:24);
        Report: EventNames=[Clock].DoReport
        Manager Pruning: same as BaseSim.Vineyard.Pruning
        SoluteManager
        Manager ParameterTest
          BudBurstBase = 0
          EndoTarget = 0
```csharp
using System;
using System.Collections.Generic;
using Models.Core;
using Models.PMF;
using Models.PMF.Interfaces;
using System.Xml.Serialization;

namespace Models
{
    [Serializable] 
    [System.Xml.Serialization.XmlInclude(typeof(Model))]
    public class Script : Model
    {
    	[Link] Zone zone;
        [Link] Summary Summary;

		[Description("BudBurstBase")]
        public double BudBurstBase  {get; set;}
        [Description("EndoTarget")]
        public double EndoTarget  {get; set;}

                
        [EventSubscribe("PlantSowing")]
        private void OnPlantSowing(object sender, EventArgs e)
        {
        	zone.Set("Grapevine.Phenology.Budding.Target.Base.FixedValue", BudBurstBase);
			zone.Set("Grapevine.Phenology.EndoDormancy.Target.FixedValue", EndoTarget);           
        }
    }
}
```
  Simulation InterrowCompetition
    Memo: same as BaseSim.Vineyard.Memo
    Weather: FileName=Blenheim.met
    Clock: StartDate=2005-01-01; EndDate=2012-09-29
    Summary
    SoilArbitrator Soil Arbitrator
    RectangularZone TreeRow: Area=0.001; Slope=0; Length=20; Width=0.5
      Soil: SoilType=Sedementary; LocalName=Lincoln; Latitude=0; Longitude=0
        Water
          Thickness  BD   AirDry  LL15  DUL   SAT
          100        1.2  0.08    0.16  0.33  0.5
          200        1.2  0.16    0.16  0.33  0.5
          300        1.2  0.15    0.15  0.31  0.44
          300        1.2  0.13    0.13  0.27  0.46
          300        1.2  0.15    0.15  0.3   0.44
          300        1.2  0.15    0.15  0.3   0.44
          SoilCrop GrapevineSoil: LL=[0.13, 0.13, 0.15, 0.15, 0.15, 0.15]; KL=[0.1, 0.1, 0.1, 0.1, 0.06, 0.05]; XF=[1, 1, 1, 1, 1, 1]
        SoilWater: same as BaseSim.Vineyard.Soil.SoilWater
        SoilNitrogen: fom_type=[default, manure, mucuna, lablab, shemp, stable]; fract_carb=[0.2, 0.3, 0.54, 0.57, 0.45, 0]; fract_cell=[0.7, 0.3, 0.37, 0.37, 0.47, 0.1]; fract_lign=[0.1, 0.4, 0.09, 0.06, 0.08, 0.9]
        SoilOrganicMatter: same as BaseSim.Vineyard.Soil.SoilOrganicMatter
        Analysis: Thickness=[100, 200, 300, 300, 300, 300]; PH=[6.6, 6.2, 5.7, 5.5, 5.5, 5.5]; PHUnits=Water; BoronUnits=HotWater
        InitialWater Initial water: PercentMethod=FilledFromTop; FractionFull=1; RelativeTo=GrapevineSoil
        Sample: NO3Units=kgha; NH4Units=kgha; SWUnits=Volumetric; OCUnits=Total; PHUnits=Water
          Thickness  NO3   NH4
          100        40    0.1
          200        30    0.1
          300        14    0.1
          300        14    0.1
          300        1.38  0.1
          300        1.38  0.1
        CERESSoilTemperature
      MicroClimate: a_interception=0.2; b_interception=1; c_interception=0; d_interception=0; soil_albedo=0.23; sun_angle=15; soil_heat_flux_fraction=0.4; night_interception_fraction=0.5; refheight=2; albedo=0.15; emissivity=0.96; RadIntTotal=0
      Fertiliser
      SurfaceOrganicMatter: PoolName=wheat_stubble; type=wheat; mass=500; standing_fraction=0; cnr=100; CriticalResidueWeight=2000; OptimumDecompTemp=20; MaxCumulativeEOS=20; CNRatioDecompCoeff=0.277; CNRatioDecompThreshold=25; TotalLeachRain=25; MinRainToLeach=10; CriticalMinimumOrganicC=0.004; DefaultCPRatio=0; DefaultStandingFraction=0; StandingExtinctCoeff=0.5; FractionFaecesAdded=0.5
        Pools:
          {PoolName=wheat_stubble, ResidueType=wheat, Mass=500, CNRatio=100, StandingFraction=0}
        ResidueTypes: LoadFromResource=ResidueTypes
      Manager SetupRootZones
```csharp
using System;
using Models.Core;
using System.Collections.Generic;
using System.Text;
using Models.PMF;
using Models;
using System.Xml.Serialization;
using APSIM.Shared.Utilities;

namespace Models
{
    [Serializable] 
    public class Script : Model
    {
        [Link] Plant Grapevine;
        [Link] Clock Clock;
        [Link] Zone zone;
        
        [EventSubscribe("Commencing")]
        private void OnSimulationCommencing(object sender, EventArgs e)
        {
            
            Grapevine.Root.ZoneNamesToGrowRootsIn.Add("Interrow");
            Grapevine.Root.ZoneRootDepths.Add(1500);   
            Grapevine.Root.ZoneInitialDM.Add(2000);  //g per plant

        }
    }
}
```
      SoluteManager
      Plant Grapevine: CropType=Grapevine
      Operations
        2005-01-01  [Grapevine].Sow(population: 0.231481, cultivar: "SauvignonBlanc", depth: 150, rowSpacing: 2400, budNumber:24);
      Manager Pruning: same as BaseSim.Vineyard.Pruning
      Report
      Report Report1: EventNames=[Clock].DoReport
        VariableNames:
          [Clock].Today
          [Clock].Today.Year
          [Clock].Today.DayOfYear
          [Grapevine].Root.Zones[1].LayerLive[1].Wt
          [Grapevine].Root.Zones[1].LayerLive[2].Wt
          [Grapevine].Root.Zones[1].LayerLive[3].Wt
          [Grapevine].Root.Zones[1].LayerLive[4].Wt
          [Grapevine].Root.Zones[1].LayerLive[5].Wt
          [Grapevine].Root.Zones[1].LayerLive[6].Wt
          [Grapevine].Root.Zones[2].LayerLive[1].Wt
          [Grapevine].Root.Zones[2].LayerLive[2].Wt
          [Grapevine].Root.Zones[2].LayerLive[3].Wt
          [Grapevine].Root.Zones[2].LayerLive[4].Wt
          [Grapevine].Root.Zones[2].LayerLive[5].Wt
          [Grapevine].Root.Zones[2].LayerLive[6].Wt
          [Soil].SoilWater.SWmm
          [Root].Zones[1].Uptake
          [Root].Zones[2].Uptake
    RectangularZone Interrow: Area=0.0038; Slope=0; Length=20; Width=1.9
      Fertiliser
      SurfaceOrganicMatter: same as InterrowCompetition.TreeRow.SurfaceOrganicMatter
      SoluteManager
      Soil: SoilType=Sedementary; LocalName=Lincoln; Latitude=0; Longitude=0
        Water
          Thickness  BD   AirDry  LL15  DUL   SAT
          100        1.2  0.08    0.16  0.33  0.5
          200        1.2  0.16    0.16  0.33  0.5
          300        1.2  0.15    0.15  0.31  0.44
          300        1.2  0.13    0.13  0.27  0.46
          300        1.2  0.15    0.15  0.3   0.44
          300        1.2  0.15    0.15  0.3   0.44
          SoilCrop GrapevineSoil: LL=[0.13, 0.13, 0.1, 0.15, 0.3, 0.3]; KL=[0.02, 0.02, 0.02, 0.02, 0.01, 0.01]; XF=[1, 1, 1, 1, 1, 1]
          SoilCrop SlurpSoil: LL=[0.13, 0.13, 0.1, 0.08, 0.11, 0.11]; KL=[0.01, 0.01, 0.002, 0, 0, 0]; XF=[1, 1, 1, 0, 0, 0]
        SoilWater: same as BaseSim.Vineyard.Soil.SoilWater
        SoilNitrogen: fom_type=[default, manure, mucuna, lablab, shemp, stable]; fract_carb=[0.2, 0.3, 0.54, 0.57, 0.45, 0]; fract_cell=[0.7, 0.3, 0.37, 0.37, 0.47, 0.1]; fract_lign=[0.1, 0.4, 0.09, 0.06, 0.08, 0.9]
        SoilOrganicMatter: same as BaseSim.Vineyard.Soil.SoilOrganicMatter
        Analysis: Thickness=[100, 200, 300, 300, 300, 300]; PH=[6.6, 6.2, 5.7, 5.5, 5.5, 5.5]; PHUnits=Water; BoronUnits=HotWater
        InitialWater Initial water: PercentMethod=EvenlyDistributed; FractionFull=0.43; RelativeTo=GrapevineSoil
        Sample: NO3Units=kgha; NH4Units=kgha; SWUnits=Volumetric; OCUnits=Total; PHUnits=Water
          Thickness  NO3   NH4
          100        40    0.1
          200        30    0.1
          300        14    0.1
          300        14    0.1
          300        1.38  0.1
          300        1.38  0.1
        CERESSoilTemperature
      Report
      Report Report1: EventNames=[Clock].DoReport
        VariableNames:
          [Clock].Today
          [Clock].Today.Year
          [Clock].Today.DayOfYear
          [Soil].SoilWater.SWmm
          [Slurp].Root.WaterUptake
          [Slurp].Root.Zones[1].Uptake
      Plant Slurp: CropType=Slurp
        Memo TitlePage
          # SLURP: the Sound of a crop using water

          This model has been built using the Plant Modelling Framework (PMF) of [brown_plant_2014] to provide a simple representation of crops.  It is usefull for water and nitrogen balance studies where the focus is on soil processes and a very simple crop is adequate.  The model does not predict crop growth, development or yields.  It simply takes up water and nitrogen.   .

          SLURP has no phenology so the behaviour of the SLURP is the same throughout its ontology (with the exception of root depth being able to increase).  SLURP consists of 2 organs:
             1. Leaf which ls represented with a Simpleleaf class and provides a Water uptake demand to the soil arbitrator.
             2. Root which extracts water and nitrogen from the soil for plant growth

          ##Inclusion in APSIM simulations
          A Slurp crop is included in a simulation the same as any other APSIM crop
           * The Slurp object needs to be dragged or copied from the Crop folder in the tool box into the field of your simulation.
           * It is then planted with a sowing rule
          <pre><code class='language-cs'>
          Slurp.Sow(cultivar: StaticCrop, population: 1, depth: 10, rowSpacing: 150);
          </code></pre>
            * Note that SLURP has no notion of population or rowSpacing but these parameters are required by the Sow method so filler values are provided
            * depth in the Sow arguement is the depth that the crop is sown at.  While this has no effect on emergence in SLURP it sets the depth that the root system is initialised at.  For static crops this depth should be set to the rooting depth that is expected as roots will not grow during the simulation

          ##Altering Slurp properties during runs
          In some cases users will wish to change properties of Slurp while the simulation is running.  This can be done using a the set method in a manager script.

          <pre><code class='language-cs'>
          object LAIResetValue = leaflai;
          zone.Set("Slurp.Leaf.LAIFunction.FixedValue", LAIResetValue);
          object HeightResetValue = CoverToday * MaximumHeight;
          zone.Set("Slurp.Leaf.HeightFunction.FixedValue", HeightResetValue);
          </code></pre>
        OrganArbitrator Arbitrator
          RelativeAllocation NArbitrator
          RelativeAllocation DMArbitrator
        Root: GrowthRespiration=0; MaintenanceRespiration=0
          MultiplyFunction RootFrontVelocity
            AirTemperatureFunction TemperatureEffect
              XYPairs: X=[0, 26, 35]; Y=[1, 1, 1]
            Constant Potential: FixedValue=5; Units=mm/d
          Constant MaxDailyNUptake: FixedValue=100; Units=g/m2
          Constant MaximumRootDepth: FixedValue=1000; Units=mm
          Constant NitrogenDemandSwitch: FixedValue=1; Units=0-1
          Constant MaximumNConc: FixedValue=0.01
          Constant MinimumNConc: FixedValue=0.01
          LinearInterpolationFunction KLModifier: XProperty=[Root].LayerMidPointDepth
            XYPairs: X=[0, 400, 1500]; Y=[1, 1, 0]
            Memo Description
              This is important in SLURP as it is set for each species to represent their differences in rooting patterns between crop species
          Constant InitialDM: FixedValue=50; Units=g/plant
          Constant SenescenceRate: FixedValue=0; Units=/d
          Constant SpecificRootLength: FixedValue=40; Units=m/g
          LinearInterpolationFunction KNO3: XProperty=[Root].LengthDensity
            XYPairs: X=[0, 0.003]; Y=[0.02, 0.02]
          LinearInterpolationFunction KNH4: XProperty=[Root].LengthDensity
            XYPairs: X=[0, 0.003]; Y=[0, 0]
          BiomassRemoval BiomassRemovalDefaults: same as Replacements.Grapevine.Cordon.BiomassRemovalDefaults
          LinearInterpolationFunction NUptakeSWFactor: XProperty=[Root].RWC
            XYPairs: X=[0, 1]; Y=[1, 1]
          PartitionFractionDemandFunction DMDemandFunction
            Constant PartitionFraction: FixedValue=0.2; Units=0-1
          Constant DMConversionEfficiency: FixedValue=1
          Constant MaintenanceRespirationFunction: FixedValue=1
          Constant RemobilisationCost: FixedValue=0
          Constant CarbonConcentration: FixedValue=0.4
        SimpleLeaf Leaf: CohortsInitialised=false; Albedo=0.018; Gsmax=0.01; R50=200; MicroClimatePresent=true
          zero: TipsAtEmergence, CohortsAtInitialisation, InitialisedCohortNo, AppearedCohortNo, PlantAppearedLeafNo, LAI, Height, FRGR, PotentialEP, KDead, LAIDead
          Constant DetachmentRateFunction: FixedValue=0; Units=/d
          MultiplyFunction InitialWtFunction
            Constant InitialPlantWt: FixedValue=0; Units=g/plant
            VariableReference Population: VariableName=[Plant].Population
          Constant LaiDeadFunction: FixedValue=0; Units=m^2/m^2
          Constant Photosynthesis: FixedValue=5; Units=g/m2/d
          AirTemperatureFunction FRGRFunction
            XYPairs: X=[0, 10, 25, 40]; Y=[0, 1, 1, 0]
          PartitionFractionDemandFunction DMDemandFunction
            Constant PartitionFraction: FixedValue=1; Units=0-1
          Constant MaximumNConc: FixedValue=0.05; Units=g/g
          Constant MinimumNConc: FixedValue=0.05; Units=g/g
          Constant LAIFunction: FixedValue=1; Units=m2/m2
          Constant ExtinctionCoefficientFunction: FixedValue=0.7
          Constant StructuralFraction: FixedValue=0.5; Units=0-1
          Constant HeightFunction: FixedValue=100; Units=mm
          Constant NReallocationFactor: FixedValue=0
          Constant SenescenceRate: FixedValue=0
          BiomassRemoval BiomassRemovalDefaults: same as Replacements.Grapevine.Cordon.BiomassRemovalDefaults
          Constant MaintenanceRespirationFunction: FixedValue=0; Units=0-1
          Constant DMConversionEfficiency: FixedValue=1; Units=0-1
          Constant NRetranslocationFactor: FixedValue=0
          Constant NitrogenDemandSwitch: FixedValue=1
          Constant DMReallocationFactor: FixedValue=0
          Constant DMRetranslocationFactor: FixedValue=0
          VariableReference CriticalNConc: VariableName=[Leaf].MinimumNConc.Value()
          Constant RemobilisationCost: FixedValue=0
          Constant CarbonConcentration: FixedValue=0.4
        Cultivar StaticCrop
          Memo Description
            The static crop is the base crop and uses all the paramaters values specified above.
        Cultivar StaticTree
          Command:
            [Root].MaximumRootDepth.FixedValue = 2600
            [Leaf].ExtinctionCoefficientFunction.FixedValue = 0.65
            [Leaf].HeightFunction.FixedValue = 5000
            [Root].KLModifier.XYPairs.X = 0, 400, 500, 1000, 1500, 2000
            [Root].KLModifier.XYPairs.Y = 1, 1, 0.9, 0.6, 0.3, 0.1
          Memo Description
            The static tree is similar to the static crop but is taller, has a deeper root system and a lower extinction coefficient
        Cultivar Pasture
          Command:
            [Root].MaximumRootDepth.FixedValue = 800
            [Root].RootFrontVelocity.Potential.FixedValue = 15
            [Leaf].ExtinctionCoefficientFunction.FixedValue = 0.65
            [Root].KLModifier.XYPairs.X = 0, 200, 500, 1000
            [Root].KLModifier.XYPairs.Y = 1, 1, 0.7, 0.0
          Memo Description
            The pasture differs from the base crop because its has a RootFrontVelocity of 15 (as opposed to zero) which means the roots grow downward from sowing untill the MaximumRootDepth is reached.  It ExtinctionCoefficient and MaximumRootDepth are different to the base StaticCrop and it has a different pattern of kl with depth.
        Cultivar Lucerne
          Command:
            [Root].MaximumRootDepth.FixedValue = 2500
            [Root].RootFrontVelocity.Potential.FixedValue = 15
            [Leaf].ExtinctionCoefficientFunction.FixedValue = 0.8
            [Root].KLModifier.XYPairs.X = 0, 200, 500, 1000, 1500, 2000
            [Root].KLModifier.XYPairs.Y = 1, 1, 0.9, 0.6, 0.3, 0.1
          Memo Description
            Lucerne also grows root depth like pasture but has a greater root depth, different kl pattern and different extinction coefficient
      Manager SlurpSowingRule
        CultivarName = StaticCrop
        InitialRootDepth = 200
        SowingDate = 2005-01-01
```csharp
using System;
using Models.Core;
using Models.PMF;
using APSIM.Shared.Utilities;
        
namespace Models
{
    [Serializable] 
    [System.Xml.Serialization.XmlInclude(typeof(Model))]
    public class Script : Model
    {
        [Link] Plant Slurp;
        [Link] Clock Clock;

        [Description("Cultivar")]
        public string CultivarName { get; set; }
        [Description("Initial Root Depth")]
        public double InitialRootDepth { get; set; }
        [Description("Sowing Date")]
        public DateTime SowingDate { get; set; }

               
        [EventSubscribe("DoManagement")]
        private void OnDoManagement(object sender, EventArgs e)
        {
            if (Clock.Today.Date == SowingDate)
                Slurp.Sow(cultivar: CultivarName, population: 1, depth: InitialRootDepth, rowSpacing: 50);
            //Potato.Sow(... Contains the following arguements:
            //Population  double  Optional  Seeds sowing/m2.  Default is zero
            //Cultivar    string  Required  "NameOfCultivar"
            //Depth       double  Optional  Depth (mm) seed sown.   Default is 100mm 
            //MaxCover    double  Optional  Proportion (0-1) of the ground row crop will cover.   Default is 1.0
            //BudNumber   double  Optional  Number of mainstems per seed sown.  Default is 1.0
            //RowSpacing  double  Optional  Spaceing (mm) between drill rows when crop is sown.  Default is 150mm
            //CropClass   string  Optional  Crop class to instantiate when crop is sown.  Default is "Plant"
        }
    }
}
```
      MicroClimate: a_interception=0.2; b_interception=1; c_interception=0; d_interception=0; soil_albedo=0.23; sun_angle=15; soil_heat_flux_fraction=0.4; night_interception_fraction=0.5; refheight=2; albedo=0.15; emissivity=0.96; RadIntTotal=0
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