Simulations: Version=46
  DataStore Database
    ExcelInput ObsAllData: FileName=ObsAllData.xlsx; SheetNames=[ObsAllData]
    PredictedObserved: PredictedTableName=Report; ObservedTableName=ObsAllData; FieldNameUsedForMatch=Clock.Today; FieldName2UsedForMatch=LAI
  Replacements
    Plant Lucerne: CropType=Lucerne
      Memo Memo1
        ## References

        ### **Ayaz S, McKenzie BA, McNeil DL, Hill GD.2004**. Light interception and utilization of four grain legumes sown at different plant populations and depths. _Journal of Agricultural Science,_**142**: 297-308.
         **Ayaz S, McKenzie BA, Hill GD, McNeil DL.2004**. Variability in yield of four grain legume species in a subhumid temperate environment. II. Yield components. _Journal of Agricultural Science,_**142**: 21-28.
         **Ayaz S, McKenzie BA, Hill GD, McNeil DL.2004**. Nitrogen distribution in four grain legumes. _Journal of Agricultural Science,_**142**: 309-317.
         **Wilson DR, Robertson MJ.1996.**Pea phenology responses to temperature and photoperiod. _Australian Agronomy Society_.
      OrganArbitrator Arbitrator
        RelativeAllocation NArbitrator
        RelativeAllocation DMArbitrator
      Phenology
        AirTemperatureFunction ThermalTime
          XYPairs: X=[2, 15, 30, 40]; Y=[0, 10, 25, 0]
        PhotoperiodFunction Photoperiod: Twilight=-6; DayLength=0
        GerminatingPhase Germinating: Start=Sowing; End=Germination
        EmergingPhase Emerging: ShootLag=15; ShootRate=10; Start=Germination; End=Emergence; TTForTimeStep=0
          VariableReference ThermalTime: VariableName=[Phenology].ThermalTime.Value()
          VariableReference ThermalTime1: VariableName=[Phenology].ThermalTime.Value()
        GenericPhase Juvenile: Start=Emergence; End=EndJuvenile
          Constant Target: FixedValue=400
          VariableReference Progression: VariableName=[Phenology].ThermalTime.Value()
        GenericPhase Inductive: Start=EndJuvenile; End=FloralInitiation
          VariableReference Progression: VariableName=[Phenology].ThermalTime.Value()
          OnEventFunction Target: SetEvent=EndJuvenile
            Constant PreEventValue: FixedValue=0
            LinearInterpolationFunction PostEventValue: XProperty=[Phenology].Photoperiod.Value()
              XYPairs: X=[10, 13, 14.5, 16.5, 24]; Y=[700, 379, 295, 243, 243]
        GenericPhase Induced: Start=FloralInitiation; End=StartFlowering
          Constant Target: FixedValue=260
          VariableReference Progression: VariableName=[Phenology].ThermalTime.Value()
        GenericPhase Flowering: Start=StartFlowering; End=StartPodfill
          VariableReference Progression: VariableName=[Phenology].ThermalTime.Value()
          LinearInterpolationFunction Target: XProperty=[Phenology].Photoperiod.Value()
            XYPairs: X=[12, 12.5, 16.5]; Y=[959.6, 905.7, 474.635]
        GenericPhase Podfilling: Start=StartPodfill; End=Maturity
          Constant Target: FixedValue=1000
          VariableReference Progression: VariableName=[Phenology].ThermalTime.Value()
        GenericPhase Ripening: Start=Maturity; End=HarvestRipe
          Constant Target: FixedValue=100
          VariableReference Progression: VariableName=[Phenology].ThermalTime.Value()
        EndPhase ReadyForHarvesting: Start=HarvestRipe; End=Unused
          VariableReference ThermalTime: VariableName=[Phenology].ThermalTime.Value()
        AccumulateFunction DaysAfterCutting: StartStageName=Emergence; EndStageName=StartFlowering; FractionRemovedOnCut=1; FractionRemovedOnHarvest=1; FractionRemovedOnGraze=1; FractionRemovedOnPrune=1
          Constant: FixedValue=1
        OnEventFunction FloweringDaysAfterCutting: SetEvent=StartFlowering; ReSetEvent=1
          Constant PreEventValue: FixedValue=0
          VariableReference PostEventValue: VariableName=[Phenology].DaysAfterCutting.Value()
      Structure: CohortInitialisationStage=Germination; LeafInitialisationStage=Emergence
        VariableReference ThermalTime: VariableName=[Phenology].ThermalTime.Value()
        MultiplyFunction BranchingRate
          Memo
            Potential branching rate is determined by the commonly observed pattern of tillering in wheat, in which each tiller emerges with the third leaf on its parent axis (e.g. first tiller emerges at the same time as the third leaf on the main stem, the first secondary tiller appears with the third leaf on tiller 1).  This is described as a simple function of main stem leaf number.
          PhaseLookup PotentialBranchingRate
            PhaseLookupValue Vegetative: Start=Emergence; End=EndJuvenile
              LinearInterpolationFunction PotentialBranchingRate: XProperty=[Structure].LeafTipsAppeared
                XYPairs: X=[1, 2, 3, 4, 5, 6, 7, 8]; Y=[0, 0, 0, 0, 0, 0, 0, 0]
            PhaseLookupValue Reproductive: Start=EndJuvenile; End=Maturity
              Constant Zero: FixedValue=0
          MinimumFunction StressFactors
            LinearInterpolationFunction NitrogenEffect: XProperty=[Arbitrator].FN
              Memo
                Inadequate Nitrogen supply is assumed to affect tillering prior to any effect on photosynthesis or leaf size.
              XYPairs: X=[0.5, 2, 3]; Y=[0, 1, 1]
            LinearInterpolationFunction CoverEffect: XProperty=[Leaf].CoverTotal
              Memo
                Tillering is said to cease once a threshold fraction of incoming radiation has been achieved.  This captures shading effects on tillering described by [evers2006cessation].
              XYPairs: X=[0, 0.1, 0.25]; Y=[1, 1, 0]
            LinearInterpolationFunction WaterStressEffect: XProperty=[Root].WaterTensionFactor
              XYPairs: X=[0, 1]; Y=[0, 1]
        PhaseLookup BranchMortality
          PhaseLookupValue MortalityPhase: Start=EndJuvenile; End=StartFlowering
            MultiplyFunction Mortality
              VariableReference ThermalTime: VariableName=[Phenology].ThermalTime.Value()
              Constant MortalityPerDegDay: FixedValue=0
        HoldFunction FinalLeafNumber: WhenToHold=StartPodfill
          Constant FinalNodeNumber: FixedValue=100
        Constant StemSenescenceAge: FixedValue=0
        PhaseLookup Phyllochron
          PhaseLookupValue Juvenile: Start=Emergence; End=EndJuvenile
            Constant: FixedValue=52
          PhaseLookupValue Vegetative: Start=EndJuvenile; End=StartFlowering
            LinearInterpolationFunction Phyllochron: XProperty=[Phenology].Photoperiod.Value()
              XYPairs: X=[10.2, 12, 13, 14, 15, 16, 16.5]; Y=[51.5, 45, 41.5, 37.5, 34, 30, 28]
          PhaseLookupValue Reproductive: Start=StartFlowering; End=Maturity
            LinearInterpolationFunction Phyllochron: XProperty=[Phenology].Photoperiod.Value()
              XYPairs: X=[12, 16]; Y=[88, 70]
        AccumulateFunction HeightModel: StartStageName=Emergence; EndStageName=StartPodfill; FractionRemovedOnCut=1; FractionRemovedOnHarvest=1; FractionRemovedOnGraze=1; FractionRemovedOnPrune=1
          DivideFunction DeltaHeight
            VariableReference ThermalTime: VariableName=[Phenology].ThermalTime.Value()
            PhaseLookup Heightchron
              PhaseLookupValue Juvenile: Start=Emergence; End=EndJuvenile
                Constant: FixedValue=1.5
              PhaseLookupValue Vegetative: Start=EndJuvenile; End=StartFlowering
                LinearInterpolationFunction Heightchron: XProperty=[Phenology].Photoperiod.Value()
                  XYPairs
                    X=[10, 10.5, 11, 11.5, 12, 12.5, 13, 13.5, 14, 15, 15.5, 16, 16.5]
                    Y=[2.55, 2.234, 1.947, 1.688, 1.458, 1.256, 1.083, 0.938, 0.822, 0.675, 0.644, 0.642, 0.63775]
              PhaseLookupValue Reproductive: Start=StartFlowering; End=Maturity
                LinearInterpolationFunction Heightchron: XProperty=[Phenology].Photoperiod.Value()
                  XYPairs: X=[12, 16]; Y=[8, 1.25]
      Root: GrowthRespiration=0; MaintenanceRespiration=0
        LinearInterpolationFunction KLModifier: XProperty=[Leaf].LAI
          XYPairs: X=[0, 3]; Y=[1, 1]
        AirTemperatureFunction TemperatureEffect
          XYPairs: X=[0, 26, 35]; Y=[1, 1, 1]
        Constant MaxDailyNUptake: FixedValue=6
        Constant SenescenceRate: FixedValue=0
        Constant MaximumRootDepth: FixedValue=1000000
        PhaseLookup RootFrontVelocity
          PhaseLookupValue PreEmergence: Start=Germination; End=Emergence
            Constant Function: FixedValue=3
          PhaseLookupValue early: Start=Emergence; End=StartFlowering
            Constant Function: FixedValue=15
          PhaseLookupValue late: Start=StartFlowering; End=Maturity
            Constant Function: FixedValue=17
        Constant MaximumNConc: FixedValue=0.01
        Constant MinimumNConc: FixedValue=0.005
        PhaseBasedSwitch NitrogenDemandSwitch: Start=Emergence; End=Maturity
        LinearInterpolationFunction KNO3: XProperty=[Root].LengthDensity
          XYPairs: X=[0, 0.003]; Y=[0.02, 0.02]
        LinearInterpolationFunction KNH4: XProperty=[Root].LengthDensity
          XYPairs: X=[0, 0.003]; Y=[0, 0]
        BiomassRemoval BiomassRemovalDefaults
          OrganBiomassRemovalType Harvest: FractionLiveToRemove=0; FractionDeadToRemove=0; FractionLiveToResidue=0.3; FractionDeadToResidue=0
          OrganBiomassRemovalType Cut: FractionLiveToRemove=0.8; FractionDeadToRemove=0; FractionLiveToResidue=0; FractionDeadToResidue=0
          OrganBiomassRemovalType Prune: FractionLiveToRemove=0; FractionDeadToRemove=0; FractionLiveToResidue=0.6; FractionDeadToResidue=0
          OrganBiomassRemovalType Graze: FractionLiveToRemove=0.6; FractionDeadToRemove=0; FractionLiveToResidue=0.1; FractionDeadToResidue=0
        LinearInterpolationFunction NUptakeSWFactor: XProperty=[Root].RWC
          XYPairs: X=[0, 1]; Y=[0, 1]
        Constant InitialDM: FixedValue=0.2; Units=g/plant
        Constant SpecificRootLength: FixedValue=40; Units=m/g
        Constant DMConversionEfficiency: FixedValue=1
        Constant MaintenanceRespirationFunction: FixedValue=1
        Constant RemobilisationCost: FixedValue=0
        Constant CarbonConcentration: FixedValue=0.4
        BiomassDemand DMDemands
          MultiplyFunction Structural
            PartitionFractionDemandFunction DMDemandFunction
              PhaseLookup PartitionFraction
                PhaseLookupValue Early: Start=Emergence; End=StartFlowering
                  Constant Function: FixedValue=0.1
                PhaseLookupValue Middle: Start=StartFlowering; End=StartPodfill
                  Constant Function: FixedValue=0.08
                PhaseLookupValue Late: Start=StartPodfill; End=Maturity
                  Constant Function: FixedValue=0
            Constant StructuralFraction: FixedValue=1
          Constant Metabolic: FixedValue=0
          StorageDMDemandFunction Storage
            SubtractFunction StorageFraction
              Constant One: FixedValue=1
              VariableReference StructuralFraction: VariableName=[Root].DMDemands.Structural.StructuralFraction.Value()
        BiomassDemand NDemands
          MultiplyFunction Structural
            VariableReference MinNconc: VariableName=[Root].minimumNconc.Value()
            VariableReference PotentialDMAllocation: VariableName=[Root].potentialDMAllocation.Structural
          MultiplyFunction Metabolic
            SubtractFunction MetabolicNconc
              VariableReference CritNconc: VariableName=[Root].criticalNConc.Value()
              VariableReference MinNconc: VariableName=[Root].minimumNconc.Value()
            VariableReference PotentialDMAllocation: VariableName=[Root].potentialDMAllocation.Structural
          StorageNDemandFunction Storage
            VariableReference NitrogenDemandSwitch: VariableName=[Root].nitrogenDemandSwitch.Value()
            VariableReference MaxNconc: VariableName=[Root].maximumNconc.Value()
      Leaf: MaxCover=1; Albedo=0.25; Gsmax=0.011; R50=150; MicroClimatePresent=true; KDead=0.3; MaximumMainStemLeafNumber=30
        zero: CurrentExpandingLeaf, StartFractionExpanded, FractionNextleafExpanded, DeadNodesYesterday, GrowthRespiration, FRGR, PotentialEP, WaterDemand, TipsAtEmergence, CohortsAtInitialisation, FractionDied
        LeafCohort InitialLeaves[1]: Rank=1; Area=200
          zero: NReallocationFactor, DMReallocationFactor, NRetranslocationFactor, DMRetranslocationFactor, ShadeInducedSenRate, SenescedFrac, DeltaPotentialArea, DeltaStressConstrainedArea, DeltaCarbonConstrainedArea, PotentialStructuralDMAllocation, PotentialMetabolicDMAllocation, MetabolicNReallocated, MetabolicWtReallocated, StorageNReallocated, StorageWtReallocated, MetabolicNRetranslocated, StorageNRetrasnlocated, DMRetranslocated, MetabolicNAllocation, StructuralDMAllocation, MetabolicDMAllocation, MaintenanceRespiration
        LeafCohort InitialLeaves[2]: Rank=2
          zero: NReallocationFactor, DMReallocationFactor, NRetranslocationFactor, DMRetranslocationFactor, ShadeInducedSenRate, SenescedFrac, DeltaPotentialArea, DeltaStressConstrainedArea, DeltaCarbonConstrainedArea, PotentialStructuralDMAllocation, PotentialMetabolicDMAllocation, MetabolicNReallocated, MetabolicWtReallocated, StorageNReallocated, StorageWtReallocated, MetabolicNRetranslocated, StorageNRetrasnlocated, DMRetranslocated, MetabolicNAllocation, StructuralDMAllocation, MetabolicDMAllocation, Area, MaintenanceRespiration
        LeafCohortParameters CohortParameters: ExpansionStressValue=0
          Constant NReallocationFactor: FixedValue=1
          Constant RemobilisationCost: FixedValue=0
          Constant MaintenanceRespirationFunction: FixedValue=0
          Constant NRetranslocationFactor: FixedValue=0.03
          Constant DMReallocationFactor: FixedValue=1
          Constant DMRetranslocationFactor: FixedValue=1
          MinimumFunction CellDivisionStress
            LinearInterpolationFunction WaterStressEffect: XProperty=[Leaf].Fw
              XYPairs: X=[0.5, 1]; Y=[1, 1]
          MinimumFunction ExpansionStress
            LinearInterpolationFunction WaterStressEffect: XProperty=[Root].WaterTensionFactor
              XYPairs: X=[0.1, 1.1, 1.3]; Y=[0, 1, 1]
          MultiplyFunction MaxArea
            Constant AreaLargestLeaves: FixedValue=2600; Units=mm^2
            LinearInterpolationFunction AgeFactor: XProperty=[Phenology].Stage
              XYPairs: X=[3, 3.45, 4]; Y=[0.1, 0.5, 1]
          MultiplyFunction GrowthDuration
            Constant Multiplier: FixedValue=2
            VariableReference Phyllochron: VariableName=[Structure].Phyllochron.Value()
          LinearInterpolationFunction LagDuration: XProperty=[Leaf].Fw
            XYPairs: X=[0, 14]; Y=[3, 6]
          MultiplyFunction SenescenceDuration
            Constant Multiplier: FixedValue=1.5
            VariableReference Phyllochron: VariableName=[Structure].Phyllochron.Value()
          Constant DetachmentLagDuration: FixedValue=50
          Constant DetachmentDuration: FixedValue=50
          Constant RelativeBranchLeafSize: FixedValue=1
          LinearInterpolationFunction MaximumNConc: XProperty=[Phenology].Stage
            XYPairs: X=[3, 4, 6]; Y=[0.05, 0.05, 0.05]
          MultiplyFunction CriticalNConc
            LinearInterpolationFunction CriticalNConcAt350ppm: XProperty=[Phenology].Stage
              XYPairs: X=[3, 4, 6]; Y=[0.03, 0.03, 0.03]
            LinearInterpolationFunction CO2Factor: XProperty=[IWeather].CO2
              XYPairs: X=[350, 700]; Y=[1, 0.93]
          LinearInterpolationFunction MinimumNConc: XProperty=[Phenology].Stage
            XYPairs: X=[3, 4, 6]; Y=[0.01, 0.01, 0.01]
          AddFunction DroughtInducedLagAcceleration
            Constant One: FixedValue=1
            MultiplyFunction Stress
              Constant StressResponseCoefficient: FixedValue=1
              LinearInterpolationFunction StressFactor: XProperty=[Leaf].Fw
                XYPairs: X=[0, 1]; Y=[2, 0]
          AddFunction DroughtInducedSenAcceleration
            Constant One: FixedValue=1
            MultiplyFunction Stress
              Constant StressResponseCoefficient: FixedValue=1
              LinearInterpolationFunction StressFactor: XProperty=[Leaf].Fw
                XYPairs: X=[0, 1]; Y=[2, 0]
          LinearInterpolationFunction SpecificLeafAreaMax: XProperty=[Phenology].Stage
            XYPairs: X=[3, 4, 6]; Y=[17000, 20000, 17000]
          LinearInterpolationFunction SpecificLeafAreaMin: XProperty=[Leaf].Fn
            XYPairs: X=[0.4, 1]; Y=[14000, 14000]
          Constant InitialNConc: FixedValue=0
          Constant StructuralFraction: FixedValue=0.5
          Constant StorageFraction: FixedValue=0.3
          Constant LeafSizeShapeParameter: FixedValue=0.3
          Constant SenessingLeafRelativeSize: FixedValue=1; Units=0-1
          MultiplyFunction ShadeInducedSenescenceRate
            Constant RatePerDegDay: FixedValue=0
              Memo
                1% per degree day means it takes one phyllochron for a shaded leaf to fully sceness
            VariableReference ThermalTime: VariableName=[Phenology].ThermalTime.Value()
          ArrayFunction LagDurationAgeMultiplier: Values=1 1 1
          ArrayFunction SenescenceDurationAgeMultiplier: Values=1 1 1
          ArrayFunction LeafSizeAgeMultiplier: Values=1 1 1 1 1 1 1 1 1 1 1 1
        RUEModel Photosynthesis
          Constant RUE: FixedValue=1.5
          WeightedTemperatureFunction FT: MaximumTemperatureWeighting=0.75
            XYPairs: X=[0, 15, 25, 35]; Y=[0, 1, 1, 0]
          LinearInterpolationFunction FN: XProperty=[Leaf].Fn
            XYPairs: X=[0, 1, 1.5]; Y=[0, 1, 1]
          LinearInterpolationFunction FW: XProperty=[Leaf].Fw
            XYPairs: X=[0, 1, 1]; Y=[0, 1, 1]
          LinearInterpolationFunction FVPD: XProperty=[Photosynthesis].VPD
            XYPairs: X=[0, 10, 40]; Y=[1, 1, 0]
          RUECO2Function FCO2: PhotosyntheticPathway=C3
          VariableReference RadnInt: VariableName=[Leaf].RadIntTot
        Constant FrostFraction: FixedValue=0
        Constant RemobilisationCost: FixedValue=0
        VariableReference ThermalTime: VariableName=[Phenology].ThermalTime.Value()
        MinimumFunction FRGRFunction
          VariableReference RUE_FT: VariableName=[Leaf].Photosynthesis.FT.Value()
          MinimumFunction Others
            VariableReference RUE_FN: VariableName=[Leaf].Photosynthesis.FN.Value()
            VariableReference RUE_FVPD: VariableName=[Leaf].Photosynthesis.FVPD.Value()
        BiomassRemoval BiomassRemovalDefaults
          OrganBiomassRemovalType Harvest: FractionLiveToRemove=0; FractionDeadToRemove=0; FractionLiveToResidue=0.3; FractionDeadToResidue=0.3
          OrganBiomassRemovalType Cut: FractionLiveToRemove=0.8; FractionDeadToRemove=0.8; FractionLiveToResidue=0; FractionDeadToResidue=0
          OrganBiomassRemovalType Prune: FractionLiveToRemove=0; FractionDeadToRemove=0; FractionLiveToResidue=0.6; FractionDeadToResidue=0.6
          OrganBiomassRemovalType Graze: FractionLiveToRemove=0.6; FractionDeadToRemove=0.6; FractionLiveToResidue=0.1; FractionDeadToResidue=0.1
          OrganBiomassRemovalType Thin: FractionLiveToRemove=0; FractionDeadToRemove=0; FractionLiveToResidue=0.05; FractionDeadToResidue=0.05
        MultiplyFunction ExtinctionCoeff
          Constant VegetativePhase: FixedValue=0.5
          LinearInterpolationFunction DevelopmentFactor: XProperty=[Phenology].Stage
            XYPairs: X=[3, 4.7, 5]; Y=[1, 1, 1.2]
            Memo
              Exntiction coefficient increases at stem extension as leaves become more prostrate
        Constant StructuralFraction: FixedValue=0.5
        Constant DMConversionEfficiency: FixedValue=1
        Constant CarbonConcentration: FixedValue=0.4
      Nodule
        Constant FixationMetabolicCost: FixedValue=0
        Constant MaximumNConc: FixedValue=0.02
        Constant MinimumNConc: FixedValue=0.01
        Constant SenescenceRate: FixedValue=0
        Constant NReallocationFactor: FixedValue=0
        PhaseBasedSwitch NitrogenDemandSwitch: Start=Emergence; End=Maturity
        BiomassRemoval BiomassRemovalDefaults
          OrganBiomassRemovalType Harvest: FractionLiveToRemove=0.5; FractionDeadToRemove=0; FractionLiveToResidue=0.1; FractionDeadToResidue=0
          OrganBiomassRemovalType Cut: FractionLiveToRemove=0.8; FractionDeadToRemove=0; FractionLiveToResidue=0; FractionDeadToResidue=0
          OrganBiomassRemovalType Prune: FractionLiveToRemove=0; FractionDeadToRemove=0; FractionLiveToResidue=0.6; FractionDeadToResidue=0
          OrganBiomassRemovalType Graze: FractionLiveToRemove=0.6; FractionDeadToRemove=0; FractionLiveToResidue=0.2; FractionDeadToResidue=0
        Constant InitialWtFunction: FixedValue=0; Units=g/m^2
        Constant DetachmentRateFunction: FixedValue=0; Units=/d
        Constant MaintenanceRespirationFunction: FixedValue=0; Units=0-1
        Constant DMConversionEfficiency: FixedValue=1; Units=0-1
        Constant FixationRate: FixedValue=10000; Units=g/m^2/d
        Constant NRetranslocationFactor: FixedValue=0
        Constant DMReallocationFactor: FixedValue=0
        Constant DMRetranslocationFactor: FixedValue=0
        VariableReference CriticalNConc: VariableName=[Nodule].MinimumNConc.Value()
        Constant RemobilisationCost: FixedValue=0
        Constant CarbonConcentration: FixedValue=0.4
        BiomassDemand DMDemands
          MultiplyFunction Structural
            Constant DMDemandFunction: FixedValue=0.01
            Constant StructuralFraction: FixedValue=1; Units=g/g
          Constant Metabolic: FixedValue=0
          StorageDMDemandFunction Storage
            SubtractFunction StorageFraction
              Constant One: FixedValue=1
              VariableReference StructuralFraction: VariableName=[Nodule].DMDemands.Structural.StructuralFraction.Value()
        BiomassDemand NDemands
          MultiplyFunction Structural
            VariableReference MinNconc: VariableName=[Nodule].minimumNconc.Value()
            VariableReference PotentialDMAllocation: VariableName=[Nodule].potentialDMAllocation.Structural
          MultiplyFunction Metabolic
            SubtractFunction MetabolicNconc
              VariableReference CritNconc: VariableName=[Nodule].criticalNConc.Value()
              VariableReference MinNconc: VariableName=[Nodule].minimumNconc.Value()
            VariableReference PotentialDMAllocation: VariableName=[Nodule].potentialDMAllocation.Structural
          StorageNDemandFunction Storage
            VariableReference NitrogenDemandSwitch: VariableName=[Nodule].nitrogenDemandSwitch.Value()
            VariableReference MaxNconc: VariableName=[Nodule].maximumNconc.Value()
      GenericOrgan Stem
        Constant NReallocationFactor: FixedValue=0
        Constant NRetranslocationFactor: FixedValue=0.1
        Constant DMRetranslocationFactor: FixedValue=0.1
        Constant MaximumNConc: FixedValue=0.03
        Constant MinimumNConc: FixedValue=0.01
        PhaseBasedSwitch NitrogenDemandSwitch: Start=Emergence; End=Maturity
        BiomassRemoval BiomassRemovalDefaults: same as Replacements.Lucerne.Nodule.BiomassRemovalDefaults
        Constant InitialWtFunction: FixedValue=0; Units=g/m^2
        Constant SenescenceRate: FixedValue=0; Units=/d
        Constant DetachmentRateFunction: FixedValue=0; Units=/d
        Constant MaintenanceRespirationFunction: FixedValue=0; Units=0-1
        Constant DMConversionEfficiency: FixedValue=1; Units=0-1
        Constant Phyollchorn: FixedValue=0
        Constant DMReallocationFactor: FixedValue=0
        VariableReference CriticalNConc: VariableName=[Stem].MinimumNConc.Value()
        Constant RemobilisationCost: FixedValue=0
        Constant CarbonConcentration: FixedValue=0.4
        BiomassDemand DMDemands
          MultiplyFunction Structural
            PartitionFractionDemandFunction DMDemandFunction
              LinearInterpolationFunction PartitionFraction: XProperty=[AboveGround].Wt
                XYPairs: X=[0, 100, 200, 500]; Y=[0.3, 0.4, 0.6, 0.7]
            Constant StructuralFraction: FixedValue=1
          Constant Metabolic: FixedValue=0
          StorageDMDemandFunction Storage
            SubtractFunction StorageFraction
              Constant One: FixedValue=1
              VariableReference StructuralFraction: VariableName=[Stem].DMDemands.Structural.StructuralFraction.Value()
        BiomassDemand NDemands
          MultiplyFunction Structural
            VariableReference MinNconc: VariableName=[Stem].minimumNconc.Value()
            VariableReference PotentialDMAllocation: VariableName=[Stem].potentialDMAllocation.Structural
          MultiplyFunction Metabolic
            SubtractFunction MetabolicNconc
              VariableReference CritNconc: VariableName=[Stem].criticalNConc.Value()
              VariableReference MinNconc: VariableName=[Stem].minimumNconc.Value()
            VariableReference PotentialDMAllocation: VariableName=[Stem].potentialDMAllocation.Structural
          StorageNDemandFunction Storage
            VariableReference NitrogenDemandSwitch: VariableName=[Stem].nitrogenDemandSwitch.Value()
            VariableReference MaxNconc: VariableName=[Stem].maximumNconc.Value()
      GenericOrgan Shell
        Constant NReallocationFactor: FixedValue=0
        Constant NRetranslocationFactor: FixedValue=0.1
        Constant DMRetranslocationFactor: FixedValue=0.1
        Constant MaximumNConc: FixedValue=0.03
        Constant MinimumNConc: FixedValue=0.01
        PhaseBasedSwitch NitrogenDemandSwitch: Start=Emergence; End=Maturity
        BiomassRemoval BiomassRemovalDefaults: same as Replacements.Lucerne.Nodule.BiomassRemovalDefaults
        Constant InitialWtFunction: FixedValue=0; Units=g/m^2
        Constant SenescenceRate: FixedValue=0; Units=/d
        Constant DetachmentRateFunction: FixedValue=0; Units=/d
        Constant MaintenanceRespirationFunction: FixedValue=0; Units=0-1
        Constant DMConversionEfficiency: FixedValue=1; Units=0-1
        Constant DMReallocationFactor: FixedValue=0
        VariableReference CriticalNConc: VariableName=[Shell].MinimumNConc.Value()
        Constant RemobilisationCost: FixedValue=0
        Constant CarbonConcentration: FixedValue=0.4
        BiomassDemand DMDemands
          MultiplyFunction Structural
            PartitionFractionDemandFunction DMDemandFunction
              PhaseLookup PartitionFraction
                PhaseLookupValue: Start=StartPodfill; End=Maturity
                  Constant: FixedValue=0.2
            Constant StructuralFraction: FixedValue=1
          Constant Metabolic: FixedValue=0
          StorageDMDemandFunction Storage
            SubtractFunction StorageFraction
              Constant One: FixedValue=1
              VariableReference StructuralFraction: VariableName=[Shell].DMDemands.Structural.StructuralFraction.Value()
        BiomassDemand NDemands
          MultiplyFunction Structural
            VariableReference MinNconc: VariableName=[Shell].minimumNconc.Value()
            VariableReference PotentialDMAllocation: VariableName=[Shell].potentialDMAllocation.Structural
          MultiplyFunction Metabolic
            SubtractFunction MetabolicNconc
              VariableReference CritNconc: VariableName=[Shell].criticalNConc.Value()
              VariableReference MinNconc: VariableName=[Shell].minimumNconc.Value()
            VariableReference PotentialDMAllocation: VariableName=[Shell].potentialDMAllocation.Structural
          StorageNDemandFunction Storage
            VariableReference NitrogenDemandSwitch: VariableName=[Shell].nitrogenDemandSwitch.Value()
            VariableReference MaxNconc: VariableName=[Shell].maximumNconc.Value()
      GenericOrgan Grain
        Constant NReallocationFactor: FixedValue=0
        Constant NRetranslocationFactor: FixedValue=0.1
        Constant DMRetranslocationFactor: FixedValue=0.1
        Constant MaximumNConc: FixedValue=0.03
        Constant MinimumNConc: FixedValue=0.01
        PhaseBasedSwitch NitrogenDemandSwitch: Start=Emergence; End=Maturity
        BiomassRemoval BiomassRemovalDefaults: same as Replacements.Lucerne.Nodule.BiomassRemovalDefaults
        Constant InitialWtFunction: FixedValue=0; Units=g/m^2
        Constant SenescenceRate: FixedValue=0; Units=/d
        Constant DetachmentRateFunction: FixedValue=0; Units=/d
        Constant MaintenanceRespirationFunction: FixedValue=0; Units=0-1
        Constant DMConversionEfficiency: FixedValue=1; Units=0-1
        Constant DMReallocationFactor: FixedValue=0
        VariableReference CriticalNConc: VariableName=[Grain].MinimumNConc.Value()
        Constant RemobilisationCost: FixedValue=0
        Constant CarbonConcentration: FixedValue=0.4
        BiomassDemand DMDemands
          MultiplyFunction Structural: same as Replacements.Lucerne.Shell.DMDemands.Structural
          Constant Metabolic: FixedValue=0
          StorageDMDemandFunction Storage
            SubtractFunction StorageFraction
              Constant One: FixedValue=1
              VariableReference StructuralFraction: VariableName=[Grain].DMDemands.Structural.StructuralFraction.Value()
        BiomassDemand NDemands
          MultiplyFunction Structural
            VariableReference MinNconc: VariableName=[Grain].minimumNconc.Value()
            VariableReference PotentialDMAllocation: VariableName=[Grain].potentialDMAllocation.Structural
          MultiplyFunction Metabolic
            SubtractFunction MetabolicNconc
              VariableReference CritNconc: VariableName=[Grain].criticalNConc.Value()
              VariableReference MinNconc: VariableName=[Grain].minimumNconc.Value()
            VariableReference PotentialDMAllocation: VariableName=[Grain].potentialDMAllocation.Structural
          StorageNDemandFunction Storage
            VariableReference NitrogenDemandSwitch: VariableName=[Grain].nitrogenDemandSwitch.Value()
            VariableReference MaxNconc: VariableName=[Grain].maximumNconc.Value()
      GenericOrgan TapRoot
        Constant NReallocationFactor: FixedValue=1
        Constant NRetranslocationFactor: FixedValue=0.1
        Constant DMRetranslocationFactor: FixedValue=0.1
        Constant MaximumNConc: FixedValue=0.03
        Constant MinimumNConc: FixedValue=0.01
        PhaseBasedSwitch NitrogenDemandSwitch: Start=Emergence; End=Maturity
          LinearInterpolationFunction: XProperty=[Phenology].Photoperiod.Value()
            XYPairs: X=[10.5, 12.5]; Y=[51, 34]
        BiomassRemoval BiomassRemovalDefaults
          OrganBiomassRemovalType Harvest: FractionLiveToRemove=0; FractionDeadToRemove=0; FractionLiveToResidue=0; FractionDeadToResidue=0
          OrganBiomassRemovalType Cut: FractionLiveToRemove=0; FractionDeadToRemove=0; FractionLiveToResidue=0; FractionDeadToResidue=0
          OrganBiomassRemovalType Prune: FractionLiveToRemove=0; FractionDeadToRemove=0; FractionLiveToResidue=0; FractionDeadToResidue=0
          OrganBiomassRemovalType Graze: FractionLiveToRemove=0; FractionDeadToRemove=0; FractionLiveToResidue=0; FractionDeadToResidue=0
        Constant InitialWtFunction: FixedValue=0; Units=g/m^2
        Constant SenescenceRate: FixedValue=0; Units=/d
        Constant DetachmentRateFunction: FixedValue=0; Units=/d
        Constant MaintenanceRespirationFunction: FixedValue=0; Units=0-1
        Constant DMConversionEfficiency: FixedValue=1; Units=0-1
        Constant DMReallocationFactor: FixedValue=0
        VariableReference CriticalNConc: VariableName=[TapRoot].MinimumNConc.Value()
        Constant RemobilisationCost: FixedValue=0
        Constant CarbonConcentration: FixedValue=0.4
        BiomassDemand DMDemands
          MultiplyFunction Structural
            PartitionFractionDemandFunction DMDemandFunction
              LinearInterpolationFunction PartitionFraction: XProperty=[AboveGround].Wt
                XYPairs: X=[0, 100, 200, 500]; Y=[0.3, 0.3, 0.3, 0.3]
                LinearInterpolationFunction: same as Replacements.Lucerne.TapRoot.NitrogenDemandSwitch.LinearInterpolationFunction
                LinearInterpolationFunction LinearInterpolationFunction1: same as Replacements.Lucerne.TapRoot.NitrogenDemandSwitch.LinearInterpolationFunction
                LinearInterpolationFunction LinearInterpolationFunction2: same as Replacements.Lucerne.TapRoot.NitrogenDemandSwitch.LinearInterpolationFunction
                LinearInterpolationFunction PartitionFraction: XProperty=[AboveGround].Wt
                  XYPairs: X=[0, 100, 200, 500]; Y=[0.3, 0.3, 0.3, 0.3]
                  LinearInterpolationFunction: same as Replacements.Lucerne.TapRoot.NitrogenDemandSwitch.LinearInterpolationFunction
                  LinearInterpolationFunction LinearInterpolationFunction1: same as Replacements.Lucerne.TapRoot.NitrogenDemandSwitch.LinearInterpolationFunction
                  LinearInterpolationFunction LinearInterpolationFunction2: same as Replacements.Lucerne.TapRoot.NitrogenDemandSwitch.LinearInterpolationFunction
              LinearInterpolationFunction: same as Replacements.Lucerne.TapRoot.NitrogenDemandSwitch.LinearInterpolationFunction
              LinearInterpolationFunction LinearInterpolationFunction1: same as Replacements.Lucerne.TapRoot.NitrogenDemandSwitch.LinearInterpolationFunction
              LinearInterpolationFunction PartitionFraction1: same as Replacements.Lucerne.TapRoot.DMDemands.Structural.DMDemandFunction.PartitionFraction
            Constant StructuralFraction: FixedValue=0.3
          Constant Metabolic: FixedValue=0
          StorageDMDemandFunction Storage
            SubtractFunction StorageFraction
              Constant One: FixedValue=1
              VariableReference StructuralFraction: VariableName=[TapRoot].DMDemands.Structural.StructuralFraction.Value()
        BiomassDemand NDemands
          MultiplyFunction Structural
            VariableReference MinNconc: VariableName=[TapRoot].minimumNconc.Value()
            VariableReference PotentialDMAllocation: VariableName=[TapRoot].potentialDMAllocation.Structural
          MultiplyFunction Metabolic
            SubtractFunction MetabolicNconc
              VariableReference CritNconc: VariableName=[TapRoot].criticalNConc.Value()
              VariableReference MinNconc: VariableName=[TapRoot].minimumNconc.Value()
            VariableReference PotentialDMAllocation: VariableName=[TapRoot].potentialDMAllocation.Structural
          StorageNDemandFunction Storage
            VariableReference NitrogenDemandSwitch: VariableName=[TapRoot].nitrogenDemandSwitch.Value()
            VariableReference MaxNconc: VariableName=[TapRoot].maximumNconc.Value()
      CompositeBiomass AboveGround: DMDOfStructural=0.6
        Propertys=[[Leaf].Live, [Leaf].Dead, [Stem].Live, [Stem].Dead, [Grain].Live, [Grain].Dead, [Shell].Live, [Shell].Dead]
      CompositeBiomass BelowGround: DMDOfStructural=0.6
        Propertys=[[Root].Live, [Root].Dead, [Nodule].Live, [Nodule].Dead, [TapRoot].Live, [TapRoot].Dead]
      CompositeBiomass Total: DMDOfStructural=0.6
        Propertys=[[Leaf].Live, [Leaf].Dead, [Stem].Live, [Stem].Dead, [Grain].Live, [Grain].Dead, [Shell].Live, [Shell].Dead, [Root].Live, [Root].Dead, [Nodule].Live, [Nodule].Dead, [TapRoot].Live, [TapRoot].Dead]
      CompositeBiomass TotalLive: DMDOfStructural=0.6
        Propertys=[[Leaf].Live, [Stem].Live, [Grain].Live, [Shell].Live, [Root].Live, [Nodule].Live, [TapRoot].Live]
      CompositeBiomass TotalDead: DMDOfStructural=0.6
        Propertys=[[Leaf].Dead, [Stem].Dead, [Grain].Dead, [Shell].Dead, [Root].Dead, [Nodule].Dead, [TapRoot].Dead]
      CompositeBiomass Pod: DMDOfStructural=0.6; Propertys=[[Shell].Live, [Shell].Dead, [Grain].Live, [Grain].Dead]
      Memo
        ## References

        ### **Ayaz S, McKenzie BA, McNeil DL, Hill GD.** **2004**. Light interception and utilization of four grain legumes sown at different plant populations and depths. _Journal of Agricultural Science,_ **142**: 297-308.
         **Ayaz S, McKenzie BA, Hill GD, McNeil DL.** **2004**. Variability in yield of four grain legume species in a subhumid temperate environment. II. Yield components. _Journal of Agricultural Science,_ **142**: 21-28.
         **Ayaz S, McKenzie BA, Hill GD, McNeil DL.** **2004**. Nitrogen distribution in four grain legumes. _Journal of Agricultural Science,_ **142**: 309-317.
         **Wilson DR, Robertson MJ.** **1996.** Pea phenology responses to temperature and photoperiod. _Australian Agronomy Society_.
      CultivarFolder
        Cultivar Kaituna
        Cultivar Trifecta
        Cultivar HunterRiver
        Cultivar Sceptre
        Cultivar SuperMonarca
        Cultivar WL611
        Cultivar southern_special
        Cultivar WL6112
        Cultivar WL6113
        Cultivar WL6114
        Cultivar FD2
        Cultivar FD10
        Cultivar FD5
    Report: EventNames=[Clock].DoReport
      VariableNames:
        [Clock].Today
        [DiagnosticsVariables].Script.AccumPlantN
        [DiagnosticsVariables].Script.AccumMineralisation
        [DiagnosticsVariables].Script.AccumDenit
        [DiagnosticsVariables].Script.AccumFert
        [DiagnosticsVariables].Script.AccumLeach
        [DiagnosticsVariables].Script.AccumDetach
        [DiagnosticsVariables].Script.DeltaSoilOMN
        [DiagnosticsVariables].Script.DeltaSurfaceOMN
        [DiagnosticsVariables].Script.DeltaSoilMineralN
        [Lucerne].Root.NSupply
        [Soil].SoilWater.Eo
        [Soil].SoilWater.Es
        [DiagnosticsVariables].Script.SWC as SWC
        [DiagnosticsVariables].Script.DUL
        [Soil].SoilWater.Drainage
        [Soil].SoilWater.Runoff
        [DiagnosticsVariables].Script.OutFlowLat
        [Soil].SoilWater.pond
        [DiagnosticsVariables].Script.AccumEO
        [DiagnosticsVariables].Script.AccumEP
        [DiagnosticsVariables].Script.AccumES
        [DiagnosticsVariables].Script.AccumDrainage
        [DiagnosticsVariables].Script.AccumRunoff
        [DiagnosticsVariables].Script.AccumRainfall
        [DiagnosticsVariables].Script.AccumIrrigation
        [DiagnosticsVariables].Script.AccumOutflowLat
        [DiagnosticsVariables].Script.SoilWaterDeficit
        [Lucerne].Grain.Live.Wt
        [Lucerne].Shell.Live.Wt
        [Lucerne].Stem.Live.Wt *10 as StemWt
        [Lucerne].Stem.Live.Wt
        [Lucerne].Grain.Live.N
        [Lucerne].Shell.Live.N
        [Lucerne].Leaf.Live.Wt *10 as LeafWt
        [Lucerne].Root.Live.Wt *10 as RootWt
        [Lucerne].Leaf.Live.N
        [Lucerne].Root.Live.N
        [Lucerne].Leaf.Live.NConc
        [Lucerne].Root.Live.NConc
        [Lucerne].Root.WaterSupply
        [Lucerne].Root.WaterUptake
        ([Lucerne].Leaf.Transpiration + [Soil].SoilWater.Es) as ET
        [Lucerne].Leaf.WaterDemand
        [Lucerne].Root.Depth
        [Lucerne].Leaf.CoverTotal
        [Lucerne].Leaf.NodeNumber.Value()
        [Lucerne].Structure.LeafTipsAppeared as NodeNumber
        [Lucerne].Structure.Phyllochron.Value()
        [Lucerne].Leaf.CoverDead
        [Lucerne].Leaf.LAI as LAI
        [Lucerne].Leaf.Height as Height
        [Lucerne].Structure.HeightModel.Value()
        [Lucerne].Leaf.HeightFunction.DeltaHeight.Value()
        [Lucerne].Leaf.InitialisedCohortNo
        [Lucerne].Leaf.AppearedCohortNo
        [Lucerne].Leaf.ExpandedCohortNo
        [Lucerne].Leaf.DeadCohortNo
        [Soil].SoilWater.SWmm as SWmm
        [Soil].NO3N
        [DiagnosticsVariables].Script.SoilNitrogenContent
        [Lucerne].Arbitrator.N.TotalPlantDemand
        [DiagnosticsVariables].Script.FomN
        [DiagnosticsVariables].Script.HumN
        [DiagnosticsVariables].Script.BiomN
        [DiagnosticsVariables].Script.DltNMinRes
        [DiagnosticsVariables].Script.DltNMinTot
        [Lucerne].Leaf.Fw
        [Lucerne].Leaf.Fn
        [Lucerne].Phenology.CurrentPhaseName
        [Lucerne].Phenology.CurrentStageName
        [Lucerne].Phenology.Stage
        [Lucerne].Phenology.DaysAfterCutting.Value()
        [Lucerne].Phenology.FloweringDaysAfterCutting.Value()
        [Lucerne].Pod.Wt
        [Lucerne].Pod.N
        [Lucerne].AboveGround.Wt *10 as shootbiomass
        [Lucerne].Shell.PodNumber.Value()
        [Lucerne].Leaf.LAIFunction.Value()
        [Soil].OutputLayers.SWmm
        [Soil].OutputLayers.SW
        [Soil].EC
        [Lucerne].Root.LengthDensity
        [Soil].SoilWater.WaterTable
        [Lucerne].AboveGround.Wt
        [Lucerne].AboveGround.N
        [Soil].SoilWater.ESW
  Folder New Zealand
    Experiment Iversen_8: DisabledSimNames=[Iversen_8Waterirr]
      Factors
        Factor Water
          Factor dry: Specifications=[IrrigationEvents]
            Operations IrrigationEvents
              1998-09-11  [Irrigation].Apply(30)
              1998-09-12  [Irrigation].Apply(30)
              1998-09-14  [Irrigation].Apply(30)
              1998-09-16  [Irrigation].Apply(30)
              1998-09-18  [Irrigation].Apply(30)
              1999-09-11  [Irrigation].Apply(30)
              1999-09-12  [Irrigation].Apply(30)
              1999-09-14  [Irrigation].Apply(30)
              1999-09-13  [Irrigation].Apply(50)
              2000-09-11  [Irrigation].Apply(30)
              2000-09-12  [Irrigation].Apply(30)
              2000-09-14  [Irrigation].Apply(30)
              2000-09-13  [Irrigation].Apply(30)
          Factor irr: Specifications=[IrrigationEvents]
            Operations IrrigationEvents
              1997-10-31  [Irrigation].Apply(30);
              1997-12-01  [Irrigation].Apply(24);
              1997-12-06  [Irrigation].Apply(32);
              1997-12-16  [Irrigation].Apply(41);
              1997-12-22  [Irrigation].Apply(45);
              1998-01-07  [Irrigation].Apply(14);
              1998-01-15  [Irrigation].Apply(30);
              1998-01-23  [Irrigation].Apply(26);
              1998-01-31  [Irrigation].Apply(23);
              1998-02-18  [Irrigation].Apply(62);
              1998-03-06  [Irrigation].Apply(23);
              1998-03-30  [Irrigation].Apply(31);
              1998-09-09  [Irrigation].Apply(30);
              1998-09-10  [Irrigation].Apply(30);
              1998-09-11  [Irrigation].Apply(30);
              1998-09-13  [Irrigation].Apply(30);
              1998-09-14  [Irrigation].Apply(30);
              1998-11-12  [Irrigation].Apply(20);
              1998-11-13  [Irrigation].Apply(20);
              1998-11-14  [Irrigation].Apply(20);
              1998-12-23  [Irrigation].Apply(20);
              1998-12-24  [Irrigation].Apply(20);
              1998-12-25  [Irrigation].Apply(20);
              1998-12-26  [Irrigation].Apply(15);
              1998-12-27  [Irrigation].Apply(15);
              1999-01-20  [Irrigation].Apply(20);
              1999-01-21  [Irrigation].Apply(20);
              1999-01-22  [Irrigation].Apply(20);
              1999-01-23  [Irrigation].Apply(20);
              1999-01-24  [Irrigation].Apply(20);
              1999-01-25  [Irrigation].Apply(27);
              1999-02-25  [Irrigation].Apply(10);
              1999-02-26  [Irrigation].Apply(10);
              1999-02-27  [Irrigation].Apply(10);
              1999-02-28  [Irrigation].Apply(20);
              1999-03-01  [Irrigation].Apply(20);
              1999-12-12  [Irrigation].Apply(30);
              2000-01-22  [Irrigation].Apply(50);
              2000-12-27  [Irrigation].Apply(30);
              2000-12-28  [Irrigation].Apply(30);
              2000-12-29  [Irrigation].Apply(15);
              2001-02-01  [Irrigation].Apply(35);
              2001-02-02  [Irrigation].Apply(30);
              2001-02-03  [Irrigation].Apply(30);
              2001-03-20  [Irrigation].Apply(25);
              2001-03-21  [Irrigation].Apply(25);
              2001-03-22  [Irrigation].Apply(15);
              2001-04-26  [Irrigation].Apply(25);
              2001-04-27  [Irrigation].Apply(20);
              2001-12-21  [Irrigation].Apply(20);
              2001-12-22  [Irrigation].Apply(25);
              2001-12-23  [Irrigation].Apply(20);
      Simulation Simulation1
        Clock: StartDate=1996-10-31; EndDate=2002-01-06
        Summary summaryfile
        Weather: FileName=%root%\Examples\WeatherFiles\lincoln.met
        SoilArbitrator Soil Arbitrator
        Zone paddock: Area=1; Slope=0
          MicroClimate: a_interception=0; b_interception=1; c_interception=0; d_interception=0; soil_albedo=0.23; SoilHeatFluxFraction=0.4; NightInterceptionFraction=0.5; ReferenceHeight=2
          Irrigation
          Fertiliser
          Manager DiagnosticsVariables
```csharp
using System;
using Models.Core;
using System.Collections.Generic;
using System.Text;
using Models.Soils;
using Models.PMF;
using Models;
using System.Xml.Serialization;
using APSIM.Shared.Utilities;
namespace Models
{
    [Serializable] 
    public class Script : Model
    {
        [Link] Clock Clock;
        [Link] Soils.Soil Soil;
        [Link] Models.Surface.SurfaceOrganicMatter SOM;
        [Link] Weather Met;
        [Link] Fertiliser Fert;
        [Link] Irrigation Irrig;
        [Link] Plant Lucerne;
        [Link] Zone zone;
                    
        [XmlIgnore] public bool InitialDay { get; set; }
        
        [XmlIgnore] public double AccumPlantN { get; set; }
        [XmlIgnore] public double AccumMineralisation { get; set; }
        [XmlIgnore] public double AccumDenit { get; set; }
        [XmlIgnore] public double AccumFert { get; set; }
        [XmlIgnore] public double AccumLeach { get; set; }
        [XmlIgnore] public double AccumDetach { get; set; }
        [XmlIgnore] public double DeltaSoilOMN { get; set; }
        [XmlIgnore] public double DeltaSurfaceOMN { get; set; }
        [XmlIgnore] public double DeltaSoilMineralN { get; set; }
        [XmlIgnore] public double SoilNitrogenContent { get; set; }
        
        [XmlIgnore] public double AccumEO { get; set; }
        [XmlIgnore] public double AccumEP { get; set; }
        [XmlIgnore] public double AccumES { get; set; }
        [XmlIgnore] public double AccumDrainage { get; set; }
        [XmlIgnore] public double AccumRunoff { get; set; }
        [XmlIgnore] public double AccumOutflowLat { get; set; }
        [XmlIgnore] public double AccumIrrigation { get; set; }
        [XmlIgnore] public double AccumRainfall { get; set; }
        [XmlIgnore] public double SoilWaterDeficit { get; set; }
    
        [XmlIgnore] public double  InitialSoilOMN { get; set; }
        [XmlIgnore] public double  InitialSurfaceOMN { get; set; }
        [XmlIgnore] public double  InitialMineralN { get; set; }
        
        [XmlIgnore] public double SWC { get; set; }
        [XmlIgnore] public double DUL { get; set; }
        [XmlIgnore] public double OutFlowLat { get; set; }

        [XmlIgnore] public double FomN { get; set; }
        [XmlIgnore] public double BiomN { get; set; }
        [XmlIgnore] public double HumN { get; set; }
        [XmlIgnore] public double OrganicN { get; set; }
        [XmlIgnore] public double NO3N { get; set; }
        [XmlIgnore] public double NH4N { get; set; }
        [XmlIgnore] public double UreaN { get; set; }
        [XmlIgnore] public double MineralN { get; set; }
        [XmlIgnore] public double DltNMinRes { get; set; }
        [XmlIgnore] public double DltNMinTot { get; set; }
        
        [EventSubscribe("Commencing")]
        private void OnSimulationCommencing(object sender, EventArgs e)
        {
            InitialDay = true;
        }
        
        [EventSubscribe("DoManagement")]
        private void OnDoManagement(object sender, EventArgs e)
        {
            //!!!!!! Nitrogen balance components !!!!!!
            //!!!!!!^^^^^^^^^^^^^^^^^^^^^^^^^^^^^!!!!!!
            FomN = MathUtilities.Sum(Soil.SoilNitrogen.FOMN);
            HumN = MathUtilities.Sum(Soil.SoilNitrogen.HumicN);
            BiomN = MathUtilities.Sum(Soil.SoilNitrogen.MicrobialN);
            OrganicN = FomN + HumN + BiomN;
            NO3N = MathUtilities.Sum(Soil.NO3N);
            NH4N = MathUtilities.Sum(Soil.NH4N);
            UreaN = MathUtilities.Sum(Soil.SoilNitrogen.urea);
            MineralN = NO3N + NH4N + UreaN; 
            DltNMinRes = MathUtilities.Sum(Soil.SoilNitrogen.dlt_n_min_res);
            DltNMinTot = MathUtilities.Sum(Soil.SoilNitrogen.MineralisedN);
            int layers = Soil.Thickness.Length;
            if (InitialDay == true)
            {
                InitialSurfaceOMN = SOM.N;
                InitialSoilOMN = OrganicN;
                InitialMineralN = MineralN;
                InitialDay = false;
            }
            AccumFert += Fert.NitrogenApplied;
            DeltaSurfaceOMN = SOM.N - InitialSurfaceOMN;
            AccumLeach = AccumLeach - Soil.SoilWater.LeachNH4 - Soil.SoilWater.LeachNO3 - Soil.SoilWater.LeachUrea; //Fails
            AccumMineralisation += MathUtilities.Sum(Soil.SoilNitrogen.MineralisedN);
            AccumDenit -= MathUtilities.Sum(Soil.SoilNitrogen.Denitrification);
            AccumPlantN -= (double)zone.Get("Lucerne.Root.NUptake");
            DeltaSoilOMN = OrganicN - InitialSoilOMN;
            DeltaSoilMineralN = MineralN - InitialMineralN;
            SoilNitrogenContent = MineralN;
            
            //!!!!!! Water balance components !!!!!!
            //!!!!!!^^^^^^^^^^^^^^^^^^^^^^^^^^!!!!!!

            AccumIrrigation += Irrig.IrrigationApplied;
            AccumRainfall += Met.Rain;
            //AccumEP -= (double)zone.Get("[Lucerne].Leaf.Transpiration");
            AccumEP -= (double)zone.Get("Lucerne.Root.WaterUptake");
            SoilWaterDeficit = (SWC - DUL);
            double OutFlowLat = MathUtilities.Sum(Soil.SoilWater.LateralOutflow);
            AccumOutflowLat -= OutFlowLat;
        }
        
        [EventSubscribe("DoManagementCalculations")]
        private void OnDoManagementCalculations(object sender, EventArgs e)
        {
            FomN = MathUtilities.Sum(Soil.SoilNitrogen.FOMN);
            HumN = MathUtilities.Sum(Soil.SoilNitrogen.HumicN);
            BiomN = MathUtilities.Sum(Soil.SoilNitrogen.MicrobialN);
            
            
            AccumEO -= Soil.SoilWater.Eo;
            AccumES -= Soil.SoilWater.Es; 
            AccumDrainage -= Soil.SoilWater.Drainage;
            AccumRunoff -= Soil.SoilWater.Runoff;
            SWC = MathUtilities.Sum(Soil.SoilWater.SWmm);
            DUL = MathUtilities.Sum(Soil.DULmm);
        }
    }
}
```
          SurfaceOrganicMatter surface organic matter: InitialResidueName=wheat; InitialResidueType=wheat; InitialResidueMass=0; InitialStandingFraction=0; InitialCPR=0; InitialCNR=80; FractionFaecesAdded=0.5
          Report: EventNames=[Clock].DoReport
            VariableNames:
              [Clock].Today
              [DiagnosticsVariables].Script.AccumPlantN
              [DiagnosticsVariables].Script.AccumMineralisation
              [DiagnosticsVariables].Script.AccumDenit
              [DiagnosticsVariables].Script.AccumFert
              [DiagnosticsVariables].Script.AccumLeach
              [DiagnosticsVariables].Script.AccumDetach
              [DiagnosticsVariables].Script.DeltaSoilOMN
              [DiagnosticsVariables].Script.DeltaSurfaceOMN
              [DiagnosticsVariables].Script.DeltaSoilMineralN
              [Lucerne].Root.NSupply
              [Soil].SoilWater.Eo
              [Soil].SoilWater.Es
              [DiagnosticsVariables].Script.SWC
              [DiagnosticsVariables].Script.DUL
              [Soil].SoilWater.Drainage
              [Soil].SoilWater.Runoff
              [DiagnosticsVariables].Script.OutFlowLat
              [Soil].SoilWater.pond
              [DiagnosticsVariables].Script.AccumEO
              [DiagnosticsVariables].Script.AccumEP
              [DiagnosticsVariables].Script.AccumES
              [DiagnosticsVariables].Script.AccumDrainage
              [DiagnosticsVariables].Script.AccumRunoff
              [DiagnosticsVariables].Script.AccumRainfall
              [DiagnosticsVariables].Script.AccumIrrigation
              [DiagnosticsVariables].Script.AccumOutflowLat
              [DiagnosticsVariables].Script.SoilWaterDeficit
              [Lucerne].Grain.Live.Wt
              [Lucerne].Shell.Live.Wt
              [Lucerne].Stem.Live.Wt
              [Lucerne].Stem.Live.Wt
              [Lucerne].Grain.Live.N
              [Lucerne].Shell.Live.N
              [Lucerne].Leaf.Live.Wt
              [Lucerne].Root.Live.Wt
              [Lucerne].Leaf.Live.N
              [Lucerne].Root.Live.N
              [Lucerne].Leaf.Live.NConc
              [Lucerne].Root.Live.NConc
              [Lucerne].Root.WaterSupply
              [Lucerne].Root.WaterUptake
              [Lucerne].Leaf.Transpiration
              [Lucerne].Leaf.WaterDemand
              [Lucerne].Root.Depth
              [Lucerne].Leaf.CoverTotal
              [Lucerne].Leaf.CoverDead
              [Lucerne].Leaf.LAI as LAI
              [Lucerne].Leaf.Height
              [Soil].SoilWater.SWmm
              [Soil].NO3N
              [DiagnosticsVariables].Script.SoilNitrogenContent
              [Lucerne].Arbitrator.N.TotalPlantDemand
              [DiagnosticsVariables].Script.FomN
              [DiagnosticsVariables].Script.HumN
              [DiagnosticsVariables].Script.BiomN
              [DiagnosticsVariables].Script.DltNMinRes
              [DiagnosticsVariables].Script.DltNMinTot
              [Lucerne].Leaf.Fw
              [Lucerne].Leaf.Fn
              [Lucerne].Phenology.CurrentPhaseName
              [Lucerne].Phenology.CurrentStageName
              [Lucerne].Phenology.Stage
              [Lucerne].Pod.Wt
              [Lucerne].Pod.N
              [Lucerne].AboveGround.Wt *10 as shootbiomass
              [Lucerne].Shell.PodNumber.Value()
              [Lucerne].Leaf.LAIFunction.Value()
              [Lucerne].MainN
          Manager LucerneSowingRule
            RowSpacing = 150
            SowingDepth = 20
            SowingRate = 450
            CultivarName = Kaituna
            SowingDate = 1996-10-31
```csharp
using System;
using Models.Core;
using Models.PMF;
using APSIM.Shared.Utilities;
        
namespace Models
{
    [Serializable] 
    [System.Xml.Serialization.XmlInclude(typeof(Model))]
    public class Script : Model
    {
        [Link] Plant Lucerne;
        [Link] Clock Clock;

        [Description("Spacing (mm) between rows")]
        public double RowSpacing { get; set; }
        [Description("Depth (mm) Grains are planted")]
        public double SowingDepth { get; set; }
        [Description("Seeds sown (/m2)")]
        public double SowingRate { get; set; }
        [Description("Cultivar")]
        [Display(Type=DisplayTypeEnum.CultivarName)]
        public string CultivarName { get; set; }
        [Description("Sowing Date")]
        public DateTime SowingDate { get; set; }

        [EventSubscribe("DoManagement")]
        private void OnDoManagement(object sender, EventArgs e)
        {
            if (Clock.Today.Date == SowingDate)
                Lucerne.Sow(population: SowingRate, cultivar: CultivarName, depth: SowingDepth, rowSpacing: RowSpacing, budNumber: 1);
            //Lucerne.Sow(... Contains the following arguements:
            //Population  double  Required  Seeds sowing/m2
            //Cultivar    string  Required  "NameOfCultivar"
            //Depth       double  Optional  Depth (mm) seed sown.   Default is 100mm 
            //MaxCover    double  Optional  Proportion (0-1) of the ground row crop will cover.   Default is 1.0
            //BudNumber   double  Optional  Number of mainstems per seed sown.  Default is 1.0
            //RowSpacing  double  Optional  Spaceing (mm) between drill rows when crop is sown.  Default is 150mm
            //CropClass   string  Optional  Crop class to instantiate when crop is sown.  Default is "Plant"
        }
    }
}
```
          Operations IrrigationEvents
          Plant Lucerne: CropType=Lucerne
          SoluteManager
          Manager Mower
```csharp
using System;
using System.Collections.Generic;
using Models.Core;
using Models.PMF;
using Models.PMF.Interfaces;
using System.Xml.Serialization;

namespace Models
{
    [Serializable] 
    [System.Xml.Serialization.XmlInclude(typeof(Model))]
    public class Script : Model
    {
        [Link] Plant Lucerne;
        
        [XmlIgnore] private RemovalFractions Remove { get; set; }
        
        [EventSubscribe("Commencing")]
        private void OnSimulationCommencing(object sender, EventArgs e)
        {
            Remove = new RemovalFractions();
        }
        
        public void Cut()
        {
            Remove.SetPhenologyStage = 4;
            Remove.NodesToRemove = 10;
            Lucerne.RemoveBiomass("Cut", Remove);
        }
    }
}
```
          Operations Cutting
            1997-02-21  [Mower].Script.Cut();
            1997-06-05  [Mower].Script.Cut();
            1997-10-06  [Mower].Script.Cut();
            1997-11-19  [Mower].Script.Cut();
            1997-12-24  [Mower].Script.Cut();
            1998-02-03  [Mower].Script.Cut();
            1998-03-14  [Mower].Script.Cut();
            1998-05-28  [Mower].Script.Cut();
            1998-07-01  [Mower].Script.Cut();
            1998-09-29  [Mower].Script.Cut();
            1998-11-11  [Mower].Script.Cut();
            1998-12-15  [Mower].Script.Cut();
            1999-01-14  [Mower].Script.Cut();
            1999-02-18  [Mower].Script.Cut();
            1999-04-15  [Mower].Script.Cut();
            1999-06-24  [Mower].Script.Cut();
            1999-09-29  [Mower].Script.Cut();
            1999-11-11  [Mower].Script.Cut();
            1999-12-21  [Mower].Script.Cut();
            2000-01-27  [Mower].Script.Cut();
            2000-03-15  [Mower].Script.Cut();
            2000-05-25  [Mower].Script.Cut();
            2000-09-22  [Mower].Script.Cut();
            2000-11-10  [Mower].Script.Cut();
            2000-12-22  [Mower].Script.Cut();
            2001-01-24  [Mower].Script.Cut();
            2001-03-15  [Mower].Script.Cut();
            2001-05-03  [Mower].Script.Cut();
            2001-07-02  [Mower].Script.Cut();
            2001-10-06  [Mower].Script.Cut();
            2001-11-21  [Mower].Script.Cut();
            2001-12-24  [Mower].Script.Cut();
          Soil: Latitude=0; Longitude=0
            Analysis: Thickness=[100, 200, 300, 300, 300, 300]; PH=[6.6, 6.2, 5.7, 5.5, 5.5, 5.5]; PHUnits=Water; BoronUnits=HotWater
            InitialWater Initial water: PercentMethod=EvenlyDistributed; FractionFull=0.998443
            Water
              Thickness  BD    AirDry  LL15   DUL   SAT
              100        1.26  0.05    0.075  0.35  0.38
              100        1.26  0.06    0.078  0.35  0.38
              100        1.26  0.07    0.07   0.32  0.39
              100        1.44  0.07    0.07   0.29  0.32
              100        1.44  0.069   0.07   0.27  0.3
              100        1.44  0.07    0.07   0.31  0.297
              100        1.57  0.07    0.07   0.33  0.32
              100        1.57  0.07    0.07   0.35  0.34
              100        1.57  0.07    0.07   0.34  0.35
              100        1.58  0.07    0.07   0.34  0.35
              100        1.58  0.07    0.07   0.34  0.35
              100        1.58  0.07    0.07   0.34  0.35
              100        1.58  0.08    0.08   0.34  0.35
              100        1.59  0.078   0.08   0.33  0.35
              100        1.59  0.08    0.08   0.33  0.35
              100        1.59  0.087   0.09   0.32  0.34
              100        1.59  0.09    0.09   0.3   0.33
              100        1.59  0.09    0.09   0.3   0.33
              100        1.59  0.09    0.09   0.3   0.33
              100        1.59  0.08    0.08   0.31  0.33
              100        1.59  0.09    0.09   0.31  0.33
              100        1.59  0.09    0.09   0.32  0.34
              100        1.59  0.09    0.09   0.35  0.4
              SoilCrop LucerneSoil
                LL=[0.1, 0.13, 0.12, 0.12, 0.11, 0.08, 0.08, 0.08, 0.09, 0.11, 0.12, 0.15, 0.15, 0.15, 0.16, 0.2, 0.25, 0.25, 0.25, 0.25, 0.23, 0.15, 0.15]
                KL=[0.06, 0.06, 0.03, 0.03, 0.03, 0.03, 0.03, 0.03, 0.03, 0.03, 0.03, 0.03, 0.03, 0.03, 0.03, 0.03, 0.03, 0.03, 0.03, 0.03, 0.03, 0.03, 0.03]
                XF=[1, 1, 1, 1, 1, 1, 1, 1, 1, 1, 1, 1, 1, 1, 1, 1, 1, 1, 1, 1, 1, 1, 1]
            SoilWater: SummerDate=1-Oct; SummerU=6; SummerCona=3; WinterDate=1-Mar; WinterU=5; WinterCona=2.5; DiffusConst=189; DiffusSlope=21; Salb=0.13; CN2Bare=0; CNRed=0; CNCov=0.8; max_pond=0; Thickness=[100, 200, 300, 300, 300, 300]; SWCON=[0.55, 0.55, 0.55, 0.55, 0.55, 0.55]; ResidueInterception=0
            SoilNitrogen: fom_type=[default, manure, mucuna, lablab, shemp, stable]; fract_carb=[0.2, 0.3, 0.54, 0.57, 0.45, 0]; fract_cell=[0.7, 0.3, 0.37, 0.37, 0.47, 0.1]; fract_lign=[0.1, 0.4, 0.09, 0.06, 0.08, 0.9]
            SoilOrganicMatter: RootCN=30; RootWt=3000; SoilCN=11.5; EnrACoeff=7.4; EnrBCoeff=0.2; OCUnits=Total
              Thickness  OC    FBiom  FInert
              100        1.82  0.025  0.3
              200        1.47  0.025  0.4
              300        1.2   0.015  0.75
              300        1.03  0.01   0.9
              300        0.47  0.01   0.96
              300        0.47  0.01   0.96
            Sample: NO3Units=kgha; NH4Units=ppm; SWUnits=Volumetric; OCUnits=Total; PHUnits=Water
              Thickness  NO3  NH4
              100        217  0
              200        30   0
              300        5    0
              300        5    0
              300        0    0
              300        0    0
            CERESSoilTemperature
    Experiment Iversen_9
      Factors
        Factor SowingDate
          Factor SD1
            Specifications:
              [LucerneSowingRule].Script.SowingDate = 2000-10-24
              [Clock].StartDate = 2000-10-24
              [Cutting]
            Operations Cutting
              2001-01-24  [Mower].Script.Cut();
              2001-03-07  [Mower].Script.Cut();
              2001-05-03  [Mower].Script.Cut();
              2001-07-04  [Mower].Script.Cut();
              2001-09-29  [Mower].Script.Cut();
              2001-11-15  [Mower].Script.Cut();
              2001-12-23  [Mower].Script.Cut();
              2002-02-12  [Mower].Script.Cut();
              2002-04-04  [Mower].Script.Cut();
              2002-06-14  [Mower].Script.Cut();
          Factor SD2
            Specifications:
              [LucerneSowingRule].Script.SowingDate = 2000-11-14
              [Clock].StartDate = 2000-11-14
              [Cutting]
            Operations Cutting
              2001-02-13  [Mower].Script.Cut();
              2001-04-30  [Mower].Script.Cut();
              2001-07-04  [Mower].Script.Cut();
              2001-09-29  [Mower].Script.Cut();
              2001-11-14  [Mower].Script.Cut();
              2001-12-21  [Mower].Script.Cut();
              2002-02-04  [Mower].Script.Cut();
              2002-04-04  [Mower].Script.Cut();
              2002-06-12  [Mower].Script.Cut();
          Factor SD3
            Specifications:
              [LucerneSowingRule].Script.SowingDate = 2000-12-05
              [Clock].StartDate = 2000-12-05
              [Cutting]
            Operations Cutting
              2001-03-07  [Mower].Script.Cut();
              2001-05-03  [Mower].Script.Cut();
              2001-07-05  [Mower].Script.Cut();
              2001-09-29  [Mower].Script.Cut();
              2001-11-14  [Mower].Script.Cut();
              2001-12-21  [Mower].Script.Cut();
              2002-02-04  [Mower].Script.Cut();
              2002-04-04  [Mower].Script.Cut();
              2002-06-14  [Mower].Script.Cut();
          Factor SD4
            Specifications:
              [LucerneSowingRule].Script.SowingDate = 2000-12-27
              [Clock].StartDate = 2000-12-27
              [Cutting]
            Operations Cutting
              2001-03-27  [Mower].Script.Cut();
              2001-05-02  [Mower].Script.Cut();
              2001-07-04  [Mower].Script.Cut();
              2001-09-29  [Mower].Script.Cut();
              2001-11-14  [Mower].Script.Cut();
              2001-12-21  [Mower].Script.Cut();
              2002-02-04  [Mower].Script.Cut();
              2002-04-04  [Mower].Script.Cut();
              2002-06-12  [Mower].Script.Cut();
        Factor Water
          Factor dry
            Specifications:
              [IrrigationEvents]
              [ClimateControl]
              [Water]
            Operations IrrigationEvents
              2001-08-11  [Irrigation].Apply(70);
            Manager ClimateControl
              StartDate = 2001-08-11
              EndDate = 2002-07-01
```csharp
using System;
using Models.Core;
using APSIM.Shared.Utilities;



using System.Collections.Generic;
using System.Text;
using Models.PMF;
using Models;
using System.Xml.Serialization;

namespace Models
{
    [Serializable] 
    [System.Xml.Serialization.XmlInclude(typeof(Model))]
    public class Script : Model
    {
        [Link] Weather Met;
        [Link] Clock Clock;
    
        [Description("Start Date")]
        public DateTime StartDate { get; set; }
        
        [Description("End Date")]
        public DateTime EndDate { get; set; }
 
    
        [EventSubscribe("PreparingNewWeatherData")]
        private void OnPreparingNewWeatherData(object sender, EventArgs e)
        {
            if ((Clock.Today.Date >= StartDate) && (Clock.Today.Date <= EndDate))
                Met.Rain = 0;        
        }
    }
}
```
            Water
              Thickness  BD    AirDry  LL15   DUL    SAT
              100        1.26  0.05    0.075  0.348  0.38
              100        1.26  0.06    0.078  0.35   0.38
              100        1.26  0.07    0.07   0.35   0.39
              100        1.44  0.07    0.07   0.29   0.32
              100        1.44  0.069   0.07   0.27   0.3
              100        1.44  0.07    0.07   0.27   0.297
              100        1.57  0.07    0.07   0.29   0.32
              100        1.57  0.07    0.07   0.3    0.34
              100        1.57  0.07    0.07   0.315  0.35
              100        1.61  0.07    0.07   0.32   0.35
              100        1.61  0.07    0.07   0.32   0.35
              100        1.61  0.07    0.07   0.307  0.34
              100        1.61  0.08    0.08   0.28   0.31
              100        1.61  0.078   0.08   0.3    0.33
              100        1.61  0.08    0.08   0.34   0.37
              100        1.61  0.087   0.09   0.34   0.38
              100        1.61  0.09    0.09   0.35   0.39
              100        1.61  0.09    0.09   0.37   0.4
              100        1.61  0.09    0.09   0.37   0.41
              100        1.61  0.091   0.09   0.37   0.402
              100        1.61  0.1     0.1    0.37   0.41
              100        1.61  0.102   0.1    0.37   0.4
              100        1.61  0.1     0.1    0.36   0.4
              SoilCrop LucerneSoil
                LL=[0.1, 0.1, 0.14, 0.13, 0.11, 0.1, 0.1, 0.1, 0.12, 0.135, 0.14, 0.12, 0.1, 0.11, 0.12, 0.17, 0.23, 0.267, 0.28, 0.29, 0.29, 0.29, 0.3]
                KL=[0.06, 0.06, 0.03, 0.03, 0.03, 0.03, 0.03, 0.03, 0.03, 0.03, 0.03, 0.03, 0.03, 0.03, 0.03, 0.03, 0.03, 0.03, 0.03, 0.03, 0.03, 0.03, 0.03]
                XF=[1, 1, 1, 1, 1, 1, 1, 1, 1, 1, 1, 1, 1, 1, 1, 1, 1, 1, 1, 1, 1, 1, 1]
          Factor irr
            Specifications:
              [IrrigationEvents]
              [Water]
            Operations IrrigationEvents
              2000-12-20  [Irrigation].Apply(25);
              2000-12-29  [Irrigation].Apply(30);
              2001-01-28  [Irrigation].Apply(36);
              2001-02-17  [Irrigation].Apply(45);
              2001-03-07  [Irrigation].Apply(55);
              2001-03-30  [Irrigation].Apply(80);
              2001-04-29  [Irrigation].Apply(52);
              2001-10-06  [Irrigation].Apply(70);
              2001-12-06  [Irrigation].Apply(70);
              2001-12-20  [Irrigation].Apply(80);
            Water: same as New Zealand.Iversen_9.Factors.Water.dry.Water
      Simulation Simulation0
        Clock: StartDate=2000-10-24; EndDate=2002-07-01
        Summary summaryfile
        Weather: FileName=%root%\Examples\WeatherFiles\lincoln.met
        SoilArbitrator Soil Arbitrator
        Zone paddock: Area=1; Slope=0
          Soil: Latitude=0; Longitude=0
            Analysis: Thickness=[100, 200, 300, 300, 300, 300]; PH=[6.6, 6.2, 5.7, 5.5, 5.5, 5.5]; PHUnits=Water; BoronUnits=HotWater
            InitialWater Initial water: PercentMethod=EvenlyDistributed; FractionFull=1
            Water
              Thickness  BD   AirDry  LL15  DUL   SAT
              100        1.2  0.08    0.13  0.33  0.5
              200        1.2  0.13    0.13  0.33  0.5
              300        1.2  0.1     0.1   0.31  0.44
              300        1.2  0.06    0.06  0.15  0.46
              300        1.2  0.04    0.04  0.1   0.44
              300        1.2  0.02    0.02  0.06  0.44
              SoilCrop LucerneSoil: LL=[0.13, 0.13, 0.27, 0.27, 0.3, 0.3]; KL=[0.1, 0.06, 0.03, 0.01, 0, 0]; XF=[1, 1, 0.1, 0, 0, 0]
            SoilWater: SummerDate=1-Nov; SummerU=9; SummerCona=4.4; WinterDate=1-Apr; WinterU=9; WinterCona=4.4; DiffusConst=88; DiffusSlope=35.4; Salb=0.18; CN2Bare=68; CNRed=20; CNCov=0.8; max_pond=0; Thickness=[100, 200, 300, 300, 300, 300]; SWCON=[0.55, 0.55, 0.55, 0.55, 0.55, 0.55]; ResidueInterception=0
            SoilNitrogen: fom_type=[default, manure, mucuna, lablab, shemp, stable]; fract_carb=[0.2, 0.3, 0.54, 0.57, 0.45, 0]; fract_cell=[0.7, 0.3, 0.37, 0.37, 0.47, 0.1]; fract_lign=[0.1, 0.4, 0.09, 0.06, 0.08, 0.9]
            SoilOrganicMatter: same as New Zealand.Iversen_8.Simulation1.paddock.Soil.SoilOrganicMatter
            Sample: NO3Units=kgha; NH4Units=ppm; SWUnits=Volumetric; OCUnits=Total; PHUnits=Water
              Thickness  NO3  NH4
              100        217  0
              200        30   0
              300        5    0
              300        5    0
              300        0    0
              300        0    0
            CERESSoilTemperature
          MicroClimate: a_interception=0; b_interception=1; c_interception=0; d_interception=0; soil_albedo=0.23; SoilHeatFluxFraction=0.4; NightInterceptionFraction=0.5; ReferenceHeight=2
          Irrigation
          Fertiliser
          Manager DiagnosticsVariables: same as New Zealand.Iversen_8.Simulation1.paddock.DiagnosticsVariables
          SurfaceOrganicMatter surface organic matter: InitialResidueName=wheat; InitialResidueType=wheat; InitialResidueMass=0; InitialStandingFraction=0; InitialCPR=0; InitialCNR=80; FractionFaecesAdded=0.5
          Report: EventNames=[Clock].DoReport
            VariableNames:
              [Clock].Today
              [DiagnosticsVariables].Script.AccumPlantN
              [DiagnosticsVariables].Script.AccumMineralisation
              [DiagnosticsVariables].Script.AccumDenit
              [DiagnosticsVariables].Script.AccumFert
              [DiagnosticsVariables].Script.AccumLeach
              [DiagnosticsVariables].Script.AccumDetach
              [DiagnosticsVariables].Script.DeltaSoilOMN
              [DiagnosticsVariables].Script.DeltaSurfaceOMN
              [DiagnosticsVariables].Script.DeltaSoilMineralN
              [Lucerne].Root.NSupply
              [Soil].SoilWater.Eo
              [Soil].SoilWater.Es
              [DiagnosticsVariables].Script.SWC as SWC
              [DiagnosticsVariables].Script.DUL
              [Soil].SoilWater.Drainage
              [Soil].SoilWater.Runoff
              [DiagnosticsVariables].Script.OutFlowLat
              [Soil].SoilWater.pond
              [DiagnosticsVariables].Script.AccumEO
              [DiagnosticsVariables].Script.AccumEP
              [DiagnosticsVariables].Script.AccumES
              [DiagnosticsVariables].Script.AccumDrainage
              [DiagnosticsVariables].Script.AccumRunoff
              [DiagnosticsVariables].Script.AccumRainfall
              [DiagnosticsVariables].Script.AccumIrrigation
              [DiagnosticsVariables].Script.AccumOutflowLat
              [DiagnosticsVariables].Script.SoilWaterDeficit
              [Lucerne].Grain.Live.Wt
              [Lucerne].Shell.Live.Wt
              [Lucerne].Stem.Live.Wt
              [Lucerne].Stem.Live.Wt
              [Lucerne].Grain.Live.N
              [Lucerne].Shell.Live.N
              [Lucerne].Leaf.Live.Wt
              [Lucerne].Root.Live.Wt
              [Lucerne].Leaf.Live.N
              [Lucerne].Root.Live.N
              [Lucerne].Leaf.Live.NConc
              [Lucerne].Root.Live.NConc
              [Lucerne].Root.WaterSupply
              [Lucerne].Root.WaterUptake
              [Lucerne].Leaf.Transpiration
              [Lucerne].Leaf.WaterDemand
              [Lucerne].Root.Depth
              [Lucerne].Leaf.CoverTotal
              [Lucerne].Leaf.CoverDead
              [Lucerne].Leaf.LAI
              [Lucerne].Leaf.Height
              [Soil].SoilWater.SWmm
              [Soil].NO3N
              [DiagnosticsVariables].Script.SoilNitrogenContent
              [Lucerne].Arbitrator.N.TotalPlantDemand
              [DiagnosticsVariables].Script.FomN
              [DiagnosticsVariables].Script.HumN
              [DiagnosticsVariables].Script.BiomN
              [DiagnosticsVariables].Script.DltNMinRes
              [DiagnosticsVariables].Script.DltNMinTot
              [Lucerne].Leaf.Fw
              [Lucerne].Leaf.Fn
              [Lucerne].Phenology.CurrentPhaseName
              [Lucerne].Phenology.CurrentStageName
              [Lucerne].Phenology.Stage
              [Lucerne].Pod.Wt
              [Lucerne].Pod.N
              [Lucerne].AboveGround.Wt *10 as shootbiomass
              [Lucerne].Shell.PodNumber.Value()
              [Lucerne].Leaf.LAIFunction.Value()
          Manager LucerneSowingRule
            RowSpacing = 150
            SowingDepth = 20
            SowingRate = 100
            CultivarName = Kaituna
            SowingDate = 2000-10-24
            script: same as in New Zealand.Iversen_8.Simulation1.paddock.LucerneSowingRule
          Operations IrrigationEvents
          Plant Lucerne: CropType=Lucerne
          SoluteManager
          Manager Mower
```csharp
using System;
using System.Collections.Generic;
using Models.Core;
using Models.PMF;
using Models.PMF.Interfaces;
using System.Xml.Serialization;

namespace Models
{
    [Serializable] 
    [System.Xml.Serialization.XmlInclude(typeof(Model))]
    public class Script : Model
    {
        [Link] Plant Lucerne;
        
        [XmlIgnore] private RemovalFractions Remove { get; set; }
        
        [EventSubscribe("Commencing")]
        private void OnSimulationCommencing(object sender, EventArgs e)
        {
            Remove = new RemovalFractions();
        }
        
        public void Cut()
        {
            Remove.SetPhenologyStage = 4;
            Lucerne.RemoveBiomass("Cut", Remove);
        }
    }
}
```
          Operations Cutting
          Manager ClimateControl
            StartDate = 2001-08-11
            EndDate = 2002-07-01
```csharp
using System;
using Models.Core;
using APSIM.Shared.Utilities;



using System.Collections.Generic;
using System.Text;
using Models.PMF;
using Models;
using System.Xml.Serialization;

namespace Models
{
    [Serializable] 
    [System.Xml.Serialization.XmlInclude(typeof(Model))]
    public class Script : Model
    {
        [Link] Weather Met;
        [Link] Clock Clock;
    
        [Description("Start Date")]
        public DateTime StartDate { get; set; }
        
        [Description("End Date")]
        public DateTime EndDate { get; set; }
 
    
        
    }
}
```
    Experiment Iversen_91
      Factors
        Factor Defoliation
          Factor LL: Specifications=[Cutting]
            Operations Cutting
              2001-01-24  [Mower].Script.Cut();
              2001-03-07  [Mower].Script.Cut();
              2001-05-02  [Mower].Script.Cut();
              2001-07-04  [Mower].Script.Cut();
              2001-09-29  [Mower].Script.Cut();
              2001-11-14  [Mower].Script.Cut();
              2001-12-21  [Mower].Script.Cut();
              2002-01-31  [Mower].Script.Cut();
              2002-04-04  [Mower].Script.Cut();
              2002-06-14  [Mower].Script.Cut();
              2002-10-06  [Mower].Script.Cut();
              2002-11-17  [Mower].Script.Cut();
              2002-12-29  [Mower].Script.Cut();
              2003-02-11  [Mower].Script.Cut();
              2003-03-23  [Mower].Script.Cut();
              2003-05-05  [Mower].Script.Cut();
              2003-06-13  [Mower].Script.Cut();
              2003-10-06  [Mower].Script.Cut();
              2003-11-13  [Mower].Script.Cut();
              2003-12-29  [Mower].Script.Cut();
              2004-02-08  [Mower].Script.Cut();
              2004-03-20  [Mower].Script.Cut();
              2004-05-03  [Mower].Script.Cut();
              2004-06-12  [Mower].Script.Cut();
              2004-10-03  [Mower].Script.Cut();
          Factor SL: Specifications=[Cutting]
            Operations Cutting
              2001-01-24  [Mower].Script.Cut();
              2001-03-07  [Mower].Script.Cut();
              2001-05-02  [Mower].Script.Cut();
              2001-07-04  [Mower].Script.Cut();
              2001-09-29  [Mower].Script.Cut();
              2001-11-14  [Mower].Script.Cut();
              2001-12-21  [Mower].Script.Cut();
              2002-01-31  [Mower].Script.Cut();
              2002-04-04  [Mower].Script.Cut();
              2002-06-14  [Mower].Script.Cut();
              2002-09-20  [Mower].Script.Cut();
              2002-10-18  [Mower].Script.Cut();
              2002-11-14  [Mower].Script.Cut();
              2002-12-12  [Mower].Script.Cut();
              2003-01-09  [Mower].Script.Cut();
              2003-02-11  [Mower].Script.Cut();
              2003-03-23  [Mower].Script.Cut();
              2003-05-05  [Mower].Script.Cut();
              2003-06-13  [Mower].Script.Cut();
              2003-09-18  [Mower].Script.Cut();
              2003-10-19  [Mower].Script.Cut();
              2003-11-13  [Mower].Script.Cut();
              2003-12-13  [Mower].Script.Cut();
              2004-01-08  [Mower].Script.Cut();
              2004-02-08  [Mower].Script.Cut();
              2004-03-20  [Mower].Script.Cut();
              2004-05-03  [Mower].Script.Cut();
              2004-06-12  [Mower].Script.Cut();
              2004-10-03  [Mower].Script.Cut();
          Factor SS: Specifications=[Cutting]
            Operations Cutting
              2001-01-24  [Mower].Script.Cut();
              2001-03-07  [Mower].Script.Cut();
              2001-05-02  [Mower].Script.Cut();
              2001-07-04  [Mower].Script.Cut();
              2001-09-29  [Mower].Script.Cut();
              2001-11-14  [Mower].Script.Cut();
              2001-12-21  [Mower].Script.Cut();
              2002-01-31  [Mower].Script.Cut();
              2002-04-04  [Mower].Script.Cut();
              2002-06-14  [Mower].Script.Cut();
              2002-09-14  [Mower].Script.Cut();
              2002-10-14  [Mower].Script.Cut();
              2002-11-09  [Mower].Script.Cut();
              2002-12-07  [Mower].Script.Cut();
              2003-01-04  [Mower].Script.Cut();
              2003-02-06  [Mower].Script.Cut();
              2003-03-03  [Mower].Script.Cut();
              2003-04-01  [Mower].Script.Cut();
              2003-05-02  [Mower].Script.Cut();
              2003-06-11  [Mower].Script.Cut();
              2003-09-14  [Mower].Script.Cut();
              2003-10-16  [Mower].Script.Cut();
              2003-11-12  [Mower].Script.Cut();
              2003-12-12  [Mower].Script.Cut();
              2004-01-04  [Mower].Script.Cut();
              2004-02-03  [Mower].Script.Cut();
              2004-03-03  [Mower].Script.Cut();
              2004-03-30  [Mower].Script.Cut();
              2004-04-28  [Mower].Script.Cut();
              2004-06-09  [Mower].Script.Cut();
              2004-10-04  [Mower].Script.Cut();
          Factor LS: Specifications=[Cutting]
            Operations Cutting
              2001-01-24  [Mower].Script.Cut();
              2001-03-07  [Mower].Script.Cut();
              2001-05-02  [Mower].Script.Cut();
              2001-07-04  [Mower].Script.Cut();
              2001-09-29  [Mower].Script.Cut();
              2001-11-14  [Mower].Script.Cut();
              2001-12-21  [Mower].Script.Cut();
              2002-01-31  [Mower].Script.Cut();
              2002-04-04  [Mower].Script.Cut();
              2002-06-14  [Mower].Script.Cut();
              2002-10-06  [Mower].Script.Cut();
              2002-11-17  [Mower].Script.Cut();
              2002-12-28  [Mower].Script.Cut();
              2003-02-11  [Mower].Script.Cut();
              2003-03-08  [Mower].Script.Cut();
              2003-04-05  [Mower].Script.Cut();
              2003-05-05  [Mower].Script.Cut();
              2003-06-13  [Mower].Script.Cut();
              2003-10-06  [Mower].Script.Cut();
              2003-11-13  [Mower].Script.Cut();
              2003-12-29  [Mower].Script.Cut();
              2004-02-08  [Mower].Script.Cut();
              2004-03-07  [Mower].Script.Cut();
              2004-04-04  [Mower].Script.Cut();
              2004-05-03  [Mower].Script.Cut();
              2004-06-12  [Mower].Script.Cut();
              2004-10-03  [Mower].Script.Cut();
      Simulation Simulation2
        Clock: StartDate=2000-10-24; EndDate=2004-10-31
        Summary summaryfile
        Weather: FileName=%root%\Examples\WeatherFiles\lincoln.met
        SoilArbitrator Soil Arbitrator
        Zone paddock: Area=1; Slope=0
          MicroClimate: a_interception=0; b_interception=1; c_interception=0; d_interception=0; soil_albedo=0.23; SoilHeatFluxFraction=0.4; NightInterceptionFraction=0.5; ReferenceHeight=2
          Irrigation
          Fertiliser
          Manager DiagnosticsVariables: same as New Zealand.Iversen_8.Simulation1.paddock.DiagnosticsVariables
          SurfaceOrganicMatter surface organic matter: InitialResidueName=wheat; InitialResidueType=wheat; InitialResidueMass=0; InitialStandingFraction=0; InitialCPR=0; InitialCNR=80; FractionFaecesAdded=0.5
          Report: EventNames=[Clock].DoReport
            VariableNames:
              [Clock].Today
              [DiagnosticsVariables].Script.AccumPlantN
              [DiagnosticsVariables].Script.AccumMineralisation
              [DiagnosticsVariables].Script.AccumDenit
              [DiagnosticsVariables].Script.AccumFert
              [DiagnosticsVariables].Script.AccumLeach
              [DiagnosticsVariables].Script.AccumDetach
              [DiagnosticsVariables].Script.DeltaSoilOMN
              [DiagnosticsVariables].Script.DeltaSurfaceOMN
              [DiagnosticsVariables].Script.DeltaSoilMineralN
              [Lucerne].Root.NSupply
              [Soil].SoilWater.Eo
              [Soil].SoilWater.Es
              [DiagnosticsVariables].Script.SWC as SWC
              [DiagnosticsVariables].Script.DUL
              [Soil].SoilWater.Drainage
              [Soil].SoilWater.Runoff
              [DiagnosticsVariables].Script.OutFlowLat
              [Soil].SoilWater.pond
              [DiagnosticsVariables].Script.AccumEO
              [DiagnosticsVariables].Script.AccumEP
              [DiagnosticsVariables].Script.AccumES
              [DiagnosticsVariables].Script.AccumDrainage
              [DiagnosticsVariables].Script.AccumRunoff
              [DiagnosticsVariables].Script.AccumRainfall
              [DiagnosticsVariables].Script.AccumIrrigation
              [DiagnosticsVariables].Script.AccumOutflowLat
              [DiagnosticsVariables].Script.SoilWaterDeficit
              [Lucerne].Grain.Live.Wt
              [Lucerne].Shell.Live.Wt
              [Lucerne].Stem.Live.Wt as StemWt
              [Lucerne].Stem.Live.Wt
              [Lucerne].Grain.Live.N
              [Lucerne].Shell.Live.N
              [Lucerne].Leaf.Live.Wt as LeafWt
              [Lucerne].Root.Live.Wt as RootWt
              [Lucerne].Leaf.Live.N
              [Lucerne].Root.Live.N
              [Lucerne].Leaf.Live.NConc
              [Lucerne].Root.Live.NConc
              [Lucerne].Root.WaterSupply
              [Lucerne].Root.WaterUptake
              [Lucerne].Leaf.Transpiration
              [Lucerne].Leaf.WaterDemand
              [Lucerne].Root.Depth
              [Lucerne].Leaf.CoverTotal
              [Lucerne].Leaf.CoverDead
              [Lucerne].Leaf.LAI
              [Lucerne].Leaf.Height
              [Soil].SoilWater.SWmm
              [Soil].NO3N
              [DiagnosticsVariables].Script.SoilNitrogenContent
              [Lucerne].Arbitrator.N.TotalPlantDemand
              [DiagnosticsVariables].Script.FomN
              [DiagnosticsVariables].Script.HumN
              [DiagnosticsVariables].Script.BiomN
              [DiagnosticsVariables].Script.DltNMinRes
              [DiagnosticsVariables].Script.DltNMinTot
              [Lucerne].Leaf.Fw
              [Lucerne].Leaf.Fn
              [Lucerne].Phenology.CurrentPhaseName
              [Lucerne].Phenology.CurrentStageName
              [Lucerne].Phenology.Stage
              [Lucerne].Pod.Wt
              [Lucerne].Pod.N
              [Lucerne].AboveGround.Wt *10 as shootbiomass
              [Lucerne].Shell.PodNumber.Value()
              [Lucerne].Leaf.LAIFunction.Value()
          Manager LucerneSowingRule
            RowSpacing = 150
            SowingDepth = 20
            SowingRate = 480
            CultivarName = Kaituna
            SowingDate = 2000-10-24
            script: same as in New Zealand.Iversen_8.Simulation1.paddock.LucerneSowingRule
          Operations IrrigationEvents
            2000-12-20  [Irrigation].Apply(25);
            2000-12-29  [Irrigation].Apply(30);
            2001-01-28  [Irrigation].Apply(36);
            2001-02-17  [Irrigation].Apply(45);
            2001-03-07  [Irrigation].Apply(55);
            2001-03-30  [Irrigation].Apply(80);
            2001-04-29  [Irrigation].Apply(52);
            2001-10-06  [Irrigation].Apply(70);
            2001-12-06  [Irrigation].Apply(70);
            2001-12-20  [Irrigation].Apply(80);
            2002-09-12  [Irrigation].Apply(42);
            2002-10-11  [Irrigation].Apply(40);
            2002-12-31  [Irrigation].Apply(47);
            2003-01-19  [Irrigation].Apply(40);
            2003-02-12  [Irrigation].Apply(45);
            2003-02-28  [Irrigation].Apply(45);
            2003-03-14  [Irrigation].Apply(50);
            2003-03-27  [Irrigation].Apply(40);
            2003-11-27  [Irrigation].Apply(35);
            2004-01-02  [Irrigation].Apply(40);
            2004-01-14  [Irrigation].Apply(40);
            2004-02-15  [Irrigation].Apply(40);
          Plant Lucerne: CropType=Lucerne
          SoluteManager
          Manager Mower: same as New Zealand.Iversen_9.Simulation0.paddock.Mower
          Operations Cutting
          Soil: Latitude=0; Longitude=0
            Analysis: Thickness=[100, 200, 300, 300, 300, 300]; PH=[6.6, 6.2, 5.7, 5.5, 5.5, 5.5]; PHUnits=Water; BoronUnits=HotWater
            InitialWater Initial water: PercentMethod=EvenlyDistributed; FractionFull=0.998443
            Water
              Thickness  BD    AirDry  LL15   DUL   SAT
              100        1.26  0.05    0.075  0.35  0.38
              100        1.26  0.06    0.078  0.33  0.38
              100        1.26  0.07    0.07   0.25  0.39
              100        1.44  0.07    0.07   0.25  0.32
              100        1.44  0.069   0.07   0.28  0.3
              100        1.44  0.07    0.07   0.3   0.297
              100        1.57  0.07    0.07   0.25  0.32
              100        1.57  0.07    0.07   0.28  0.34
              100        1.57  0.07    0.07   0.29  0.35
              100        1.58  0.07    0.07   0.31  0.35
              100        1.58  0.07    0.07   0.32  0.35
              100        1.58  0.07    0.07   0.34  0.36
              100        1.58  0.08    0.08   0.32  0.36
              100        1.59  0.078   0.08   0.34  0.36
              100        1.59  0.08    0.08   0.34  0.36
              100        1.59  0.087   0.09   0.34  0.36
              100        1.59  0.09    0.09   0.34  0.36
              100        1.59  0.09    0.09   0.34  0.36
              100        1.59  0.09    0.09   0.34  0.36
              100        1.59  0.08    0.08   0.34  0.36
              100        1.59  0.09    0.09   0.34  0.36
              100        1.59  0.09    0.09   0.34  0.37
              100        1.59  0.09    0.09   0.3   0.38
              SoilCrop LucerneSoil
                LL=[0.19, 0.22, 0.17, 0.17, 0.16, 0.14, 0.1, 0.1, 0.15, 0.18, 0.21, 0.24, 0.24, 0.24, 0.3, 0.27, 0.27, 0.3, 0.32, 0.32, 0.32, 0.31, 0.28]
                KL=[0.06, 0.06, 0.03, 0.03, 0.03, 0.03, 0.03, 0.03, 0.03, 0.03, 0.03, 0.03, 0.03, 0.03, 0.03, 0.03, 0.03, 0.03, 0.03, 0.03, 0.03, 0.03, 0.03]
                XF=[1, 1, 1, 1, 1, 1, 1, 1, 1, 1, 1, 1, 1, 1, 1, 1, 1, 1, 1, 1, 1, 1, 1]
            SoilWater: SummerDate=1-Oct; SummerU=6; SummerCona=3; WinterDate=1-Mar; WinterU=5; WinterCona=2.5; DiffusConst=0; DiffusSlope=0; Salb=0.13; CN2Bare=0; CNRed=0; CNCov=0.8; max_pond=0; Thickness=[100, 200, 300, 300, 300, 300]; SWCON=[0.55, 0.55, 0.55, 0.55, 0.55, 0.55]; ResidueInterception=0
            SoilNitrogen: fom_type=[default, manure, mucuna, lablab, shemp, stable]; fract_carb=[0.2, 0.3, 0.54, 0.57, 0.45, 0]; fract_cell=[0.7, 0.3, 0.37, 0.37, 0.47, 0.1]; fract_lign=[0.1, 0.4, 0.09, 0.06, 0.08, 0.9]
            SoilOrganicMatter: same as New Zealand.Iversen_8.Simulation1.paddock.Soil.SoilOrganicMatter
            Sample: NO3Units=kgha; NH4Units=ppm; SWUnits=Volumetric; OCUnits=Total; PHUnits=Water
              Thickness  NO3  NH4
              100        217  0
              200        30   0
              300        5    0
              300        5    0
              300        0    0
              300        0    0
            CERESSoilTemperature
    Experiment Iversen_12
      Factors
        Factor SowingDate
          Factor SD1
            Specifications:
              [LucerneSowingRule].Script.SowingDate = 2010-10-04
              [Cutting]
              [Clock].StartDate = 2010-10-04
            Operations Cutting
              2010-12-29  [Mower].Script.Cut();
              2011-02-09  [Mower].Script.Cut();
              2011-04-21  [Mower].Script.Cut();
              2011-06-20  [Mower].Script.Cut();
              2011-10-12  [Mower].Script.Cut();
              2011-11-18  [Mower].Script.Cut();
              2011-12-21  [Mower].Script.Cut();
              2012-01-27  [Mower].Script.Cut();
              2012-03-16  [Mower].Script.Cut();
              2012-05-02  [Mower].Script.Cut();
              2012-07-11  [Mower].Script.Cut();
          Factor SD2
            Specifications:
              [LucerneSowingRule].Script.SowingDate = 2010-11-04
              [Cutting]
              [Clock].StartDate = 2010-11-04
            Operations Cutting
              2011-01-18  [Mower].Script.Cut();
              2011-03-11  [Mower].Script.Cut();
              2011-05-14  [Mower].Script.Cut();
              2011-06-20  [Mower].Script.Cut();
              2011-10-12  [Mower].Script.Cut();
              2011-11-18  [Mower].Script.Cut();
              2011-12-21  [Mower].Script.Cut();
              2012-01-27  [Mower].Script.Cut();
              2012-03-16  [Mower].Script.Cut();
              2012-05-02  [Mower].Script.Cut();
          Factor SD3
            Specifications:
              [LucerneSowingRule].Script.SowingDate = 2010-12-02
              [Cutting]
              [Clock].StartDate = 2010-12-02
            Operations Cutting
              2011-02-16  [Mower].Script.Cut();
              2011-04-21  [Mower].Script.Cut();
              2011-06-20  [Mower].Script.Cut();
              2011-10-12  [Mower].Script.Cut();
              2011-11-18  [Mower].Script.Cut();
              2011-12-21  [Mower].Script.Cut();
              2012-01-27  [Mower].Script.Cut();
              2012-03-16  [Mower].Script.Cut();
              2012-05-02  [Mower].Script.Cut();
          Factor SD4
            Specifications:
              [LucerneSowingRule].Script.SowingDate = 2011-01-10
              [Cutting]
              [Clock].StartDate = 2011-01-10
            Operations Cutting
              2011-05-06  [Mower].Script.Cut();
              2011-06-20  [Mower].Script.Cut();
              2011-10-12  [Mower].Script.Cut();
              2011-11-18  [Mower].Script.Cut();
              2011-12-21  [Mower].Script.Cut();
              2012-01-27  [Mower].Script.Cut();
              2012-03-16  [Mower].Script.Cut();
              2012-05-02  [Mower].Script.Cut();
          Factor SD5
            Specifications:
              [LucerneSowingRule].Script.SowingDate = 2011-02-07
              [Cutting]
              [Clock].StartDate = 2011-02-7
            Operations Cutting
              2011-05-18  [Mower].Script.Cut();
              2011-06-20  [Mower].Script.Cut();
              2011-10-12  [Mower].Script.Cut();
              2011-11-18  [Mower].Script.Cut();
              2011-12-21  [Mower].Script.Cut();
              2012-01-27  [Mower].Script.Cut();
              2012-03-16  [Mower].Script.Cut();
              2012-05-02  [Mower].Script.Cut();
          Factor SD6
            Specifications:
              [LucerneSowingRule].Script.SowingDate = 2011-10-10
              [Cutting]
              [Clock].StartDate = 2011-10-10
            Operations Cutting
              2012-01-05  [Mower].Script.Cut();
              2012-02-22  [Mower].Script.Cut();
              2012-04-05  [Mower].Script.Cut();
              2012-06-21  [Mower].Script.Cut();
          Factor SD7
            Specifications:
              [LucerneSowingRule].Script.SowingDate = 2011-11-07
              [Cutting]
              [Clock].StartDate = 2011-11-07
            Operations Cutting
              2012-01-26  [Mower].Script.Cut();
              2012-03-13  [Mower].Script.Cut();
              2012-05-03  [Mower].Script.Cut();
          Factor SD8
            Specifications:
              [LucerneSowingRule].Script.SowingDate = 2011-12-09
              [Cutting]
              [Clock].StartDate = 2011-12-09
            Operations Cutting
              2012-02-28  [Mower].Script.Cut();
              2012-04-12  [Mower].Script.Cut();
          Factor SD9
            Specifications:
              [LucerneSowingRule].Script.SowingDate = 2012-01-10
              [Cutting]
              [Clock].StartDate = 2012-01-10
            Operations Cutting
              2012-04-26  [Mower].Script.Cut();
          Factor SD10
            Specifications:
              [LucerneSowingRule].Script.SowingDate = 2012-02-17
              [Cutting]
              [Clock].StartDate = 2012-02-17
            Operations Cutting
      Simulation Simulation3
        Clock: StartDate=2010-09-27; EndDate=2012-07-12
        Summary summaryfile
        Weather: FileName=%root%\Examples\WeatherFiles\lincoln.met
        SoilArbitrator Soil Arbitrator
        Zone paddock: Area=1; Slope=0
          MicroClimate: a_interception=0; b_interception=1; c_interception=0; d_interception=0; soil_albedo=0.23; SoilHeatFluxFraction=0.4; NightInterceptionFraction=0.5; ReferenceHeight=2
          Irrigation
          Fertiliser
          Manager DiagnosticsVariables: same as New Zealand.Iversen_8.Simulation1.paddock.DiagnosticsVariables
          SurfaceOrganicMatter surface organic matter: InitialResidueName=wheat; InitialResidueType=wheat; InitialResidueMass=0; InitialStandingFraction=0; InitialCPR=0; InitialCNR=80; FractionFaecesAdded=0.5
          Report: EventNames=[Clock].DoReport
            VariableNames:
              [Clock].Today
              [DiagnosticsVariables].Script.AccumPlantN
              [DiagnosticsVariables].Script.AccumMineralisation
              [DiagnosticsVariables].Script.AccumDenit
              [DiagnosticsVariables].Script.AccumFert
              [DiagnosticsVariables].Script.AccumLeach
              [DiagnosticsVariables].Script.AccumDetach
              [DiagnosticsVariables].Script.DeltaSoilOMN
              [DiagnosticsVariables].Script.DeltaSurfaceOMN
              [DiagnosticsVariables].Script.DeltaSoilMineralN
              [Lucerne].Root.NSupply
              [Soil].SoilWater.Eo
              [Soil].SoilWater.Es
              [DiagnosticsVariables].Script.SWC
              [DiagnosticsVariables].Script.DUL
              [Soil].SoilWater.Drainage
              [Soil].SoilWater.Runoff
              [DiagnosticsVariables].Script.OutFlowLat
              [Soil].SoilWater.pond
              [DiagnosticsVariables].Script.AccumEO
              [DiagnosticsVariables].Script.AccumEP
              [DiagnosticsVariables].Script.AccumES
              [DiagnosticsVariables].Script.AccumDrainage
              [DiagnosticsVariables].Script.AccumRunoff
              [DiagnosticsVariables].Script.AccumRainfall
              [DiagnosticsVariables].Script.AccumIrrigation
              [DiagnosticsVariables].Script.AccumOutflowLat
              [DiagnosticsVariables].Script.SoilWaterDeficit
              [Lucerne].Grain.Live.Wt
              [Lucerne].Shell.Live.Wt
              [Lucerne].Stem.Live.Wt
              [Lucerne].Stem.Live.Wt
              [Lucerne].Grain.Live.N
              [Lucerne].Shell.Live.N
              [Lucerne].Leaf.Live.Wt
              [Lucerne].Root.Live.Wt
              [Lucerne].Leaf.Live.N
              [Lucerne].Root.Live.N
              [Lucerne].Leaf.Live.NConc
              [Lucerne].Root.Live.NConc
              [Lucerne].Root.WaterSupply
              [Lucerne].Root.WaterUptake
              [Lucerne].Leaf.Transpiration
              [Lucerne].Leaf.WaterDemand
              [Lucerne].Root.Depth
              [Lucerne].Leaf.CoverTotal
              [Lucerne].Leaf.CoverDead
              [Lucerne].Leaf.LAI
              [Lucerne].Leaf.Height
              [Soil].SoilWater.SWmm
              [Soil].NO3N
              [DiagnosticsVariables].Script.SoilNitrogenContent
              [Lucerne].Arbitrator.N.TotalPlantDemand
              [DiagnosticsVariables].Script.FomN
              [DiagnosticsVariables].Script.HumN
              [DiagnosticsVariables].Script.BiomN
              [DiagnosticsVariables].Script.DltNMinRes
              [DiagnosticsVariables].Script.DltNMinTot
              [Lucerne].Leaf.Fw
              [Lucerne].Leaf.Fn
              [Lucerne].Phenology.CurrentPhaseName
              [Lucerne].Phenology.CurrentStageName
              [Lucerne].Phenology.Stage
              [Lucerne].Pod.Wt
              [Lucerne].Pod.N
              [Lucerne].AboveGround.Wt *10 as shootbiomass
              [Lucerne].Shell.PodNumber.Value()
              [Lucerne].Leaf.LAIFunction.Value()
          Manager LucerneSowingRule: same as New Zealand.Iversen_9.Simulation0.paddock.LucerneSowingRule
          Operations IrrigationEvents
          Plant Lucerne: CropType=Lucerne
          SoluteManager
          Manager Mower: same as New Zealand.Iversen_9.Simulation0.paddock.Mower
          Operations Cutting
          Soil: Latitude=0; Longitude=0
            Analysis: Thickness=[100, 200, 300, 300, 300, 300]; PH=[6.6, 6.2, 5.7, 5.5, 5.5, 5.5]; PHUnits=Water; BoronUnits=HotWater
            InitialWater Initial water: PercentMethod=EvenlyDistributed; FractionFull=0.998443
            Water: same as New Zealand.Iversen_8.Simulation1.paddock.Soil.Water
            SoilWater: same as New Zealand.Iversen_91.Simulation2.paddock.Soil.SoilWater
            SoilNitrogen: fom_type=[default, manure, mucuna, lablab, shemp, stable]; fract_carb=[0.2, 0.3, 0.54, 0.57, 0.45, 0]; fract_cell=[0.7, 0.3, 0.37, 0.37, 0.47, 0.1]; fract_lign=[0.1, 0.4, 0.09, 0.06, 0.08, 0.9]
            SoilOrganicMatter: same as New Zealand.Iversen_8.Simulation1.paddock.Soil.SoilOrganicMatter
            Sample: NO3Units=kgha; NH4Units=ppm; SWUnits=Volumetric; OCUnits=Total; PHUnits=Water
              Thickness  NO3  NH4
              100        217  0
              200        30   0
              300        5    0
              300        5    0
              300        0    0
              300        0    0
            CERESSoilTemperature
    Experiment AshleyDene
      Factors
        Factor SowingDate
          Factor SD1
            Specifications:
              [LucerneSowingRule].Script.SowingDate = 2010-10-21
              [Cutting]
              [Clock].StartDate = 2010-10-21
            Operations Cutting
              2011-01-25  [Mower].Script.Cut();
              2011-04-08  [Mower].Script.Cut();
              2011-06-20  [Mower].Script.Cut();
              2011-11-03  [Mower].Script.Cut();
              2011-12-23  [Mower].Script.Cut();
              2012-03-04  [Mower].Script.Cut();
              2012-04-25  [Mower].Script.Cut();
          Factor SD2
            Specifications:
              [LucerneSowingRule].Script.SowingDate = 2010-11-09
              [Cutting]
              [Clock].StartDate = 2010-11-09
            Operations Cutting
              2011-02-18  [Mower].Script.Cut();
              2011-05-04  [Mower].Script.Cut();
              2011-06-20  [Mower].Script.Cut();
              2011-11-04  [Mower].Script.Cut();
              2011-12-23  [Mower].Script.Cut();
              2012-03-04  [Mower].Script.Cut();
              2012-04-25  [Mower].Script.Cut();
          Factor SD3
            Specifications:
              [LucerneSowingRule].Script.SowingDate = 2010-12-08
              [Cutting]
              [Clock].StartDate = 2010-12-08
            Operations Cutting
              2011-04-02  [Mower].Script.Cut();
              2011-06-20  [Mower].Script.Cut();
              2011-11-04  [Mower].Script.Cut();
              2011-12-23  [Mower].Script.Cut();
              2012-03-04  [Mower].Script.Cut();
              2012-04-25  [Mower].Script.Cut();
          Factor SD4
            Specifications:
              [LucerneSowingRule].Script.SowingDate = 2011-01-13
              [Cutting]
              [Clock].StartDate = 2011-01-13
            Operations Cutting
              2011-05-05  [Mower].Script.Cut();
              2011-06-20  [Mower].Script.Cut();
              2011-11-03  [Mower].Script.Cut();
              2011-12-23  [Mower].Script.Cut();
              2012-03-04  [Mower].Script.Cut();
              2012-04-25  [Mower].Script.Cut();
          Factor SD5
            Specifications:
              [LucerneSowingRule].Script.SowingDate = 2011-02-03
              [Cutting]
              [Clock].StartDate = 2011-02-03
            Operations Cutting
              2011-06-20  [Mower].Script.Cut();
              2011-11-03  [Mower].Script.Cut();
              2011-12-23  [Mower].Script.Cut();
              2012-03-04  [Mower].Script.Cut();
              2012-04-25  [Mower].Script.Cut();
          Factor SD6
            Specifications:
              [LucerneSowingRule].Script.SowingDate = 2011-10-10
              [Cutting]
              [Clock].StartDate = 2011-10-10
            Operations Cutting
              2012-01-23  [Mower].Script.Cut();
              2012-03-04  [Mower].Script.Cut();
              2012-04-25  [Mower].Script.Cut();
          Factor SD7
            Specifications:
              [LucerneSowingRule].Script.SowingDate = 2011-11-07
              [Cutting]
              [Clock].StartDate = 2011-11-07
            Operations Cutting
              2012-02-08  [Mower].Script.Cut();
              2012-04-25  [Mower].Script.Cut();
          Factor SD8
            Specifications:
              [LucerneSowingRule].Script.SowingDate = 2011-12-09
              [Cutting]
              [Clock].StartDate = 2011-12-09
            Operations Cutting
              2012-03-27  [Mower].Script.Cut();
          Factor SD9
            Specifications:
              [LucerneSowingRule].Script.SowingDate = 2012-01-10
              [Cutting]
              [Clock].StartDate = 2012-01-10
            Operations Cutting
              2012-04-26  [Mower].Script.Cut();
          Factor SD10
            Specifications:
              [LucerneSowingRule].Script.SowingDate = 2012-02-17
              [Cutting]
              [Clock].StartDate = 2012-02-17
            Operations Cutting
      Simulation AshleyDene
        Clock: StartDate=2010-10-03; EndDate=2012-06-13
        Summary summaryfile
        Weather: FileName=Weather_AshleyDene.met
        SoilArbitrator Soil Arbitrator
        Zone paddock: Area=1; Slope=0
          MicroClimate: a_interception=0; b_interception=1; c_interception=0; d_interception=0; soil_albedo=0.23; SoilHeatFluxFraction=0.4; NightInterceptionFraction=0.5; ReferenceHeight=2
          Irrigation
          Fertiliser
          Manager DiagnosticsVariables: same as New Zealand.Iversen_8.Simulation1.paddock.DiagnosticsVariables
          SurfaceOrganicMatter surface organic matter: InitialResidueName=wheat; InitialResidueType=wheat; InitialResidueMass=0; InitialStandingFraction=0; InitialCPR=0; InitialCNR=80; FractionFaecesAdded=0.5
          Report: same as New Zealand.Iversen_12.Simulation3.paddock.Report
          Manager LucerneSowingRule: same as New Zealand.Iversen_9.Simulation0.paddock.LucerneSowingRule
          Operations IrrigationEvents
          Plant Lucerne: CropType=Lucerne
          SoluteManager
          Manager Mower: same as New Zealand.Iversen_9.Simulation0.paddock.Mower
          Operations Cutting
          Soil AshleyDene Lismore very stony silt Loam: SoilType=Udic Haplustept (US), Pallic orthic brown soil (NZ); Site=Ashley Dene: Lincoln University Research Farm; NearestTown=Lincoln; Country=New Zealand; Latitude=999999; Longitude=999999
            Comments=Soil water characterised from NNM (2 years). Stone content and BD  from Di and Cameron 2002. Soil saturation from Cichota 2013.
            Analysis: PHUnits=Water; BoronUnits=HotWater
              Thickness=[200, 100, 100, 100, 100, 100, 100, 100, 100, 100, 100, 100, 100, 100, 100, 100, 100, 100, 100, 100, 100, 100, 999999]
              PH=[6, -, -, -, -, -, -, -, -, -, -, -, -, -, -, -, -, -, -, -, -, -, -]
            Water
              Thickness  BD    AirDry  LL15    DUL     SAT
              200        1.15  0.075   0.075   0.2653  0.2653
              100        1.15  0.0829  0.0829  0.1907  0.1907
              100        1.31  0.0778  0.0778  0.1543  0.1543
              100        1.31  0.0766  0.0766  0.1296  0.1296
              100        1.95  0.0723  0.0723  0.1155  0.1155
              100        1.95  0.0726  0.0726  0.1083  0.1083
              100        1.95  0.0718  0.0718  0.1081  0.1081
              100        1.95  0.0733  0.0733  0.1133  0.1133
              100        1.95  0.0722  0.0722  0.1104  0.1104
              100        1.95  0.0728  0.0728  0.1064  0.1064
              100        1.95  0.0759  0.0759  0.1048  0.1048
              100        1.95  0.0858  0.0858  0.113   0.113
              100        1.95  0.0868  0.0868  0.1139  0.1139
              100        1.95  0.091   0.091   0.1215  0.1215
              100        1.95  0.1     0.1     0.1303  0.1303
              100        1.95  0.1023  0.1023  0.1263  0.1263
              100        1.95  0.0983  0.0983  0.1224  0.1224
              100        1.95  0.0978  0.0978  0.116   0.116
              100        1.95  0.0972  0.0972  0.1132  0.1132
              100        1.95  0.0999  0.0999  0.1094  0.1094
              100        1.95  0.1018  0.1018  0.12    0.12
              100        1.95  0.1069  0.1069  0.1099  0.1099
              SoilCrop LucerneSoil
                LL=[0.075, 0.0829, 0.0778, 0.0766, 0.0723, 0.0726, 0.0718, 0.0733, 0.0722, 0.0728, 0.0759, 0.0858, 0.0868, 0.091, 0.1, 0.1023, 0.0983, 0.0978, 0.0972, 0.0999, 0.1018, 0.1069]
                KL=[0.06, 0.06, 0.049, 0.048, 0.055, 0.05, 0.048, 0.059, 0.076, 0.051, 0.094, 0.069, 0.033, 0.03, 0.043, 0.043, 0.056, 0.061, 0.03, 0.03, 0.03, 0.03]
                XF=[1, 1, 1, 1, 1, 1, 1, 1, 1, 1, 1, 1, 1, 1, 1, 1, 1, 1, 1, 1, 1, 1]
            SoilWater: SummerDate=1-Oct; SummerU=5; SummerCona=4.4; WinterDate=1-Mar; WinterU=5; WinterCona=2.5; DiffusConst=88; DiffusSlope=35.4; Salb=0.18; CN2Bare=68; CNRed=20; CNCov=0.8; max_pond=0; ResidueInterception=0
              Thickness=[200, 100, 100, 100, 100, 100, 100, 100, 100, 100, 100, 100, 100, 100, 100, 100, 100, 100, 100, 100, 100, 100]
              SWCON=[0.99, 0.99, 0.99, 0.99, 0.99, 0.99, 0.99, 0.99, 0.99, 0.99, 0.99, 0.99, 0.99, 0.99, 0.99, 0.99, 0.99, 0.99, 0.99, 0.99, 0.99, 0.99]
            SoilNitrogen: fom_type=[default, manure, mucuna, lablab, shemp, stable]; fract_carb=[0.2, 0.3, 0.54, 0.57, 0.45, 0]; fract_cell=[0.7, 0.3, 0.37, 0.37, 0.47, 0.1]; fract_lign=[0.1, 0.4, 0.09, 0.06, 0.08, 0.9]
            SoilOrganicMatter: RootCN=50; RootWt=1500; SoilCN=14.5; EnrACoeff=7.4; EnrBCoeff=0.2; OCUnits=Total
              Thickness  OC    FBiom  FInert
              200        3.57  0.025  0.45
              100        1.47  0.025  0.6
              100        1.2   0.015  0.75
              100        1.03  0.01   0.9
              100        0.47  0.01   0.96
              100        0.47  0.01   0.96
              100        0.47  0.01   0.96
              100        0.47  0.01   0.96
              100        0.47  0.01   0.96
              100        0.47  0.01   0.96
              100        0.47  0.01   0.96
              100        0.47  0.01   0.96
              100        0.47  0.01   0.96
              100        0.47  0.01   0.96
              100        0.47  0.01   0.96
              100        0.47  0.01   0.96
              100        0.47  0.01   0.96
              100        0.47  0.01   0.96
              100        0.47  0.01   0.96
              100        0.47  0.01   0.96
              100        0.47  0.01   0.96
              100        0.47  0.01   0.96
            Sample Initial nitrogen: NO3Units=ppm; NH4Units=ppm; SWUnits=Volumetric; OCUnits=Total; PHUnits=Water
              Thickness  NO3   NH4
              200        31    8
              100        1.5   0.05
              100        1     0.03
              100        1     0.01
              100        1     0.01
              100        0.7   0.01
              100        0.5   0.01
              100        0.5   0.01
              100        0.5   0.01
              100        0.5   0.01
              100        0.5   0.01
              100        0.5   0.01
              100        0.5   0.01
              100        0.5   0.01
              100        0.5   0.01
              100        0.5   0.01
              100        0.5   0.01
              100        0.05  0.01
              100        0.05  0.01
              100        0.05  0.01
              100        0.05  0.01
              100        0.05  0.01
              -          0.05  0.01
            InitialWater Initial water: PercentMethod=FilledFromTop; FractionFull=0.73
            CERESSoilTemperature
    Experiment Iversen_121
      Factors
        Factor Defoliation
          Factor SS: Specifications=[Cutting]
            Operations Cutting
              2015-01-30  [Mower].Script.Cut();
              2015-02-28  [Mower].Script.Cut();
              2015-03-27  [Mower].Script.Cut();
              2015-04-24  [Mower].Script.Cut();
              2015-05-19  [Mower].Script.Cut();
              2015-07-11  [Mower].Script.Cut();
              2015-09-04  [Mower].Script.Cut();
              2015-10-06  [Mower].Script.Cut();
              2015-11-10  [Mower].Script.Cut();
              2015-12-01  [Mower].Script.Cut();
              2016-01-26  [Mower].Script.Cut();
              2016-02-24  [Mower].Script.Cut();
              2016-03-25  [Mower].Script.Cut();
              2016-04-21  [Mower].Script.Cut();
              2016-05-15  [Mower].Script.Cut();
              2016-07-11  [Mower].Script.Cut();
              2016-09-11  [Mower].Script.Cut();
              2016-10-08  [Mower].Script.Cut();
              2016-11-08  [Mower].Script.Cut();
              2016-12-16  [Mower].Script.Cut();
              2017-01-10  [Mower].Script.Cut();
              2017-01-26  [Mower].Script.Cut();
              2017-02-26  [Mower].Script.Cut();
              2017-03-25  [Mower].Script.Cut();
              2017-05-09  [Mower].Script.Cut();
              2017-07-16  [Mower].Script.Cut();
              2017-08-20  [Mower].Script.Cut();
              2017-09-19  [Mower].Script.Cut();
              2017-10-18  [Mower].Script.Cut();
              2017-11-26  [Mower].Script.Cut();
              2017-12-23  [Mower].Script.Cut();
              2018-01-15  [Mower].Script.Cut();
          Factor LL: Specifications=[Cutting]
            Operations Cutting
              2015-01-29  [Mower].Script.Cut();
              2015-03-11  [Mower].Script.Cut();
              2015-04-26  [Mower].Script.Cut();
              2015-06-11  [Mower].Script.Cut();
              2015-09-04  [Mower].Script.Cut();
              2015-10-21  [Mower].Script.Cut();
              2015-12-08  [Mower].Script.Cut();
              2016-01-13  [Mower].Script.Cut();
              2016-02-25  [Mower].Script.Cut();
              2016-04-07  [Mower].Script.Cut();
              2016-05-20  [Mower].Script.Cut();
              2016-08-26  [Mower].Script.Cut();
              2016-10-07  [Mower].Script.Cut();
              2016-11-24  [Mower].Script.Cut();
              2017-01-25  [Mower].Script.Cut();
              2017-03-12  [Mower].Script.Cut();
              2017-05-09  [Mower].Script.Cut();
              2017-07-16  [Mower].Script.Cut();
              2017-09-03  [Mower].Script.Cut();
              2017-10-18  [Mower].Script.Cut();
              2017-12-03  [Mower].Script.Cut();
              2018-01-16  [Mower].Script.Cut();
          Factor HH: Specifications=[Cutting]
            Operations Cutting
              2015-01-30  [Mower].Script.Cut();
              2015-04-24  [Mower].Script.Cut();
              2015-08-06  [Mower].Script.Cut();
              2015-09-04  [Mower].Script.Cut();
              2015-12-02  [Mower].Script.Cut();
              2016-02-25  [Mower].Script.Cut();
              2016-05-14  [Mower].Script.Cut();
              2016-07-11  [Mower].Script.Cut();
              2016-10-14  [Mower].Script.Cut();
              2017-01-25  [Mower].Script.Cut();
              2017-05-10  [Mower].Script.Cut();
              2017-07-16  [Mower].Script.Cut();
              2017-10-13  [Mower].Script.Cut();
              2018-01-15  [Mower].Script.Cut();
        Factor FD
          Factor FD2: Specifications=[LucerneSowingRule].Script.CultivarName = FD2
          Factor FD5: Specifications=[LucerneSowingRule].Script.CultivarName = FD5
          Factor FD10: Specifications=[LucerneSowingRule].Script.CultivarName = FD10
      Simulation Simulation5
        Clock: StartDate=2014-10-08; EndDate=2018-01-16
        Summary summaryfile
        Weather: FileName=%root%\Examples\WeatherFiles\lincoln.met
        SoilArbitrator Soil Arbitrator
        Zone paddock: Area=1; Slope=0
          MicroClimate: a_interception=0; b_interception=1; c_interception=0; d_interception=0; soil_albedo=0.23; SoilHeatFluxFraction=0.4; NightInterceptionFraction=0.5; ReferenceHeight=2
          Irrigation
          Fertiliser
          Manager DiagnosticsVariables: same as New Zealand.Iversen_8.Simulation1.paddock.DiagnosticsVariables
          SurfaceOrganicMatter surface organic matter: InitialResidueName=wheat; InitialResidueType=wheat; InitialResidueMass=0; InitialStandingFraction=0; InitialCPR=0; InitialCNR=80; FractionFaecesAdded=0.5
          Report: same as New Zealand.Iversen_12.Simulation3.paddock.Report
          Manager LucerneSowingRule
            RowSpacing = 150
            SowingDepth = 20
            SowingRate = 100
            CultivarName = Kaituna
            SowingDate = 2014-10-08
            script: same as in New Zealand.Iversen_8.Simulation1.paddock.LucerneSowingRule
          Operations IrrigationEvents
            2015-01-13  [Irrigation].Apply(26);
            2015-01-14  [Irrigation].Apply(26);
            2015-03-31  [Irrigation].Apply(21);
            2015-04-01  [Irrigation].Apply(21);
            2015-11-03  [Irrigation].Apply(16);
            2015-11-04  [Irrigation].Apply(16);
            2015-12-26  [Irrigation].Apply(20);
            2015-12-27  [Irrigation].Apply(20);
            2016-01-19  [Irrigation].Apply(21);
            2016-01-20  [Irrigation].Apply(21);
            2016-02-09  [Irrigation].Apply(21);
            2016-02-10  [Irrigation].Apply(21);
            2016-05-13  [Irrigation].Apply(40);
            2016-05-14  [Irrigation].Apply(25);
            2017-01-09  [Irrigation].Apply(21);
            2017-01-10  [Irrigation].Apply(21);
            2017-02-20  [Irrigation].Apply(21);
            2017-02-21  [Irrigation].Apply(21);
            2017-11-14  [Irrigation].Apply(40);
            2017-11-15  [Irrigation].Apply(40);
            2017-11-20  [Irrigation].Apply(40);
            2017-11-27  [Irrigation].Apply(20);
            2017-11-28  [Irrigation].Apply(20);
            2017-12-08  [Irrigation].Apply(30);
            2018-01-03  [Irrigation].Apply(20);
            2018-02-15  [Irrigation].Apply(20);
          Plant Lucerne: CropType=Lucerne
          SoluteManager
          Manager Mower: same as New Zealand.Iversen_9.Simulation0.paddock.Mower
          Operations Cutting
          Soil: same as New Zealand.Iversen_12.Simulation3.paddock.Soil
  Folder Australia
    Experiment Hudson
      Factors
        Factor Defoliation: Specifications=[Cutting]
          Operations Cutting
            1995-12-01  [Mower].Script.Cut();
            1996-01-18  [Mower].Script.Cut();
            1996-02-28  [Mower].Script.Cut();
            1996-08-28  [Mower].Script.Cut();
            1996-11-26  [Mower].Script.Cut();
            1997-01-14  [Mower].Script.Cut();
            1997-03-04  [Mower].Script.Cut();
            1997-05-06  [Mower].Script.Cut();
            1997-08-21  [Mower].Script.Cut();
            1997-11-17  [Mower].Script.Cut();
            1997-12-16  [Mower].Script.Cut();
            1998-03-03  [Mower].Script.Cut();
            1998-09-10  [Mower].Script.Cut();
            1998-12-17  [Mower].Script.Cut();
            1999-02-16  [Mower].Script.Cut();
            1999-06-02  [Mower].Script.Cut();
            1999-09-29  [Mower].Script.Cut();
            1999-11-11  [Mower].Script.Cut();
            1999-12-23  [Mower].Script.Cut();
      Simulation P1 Base Simulation
        Clock: StartDate=1994-08-05; EndDate=2000-01-23
        Summary summaryfile
        Weather: FileName=Hudson.met
        SoilArbitrator Soil Arbitrator
        Zone paddock: Area=1; Slope=0
          MicroClimate: a_interception=0; b_interception=1; c_interception=0; d_interception=0; soil_albedo=0.23; SoilHeatFluxFraction=0.4; NightInterceptionFraction=0.5; ReferenceHeight=2
          Irrigation
          Fertiliser
          Manager DiagnosticsVariables: same as New Zealand.Iversen_8.Simulation1.paddock.DiagnosticsVariables
          SurfaceOrganicMatter surface organic matter: InitialResidueName=wheat; InitialResidueType=wheat; InitialResidueMass=0; InitialStandingFraction=0; InitialCPR=0; InitialCNR=80; FractionFaecesAdded=0.5
          Report: EventNames=[Clock].DoReport
            VariableNames:
              [Clock].Today
              [DiagnosticsVariables].Script.AccumPlantN
              [DiagnosticsVariables].Script.AccumMineralisation
              [DiagnosticsVariables].Script.AccumDenit
              [DiagnosticsVariables].Script.AccumFert
              [DiagnosticsVariables].Script.AccumLeach
              [DiagnosticsVariables].Script.AccumDetach
              [DiagnosticsVariables].Script.DeltaSoilOMN
              [DiagnosticsVariables].Script.DeltaSurfaceOMN
              [DiagnosticsVariables].Script.DeltaSoilMineralN
              [Lucerne].Root.NSupply
              [Soil].SoilWater.Eo
              [Soil].SoilWater.Es
              [DiagnosticsVariables].Script.SWC as SWC
              [DiagnosticsVariables].Script.DUL
              [Soil].SoilWater.Drainage
              [Soil].SoilWater.Runoff
              [DiagnosticsVariables].Script.OutFlowLat
              [Soil].
              [Soil].SoilWater.pond
              [DiagnosticsVariables].Script.AccumEO
              [DiagnosticsVariables].Script.AccumEP
              [DiagnosticsVariables].Script.AccumES
              [DiagnosticsVariables].Script.AccumDrainage
              [DiagnosticsVariables].Script.AccumRunoff
              [DiagnosticsVariables].Script.AccumRainfall
              [DiagnosticsVariables].Script.AccumIrrigation
              [DiagnosticsVariables].Script.AccumOutflowLat
              [DiagnosticsVariables].Script.SoilWaterDeficit
              [Lucerne].Grain.Live.Wt
              [Lucerne].Shell.Live.Wt
              [Lucerne].Stem.Live.Wt as StemWt
              [Lucerne].Stem.Live.Wt
              [Lucerne].Grain.Live.N
              [Lucerne].Shell.Live.N
              [Lucerne].Leaf.Live.Wt as LeafWt
              [Lucerne].Root.Live.Wt as RootWt
              [Lucerne].Leaf.Live.N
              [Lucerne].Root.Live.N
              [Lucerne].Leaf.Live.NConc
              [Lucerne].Root.Live.NConc
              [Lucerne].Root.WaterSupply
              [Lucerne].Root.WaterUptake
              [Lucerne].Leaf.Transpiration
              [Lucerne].Leaf.WaterDemand
              [Lucerne].Root.Depth
              [Lucerne].Leaf.CoverTotal
              [Lucerne].Leaf.CoverDead
              [Lucerne].Leaf.LAI
              [Lucerne].Leaf.Height
              [Soil].SoilWater.SWmm
              [Soil].NO3N
              [DiagnosticsVariables].Script.SoilNitrogenContent
              [Lucerne].Arbitrator.N.TotalPlantDemand
              [DiagnosticsVariables].Script.FomN
              [DiagnosticsVariables].Script.HumN
              [DiagnosticsVariables].Script.BiomN
              [DiagnosticsVariables].Script.DltNMinRes
              [DiagnosticsVariables].Script.DltNMinTot
              [Lucerne].Leaf.Fw
              [Lucerne].Leaf.Fn
              [Lucerne].Phenology.CurrentPhaseName
              [Lucerne].Phenology.CurrentStageName
              [Lucerne].Phenology.Stage
              [Lucerne].Pod.Wt
              [Lucerne].Pod.N
              [Lucerne].AboveGround.Wt *10 as shootbiomass
              [Lucerne].Shell.PodNumber.Value()
              [Lucerne].Leaf.LAIFunction.Value()
          Manager LucerneSowingRule
            RowSpacing = 300
            SowingDepth = 40
            SowingRate = 480
            CultivarName = Kaituna
            SowingDate = 1995-06-01
            script: same as in New Zealand.Iversen_8.Simulation1.paddock.LucerneSowingRule
          Operations IrrigationEvents
          Plant Lucerne: CropType=Lucerne
          SoluteManager
          Manager Mower: same as New Zealand.Iversen_9.Simulation0.paddock.Mower
          Operations Cutting
          Soil: Latitude=0; Longitude=0
            Water
              Thickness  BD   AirDry  LL15  DUL   SAT
              100        1    0.1     0.24  0.47  0.53
              200        1.1  0.1     0.28  0.53  0.57
              200        1.1  0.1     0.28  0.52  0.57
              200        1.1  0.1     0.29  0.52  0.55
              200        1.1  0.1     0.29  0.51  0.54
              200        1.2  0.1     0.29  0.5   0.53
              200        1.2  0.1     0.29  0.5   0.53
              200        1.2  0.1     0.33  0.48  0.51
              200        1.2  0.1     0.33  0.48  0.51
              200        1.2  0.1     0.35  0.48  0.51
              200        1.2  0.1     0.35  0.47  0.5
              200        1.2  0.1     0.35  0.45  0.48
              200        1.3  0.1     0.35  0.45  0.48
              200        1.3  0.1     0.35  0.45  0.48
              200        1.3  0.1     0.35  0.45  0.48
              200        1.3  0.1     0.35  0.45  0.48
              SoilCrop LucerneSoil
                LL=[0.25, 0.28, 0.28, 0.29, 0.29, 0.29, 0.29, 0.33, 0.33, 0.35, 0.35, 0.35, 0.35, 0.37, 0.37, 0.37]
                KL=[0.08, 0.08, 0.08, 0.06, 0.06, 0.03, 0.03, 0.03, 0.03, 0.03, 0.02, 0.02, 0.02, 0.02, 0.02, 0.02]
                XF=[1, 1, 1, 1, 1, 1, 1, 1, 1, 1, 1, 1, 1, 1, 1, 1]
            SoilWater: SummerDate=1-Nov; SummerU=9; SummerCona=5; WinterDate=1-Apr; WinterU=9; WinterCona=5; DiffusConst=40; DiffusSlope=16; Salb=0.13; CN2Bare=72; CNRed=20; CNCov=0.8; max_pond=0; ResidueInterception=0
              Thickness=[100, 200, 200, 200, 200, 200, 200, 200, 200, 200, 200, 200, 200, 200, 200, 200]
              SWCON=[0.4, 0.4, 0.4, 0.4, 0.4, 0.4, 0.4, 0.4, 0.4, 0.4, 0.4, 0.4, 0.4, 0.4, 0.4, 0.4]
            SoilNitrogen: fom_type=[default, manure, mucuna, lablab, shemp, stable]; fract_carb=[0.2, 0.3, 0.54, 0.57, 0.45, 0]; fract_cell=[0.7, 0.3, 0.37, 0.37, 0.47, 0.1]; fract_lign=[0.1, 0.4, 0.09, 0.06, 0.08, 0.9]
            SoilOrganicMatter: RootCN=40; RootWt=10; SoilCN=14.5; EnrACoeff=7.4; EnrBCoeff=0.2; OCUnits=Total
              Thickness  OC    FBiom  FInert
              100        1.4   0.03   0.45
              200        1.4   0.03   0.45
              200        1.4   0.02   0.6
              200        1.35  0.015  0.7
              200        0.95  0.01   0.85
              200        1     0.01   0.9
              200        0.8   0.01   0.99
              200        0.45  0.01   0.99
              200        0.45  0.01   0.99
              200        0.45  0.01   0.99
              200        0.45  0.01   0.99
              200        0.45  0.01   0.99
              200        0.45  0.01   0.99
              200        0.45  0.01   0.99
              200        0.45  0.01   0.99
              200        0.45  0.01   0.99
            Analysis: PH=[6, 6.4, 6.8, 7.2, 7.6, 8, 8, 8, 8, 8, 8, 8, 8, 8, 8, 8]; PHUnits=Water; BoronUnits=HotWater
              Thickness=[100, 200, 200, 200, 200, 200, 200, 200, 200, 200, 200, 200, 200, 200, 200, 200]
            Sample Initial nitrogen: NO3Units=ppm; NH4Units=ppm; SWUnits=Volumetric; OCUnits=Total; PHUnits=Water
              Thickness  NO3   NH4
              100        10.7  0.3
              200        9.99  0.3
              200        7.87  0.3
              200        6.2   0.3
              200        4.85  0.3
              200        3.56  0.3
              200        2.72  0.3
              200        2.34  0.3
              200        2.47  0.3
              200        3.24  0.3
              200        4.25  0.3
              200        4.94  0.3
              200        5.2   0.3
              200        4.95  0.3
              200        4.52  0.3
              200        4.24  0.3
            Sample Initial water: NO3Units=ppm; NH4Units=ppm; SWUnits=Volumetric; OCUnits=Total; PHUnits=Water
              Thickness=[100, 200, 200, 200, 200, 200, 200, 200, 200, 200, 200, 200, 200, 200, 200, 200]
              SW=[0.46, 0.46, 0.53, 0.51, 0.48, 0.46, 0.45, 0.45, 0.45, 0.44, 0.42, 0.42, 0.43, 0.44, 0.42, 0.42]
            CERESSoilTemperature
            OutputLayers: Thickness=[100, 400, 400, 400, 400, 400, 400, 600]
          Report RunoffReport: EventNames=[Clock].DoReport
            VariableNames:
              [Clock].Today
              Sum of [Soil].SoilWater.Runoff from 15-Feb to 01-Jan as AcmRunoff
    Experiment Nekia
      Factors
        Factor Defoliation: Specifications=[Cutting]
          Operations Cutting
            1999-10-22  [Mower].Script.Cut();
            1999-12-03  [Mower].Script.Cut();
            2000-01-13  [Mower].Script.Cut();
            2000-04-19  [Mower].Script.Cut();
            2000-10-04  [Mower].Script.Cut();
            2000-11-15  [Mower].Script.Cut();
            2000-12-26  [Mower].Script.Cut();
            2001-02-09  [Mower].Script.Cut();
            2001-04-20  [Mower].Script.Cut();
            2001-06-01  [Mower].Script.Cut();
            2001-11-01  [Mower].Script.Cut();
            2001-12-14  [Mower].Script.Cut();
            2002-01-25  [Mower].Script.Cut();
            2002-03-28  [Mower].Script.Cut();
      Simulation Base Simulation
        Clock: StartDate=1999-08-01; EndDate=2002-07-15
        Summary summaryfile
        Weather: FileName=Nekia.met
        SoilArbitrator Soil Arbitrator
        Zone paddock: Area=1; Slope=0
          MicroClimate: a_interception=0; b_interception=1; c_interception=0; d_interception=0; soil_albedo=0.23; SoilHeatFluxFraction=0.4; NightInterceptionFraction=0.5; ReferenceHeight=2
          Irrigation
          Fertiliser
          Manager DiagnosticsVariables: same as New Zealand.Iversen_8.Simulation1.paddock.DiagnosticsVariables
          SurfaceOrganicMatter surface organic matter: InitialResidueName=wheat; InitialResidueType=wheat; InitialResidueMass=0; InitialStandingFraction=0; InitialCPR=0; InitialCNR=80; FractionFaecesAdded=0.5
          Report: same as Australia.Hudson.P1 Base Simulation.paddock.Report
          Manager LucerneSowingRule
            RowSpacing = 300
            SowingDepth = 40
            SowingRate = 480
            CultivarName = Kaituna
            SowingDate = 1999-08-01
            script: same as in New Zealand.Iversen_8.Simulation1.paddock.LucerneSowingRule
          Operations IrrigationEvents
          Plant Lucerne: CropType=Lucerne
          SoluteManager
          Manager Mower: same as New Zealand.Iversen_9.Simulation0.paddock.Mower
          Operations Cutting
          Soil: Latitude=0; Longitude=0
            Water
              Thickness  BD   AirDry  LL15  DUL   SAT
              100        1    0.16    0.2   0.35  0.45
              200        1.1  0.1     0.2   0.4   0.45
              200        1.1  0.1     0.22  0.45  0.48
              200        1.1  0.1     0.22  0.45  0.48
              200        1.1  0.1     0.23  0.45  0.45
              200        1.2  0.1     0.27  0.45  0.45
              200        1.2  0.1     0.28  0.4   0.45
              200        1.2  0.1     0.3   0.36  0.45
              200        1.2  0.1     0.31  0.37  0.45
              200        1.2  0.1     0.32  0.38  0.41
              200        1.2  0.1     0.32  0.38  0.4
              200        1.2  0.1     0.31  0.36  0.4
              200        1.3  0.1     0.29  0.34  0.39
              200        1.3  0.1     0.27  0.34  0.37
              200        1.3  0.1     0.27  0.34  0.37
              200        1.3  0.1     0.27  0.34  0.36
              200        1.3  0.1     0.27  0.35  0.36
              200        1.3  0.1     0.27  0.35  0.36
              200        1.3  0.1     0.27  0.38  0.4
              200        1.3  0.1     0.27  0.4   0.42
              200        1.3  0.1     0.27  0.4   0.41
              200        1.3  0.1     0.27  0.35  0.4
              SoilCrop LucerneSoil
                LL=[0.2, 0.15, 0.21, 0.24, 0.26, 0.28, 0.29, 0.31, 0.32, 0.33, 0.32, 0.3, 0.29, 0.28, 0.27, 0.29, 0.27, 0.32, 0.33, 0.32, 0.33, 0.25]
                KL=[0.06, 0.06, 0.06, 0.04, 0.04, 0.02, 0.02, 0.02, 0.02, 0.02, 0.01, 0.01, 0.01, 0.01, 0.01, 0.01, 0.01, 0.01, 0.01, 0.01, 0.01, 0.01]
                XF=[1, 1, 1, 1, 1, 1, 1, 1, 1, 1, 1, 1, 1, 1, 1, 1, 1, 1, 1, 1, 1, 1]
            SoilWater: SummerDate=1-Nov; SummerU=9; SummerCona=5; WinterDate=1-Apr; WinterU=9; WinterCona=5; DiffusConst=40; DiffusSlope=16; Salb=0.13; CN2Bare=80; CNRed=20; CNCov=0.8; max_pond=0; ResidueInterception=0
              Thickness=[100, 200, 200, 200, 200, 200, 200, 200, 200, 200, 200, 200, 200, 200, 200, 200]
              SWCON=[0.4, 0.4, 0.4, 0.4, 0.4, 0.4, 0.4, 0.4, 0.4, 0.4, 0.4, 0.4, 0.4, 0.4, 0.4, 0.4]
            SoilNitrogen: fom_type=[default, manure, mucuna, lablab, shemp, stable]; fract_carb=[0.2, 0.3, 0.54, 0.57, 0.45, 0]; fract_cell=[0.7, 0.3, 0.37, 0.37, 0.47, 0.1]; fract_lign=[0.1, 0.4, 0.09, 0.06, 0.08, 0.9]
            SoilOrganicMatter: RootCN=40; RootWt=10; SoilCN=14.5; EnrACoeff=7.4; EnrBCoeff=0.2; OCUnits=Total
              Thickness  OC    FBiom  FInert
              100        1.83  0.03   0.45
              200        1.35  0.03   0.45
              200        1.19  0.02   0.6
              200        1.11  0.015  0.7
              200        0.97  0.01   0.85
              200        0.8   0.01   0.9
              200        0.64  0.01   0.99
              200        0.5   0.01   0.99
              200        0.38  0.01   0.99
              200        0.27  0.01   0.99
              200        0.27  0.01   0.99
              200        0.27  0.01   0.99
              200        0.27  0.01   0.99
              200        0.27  0.01   0.99
              200        0.27  0.01   0.99
              200        0.27  0.01   0.99
            Analysis: PH=[6, 6.4, 6.8, 7.2, 7.6, 8, 8, 8, 8, 8, 8, 8, 8, 8, 8, 8]; PHUnits=Water; BoronUnits=HotWater
              Thickness=[100, 200, 200, 200, 200, 200, 200, 200, 200, 200, 200, 200, 200, 200, 200, 200]
            Sample Initial nitrogen: NO3Units=ppm; NH4Units=ppm; SWUnits=Volumetric; OCUnits=Total; PHUnits=Water
              Thickness  NO3  NH4
              100        10   0.3
              200        10   0.3
              200        10   0.3
              200        10   0.3
              200        10   0.3
              200        5    0.3
              200        5    0.3
              200        5    0.3
              200        5    0.3
              200        5    0.3
              200        5    0.3
              200        5    0.3
              200        5    0.3
              200        5    0.3
              200        5    0.3
              200        5    0.3
              200        -    -
              200        -    -
              200        -    -
              200        -    -
              200        -    -
              200        -    -
              200        -    -
            Sample Initial water: NO3Units=ppm; NH4Units=ppm; SWUnits=Volumetric; OCUnits=Total; PHUnits=Water
              Thickness=[100, 200, 200, 200, 200, 200, 200, 200, 200, 200, 200, 200, 200, 200, 200, 200, 200, 200, 200, 200, 200, 200, 200]
              SW=[0.26, 0.26, 0.26, 0.26, 0.26, 0.28, 0.3, 0.32, 0.32, 0.33, 0.33, 0.31, 0.29, 0.27, 0.27, 0.27, 0.28, 0.29, 0.32, 0.33, 0.36, 0.3, 0.21]
            CERESSoilTemperature
            OutputLayers
              Thickness=[100, 200, 200, 200, 200, 200, 200, 200, 200, 200, 200, 200, 200, 200, 200, 200, 200, 200, 200, 200, 200, 200, 200]
    Experiment Gatton
      Factors
        Factor Defoliation: Specifications=[Cutting]
          Operations Cutting
            1994-09-12  [Mower].Script.Cut();
            1994-10-17  [Mower].Script.Cut();
            1994-11-16  [Mower].Script.Cut();
            1994-12-14  [Mower].Script.Cut();
            1995-01-09  [Mower].Script.Cut();
            1995-02-21  [Mower].Script.Cut();
            1995-03-28  [Mower].Script.Cut();
            1995-05-23  [Mower].Script.Cut();
            1995-07-13  [Mower].Script.Cut();
            1995-09-01  [Mower].Script.Cut();
            1995-10-10  [Mower].Script.Cut();
            1995-11-09  [Mower].Script.Cut();
      Simulation 1994_95 Hunter River
        Clock: StartDate=1994-05-05; EndDate=1995-11-09
        Summary summaryfile
        Weather: FileName=gat9495i.met
        SoilArbitrator Soil Arbitrator
        Zone paddock: Area=1; Slope=0
          MicroClimate: a_interception=0; b_interception=1; c_interception=0; d_interception=0; soil_albedo=0.23; SoilHeatFluxFraction=0.4; NightInterceptionFraction=0.5; ReferenceHeight=2
          Irrigation
          Fertiliser
          Manager DiagnosticsVariables: same as New Zealand.Iversen_8.Simulation1.paddock.DiagnosticsVariables
          SurfaceOrganicMatter surface organic matter: InitialResidueName=wheat; InitialResidueType=wheat; InitialResidueMass=0; InitialStandingFraction=0; InitialCPR=0; InitialCNR=80; FractionFaecesAdded=0.5
          Report: same as Australia.Hudson.P1 Base Simulation.paddock.Report
          Manager LucerneSowingRule
            RowSpacing = 300
            SowingDepth = 10
            SowingRate = 480
            CultivarName = Kaituna
            SowingDate = 1994-05-05
            script: same as in New Zealand.Iversen_8.Simulation1.paddock.LucerneSowingRule
          Operations IrrigationEvents
          Plant Lucerne: CropType=Lucerne
          SoluteManager
          Manager Mower: same as New Zealand.Iversen_9.Simulation0.paddock.Mower
          Operations Cutting
          Soil: Latitude=0; Longitude=0
            Water
              Thickness  BD    AirDry  LL15   DUL    SAT
              150        1.38  0.1     0.143  0.38   0.43
              150        1.34  0.1     0.201  0.38   0.43
              300        1.35  0.1     0.237  0.4    0.43
              300        1.47  0.1     0.237  0.4    0.43
              300        1.49  0.1     0.192  0.39   0.42
              300        1.5   0.1     0.176  0.38   0.4
              300        1.54  0.1     0.2    0.38   0.4
              300        1.55  0.1     0.23   0.38   0.4
              300        1.55  0.1     0.25   0.359  0.41
              300        1.57  0.1     0.26   0.356  0.408
              300        1.58  0.1     0.27   0.356  0.404
              600        1.6   0.1     0.28   0.35   0.396
              SoilCrop LucerneSoil
                LL=[0.143, 0.201, 0.237, 0.237, 0.192, 0.176, 0.2, 0.23, 0.25, 0.25, 0.25, 0.25]
                KL=[0.12, 0.12, 0.1, 0.1, 0.1, 0.08, 0.08, 0.05, 0.05, 0.03, 0.03, 0.03]
                XF=[1, 1, 1, 1, 1, 1, 1, 1, 1, 1, 1, 1]
            SoilWater: SummerDate=1-Nov; SummerU=6; SummerCona=3.5; WinterDate=1-Apr; WinterU=6; WinterCona=3.5; DiffusConst=250; DiffusSlope=22; Salb=0.13; CN2Bare=68; CNRed=20; CNCov=0.8; max_pond=0; ResidueInterception=0
              Thickness=[150, 150, 300, 300, 300, 300, 300, 300, 300, 300, 300, 600]
              SWCON=[0.3, 0.3, 0.3, 0.3, 0.3, 0.3, 0.3, 0.3, 0.3, 0.3, 0.3, 0.3]
            SoilNitrogen: fom_type=[default, manure, mucuna, lablab, shemp, stable]; fract_carb=[0.2, 0.3, 0.54, 0.57, 0.45, 0]; fract_cell=[0.7, 0.3, 0.37, 0.37, 0.47, 0.1]; fract_lign=[0.1, 0.4, 0.09, 0.06, 0.08, 0.9]
            SoilOrganicMatter: RootCN=50; RootWt=1500; SoilCN=14.5; EnrACoeff=7.4; EnrBCoeff=0.2; OCUnits=Total
              Thickness  OC    FBiom  FInert
              150        1.82  0.025  0.45
              150        1.47  0.025  0.6
              300        1.2   0.015  0.75
              300        1.03  0.01   0.9
              300        0.47  0.01   0.96
              300        0.47  0.01   0.96
              300        0.47  0.01   0.96
              300        0.47  0.01   0.96
              300        0.47  0.01   0.96
              300        0.47  0.01   0.96
              300        0.47  0.01   0.96
              600        0.47  0.01   0.96
            Analysis: PH=[7.5, 8, 8, 8, 8, 8, 8, 8, 8, 8, 8, 8]; PHUnits=Water; BoronUnits=HotWater
              Thickness=[150, 150, 300, 300, 300, 300, 300, 300, 300, 300, 300, 600]
            Sample Initial nitrogen: NO3Units=ppm; NH4Units=ppm; SWUnits=Volumetric; OCUnits=Total; PHUnits=Water
              Thickness  NO3       NH4
              150        0.709935  1.00004
              150        0.339966  0.999854
              300        0.259977  0.999957
              300        0.22998   1.00001
              300        0.229982  0.500003
              300        0.259982  0.500013
              300        0.269982  0.500013
              300        0.299986  0.500008
              300        0.299987  0.500019
              300        0.299989  0.500009
              300        0.299994  0.500007
              600        0.299994  0.5
            Sample Initial water: NO3Units=ppm; NH4Units=ppm; SWUnits=Volumetric; OCUnits=Total; PHUnits=Water
              Thickness=[150, 150, 300, 300, 300, 300, 300, 300, 300, 300, 300, 600]
              SW=[0.2, 0.2, 0.2, 0.2, 0.2, 0.2, 0.2, 0.2, 0.2, 0.2, 0.2, 0.2]
            CERESSoilTemperature
    Experiment Quairading
      Factors
        Factor Defoliation: Specifications=[Cutting]
          Operations Cutting
            1998-11-11  [Mower].Script.Cut();
            1998-12-16  [Mower].Script.Cut();
            1999-03-17  [Mower].Script.Cut();
            1999-04-28  [Mower].Script.Cut();
            1999-07-01  [Mower].Script.Cut();
            1999-08-20  [Mower].Script.Cut();
            1999-09-28  [Mower].Script.Cut();
            1999-11-16  [Mower].Script.Cut();
            2000-01-17  [Mower].Script.Cut();
            2000-02-29  [Mower].Script.Cut();
            2000-05-08  [Mower].Script.Cut();
            2000-08-08  [Mower].Script.Cut();
            2000-10-05  [Mower].Script.Cut();
            2000-11-22  [Mower].Script.Cut();
      Simulation 1998_01 Trifecta
        Clock: StartDate=1998-06-01; EndDate=2001-04-30
        Summary summaryfile
        Weather: FileName=Qu98_01.met
        SoilArbitrator Soil Arbitrator
        Zone paddock: Area=1; Slope=0
          MicroClimate: a_interception=0; b_interception=1; c_interception=0; d_interception=0; soil_albedo=0.23; SoilHeatFluxFraction=0.4; NightInterceptionFraction=0.5; ReferenceHeight=2
          Irrigation
          Fertiliser
          Manager DiagnosticsVariables: same as New Zealand.Iversen_8.Simulation1.paddock.DiagnosticsVariables
          SurfaceOrganicMatter surface organic matter: InitialResidueName=wheat; InitialResidueType=wheat; InitialResidueMass=0; InitialStandingFraction=0; InitialCPR=0; InitialCNR=80; FractionFaecesAdded=0.5
          Report: same as Australia.Hudson.P1 Base Simulation.paddock.Report
          Manager LucerneSowingRule
            RowSpacing = 300
            SowingDepth = 10
            SowingRate = 480
            CultivarName = Kaituna
            SowingDate = 1998-06-09
            script: same as in New Zealand.Iversen_8.Simulation1.paddock.LucerneSowingRule
          Operations IrrigationEvents
          Plant Lucerne: CropType=Lucerne
          SoluteManager
          Manager Mower: same as New Zealand.Iversen_9.Simulation0.paddock.Mower
          Operations Cutting
          Soil quairading: Latitude=0; Longitude=0
            Water
              Thickness  BD   AirDry  LL15  DUL   SAT
              100        1.4  0.01    0.02  0.13  0.45
              100        1.4  0.01    0.02  0.13  0.45
              200        1.6  0.085   0.09  0.18  0.38
              200        1.6  0.095   0.11  0.19  0.38
              200        1.6  0.1     0.13  0.2   0.38
              200        1.6  0.1     0.13  0.2   0.38
              200        1.6  0.1     0.13  0.2   0.38
              200        1.6  0.1     0.15  0.19  0.38
              200        1.6  0.1     0.16  0.19  0.38
              SoilCrop LucerneSoil: LL=[0.02, 0.02, 0.09, 0.11, 0.13, 0.13, 0.13, 0.15, 0.16]; KL=[0.06, 0.06, 0.04, 0.04, 0.04, 0.03, 0.01, 0.01, 0.01]; XF=[0.2, 0.2, 0.6, 0.6, 0.3, 0.2, 0.2, 0.2, 0.2]
            SoilWater: SummerDate=1-Nov; SummerU=6; SummerCona=2; WinterDate=1-Apr; WinterU=6; WinterCona=2; DiffusConst=88; DiffusSlope=35; Salb=0.13; CN2Bare=60; CNRed=20; CNCov=0.8; max_pond=0; Thickness=[100, 100, 200, 200, 200, 200, 200, 200, 200]; SWCON=[0.9, 0.9, 0.65, 0.65, 0.65, 0.65, 0.65, 0.65, 0.65]; ResidueInterception=0
            SoilNitrogen: fom_type=[default, manure, mucuna, lablab, shemp, stable]; fract_carb=[0.2, 0.3, 0.54, 0.57, 0.45, 0]; fract_cell=[0.7, 0.3, 0.37, 0.37, 0.47, 0.1]; fract_lign=[0.1, 0.4, 0.09, 0.06, 0.08, 0.9]
            SoilOrganicMatter: RootCN=40; RootWt=1000; SoilCN=13; EnrACoeff=7.4; EnrBCoeff=0.2; OCUnits=Total
              Thickness  OC    FBiom  FInert
              100        1.23  0.04   0.1
              100        1.23  0.04   0.1
              200        0.43  0.02   0.2
              200        0.37  0.01   0.8
              200        0.26  0.01   0.9
              200        0.26  0.01   0.9
              200        0.21  0.01   0.9
              200        0.21  0.01   0.9
              200        0.2   0.01   0.9
            Analysis: Thickness=[100, 100, 200, 200, 200, 200, 200, 200, 200]; PH=[4.7, 4.7, 5.1, 5.1, 5.1, 6, 6, 6, 6]; PHUnits=Water; BoronUnits=HotWater
            Sample Initial nitrogen: NO3Units=ppm; NH4Units=ppm; SWUnits=Volumetric; OCUnits=Total; PHUnits=Water
              Thickness  NO3  NH4
              100        3    4
              100        3    4
              200        2    0
              200        2    0
              200        2    0
              200        2    0
              200        2    0
              200        2    0
              200        2    0
            Sample Initial water: Thickness=[100, 100, 200, 200, 200, 200, 200, 200, 200]; SW=[0.08, 0.08, 0.12, 0.14, 0.18, 0.18, 0.19, 0.19, 0.19]; NO3Units=ppm; NH4Units=ppm; SWUnits=Volumetric; OCUnits=Total; PHUnits=Water
            CERESSoilTemperature
    Experiment Tamworth
      Factors
        Factor Defoliation: Specifications=[Cutting]
          Operations Cutting
            1979-10-27  [Mower].Script.Cut();
            1979-12-03  [Mower].Script.Cut();
            1980-01-21  [Mower].Script.Cut();
            1980-02-25  [Mower].Script.Cut();
            1980-05-18  [Mower].Script.Cut();
            1980-09-08  [Mower].Script.Cut();
            1980-10-19  [Mower].Script.Cut();
            1980-11-23  [Mower].Script.Cut();
            1980-12-23  [Mower].Script.Cut();
            1981-01-19  [Mower].Script.Cut();
            1981-03-03  [Mower].Script.Cut();
            1980-10-19  [Mower].Script.Cut();
            1981-04-21  [Mower].Script.Cut();
            1981-09-08  [Mower].Script.Cut();
            1981-10-23  [Mower].Script.Cut();
            1981-11-27  [Mower].Script.Cut();
            1981-12-30  [Mower].Script.Cut();
            1982-01-29  [Mower].Script.Cut();
            1982-03-08  [Mower].Script.Cut();
            1982-04-08  [Mower].Script.Cut();
            1982-05-28  [Mower].Script.Cut();
            1982-10-27  [Mower].Script.Cut();
            1982-12-21  [Mower].Script.Cut();
            1983-02-01  [Mower].Script.Cut();
            1983-03-14  [Mower].Script.Cut();
      Simulation 1979_83 Hunter River
        Clock: StartDate=1979-01-01; EndDate=1983-07-09
        Summary summaryfile
        Weather: FileName=tamworth.met
        SoilArbitrator Soil Arbitrator
        Zone paddock: Area=1; Slope=0
          MicroClimate: a_interception=0; b_interception=1; c_interception=0; d_interception=0; soil_albedo=0.23; SoilHeatFluxFraction=0.4; NightInterceptionFraction=0.5; ReferenceHeight=2
          Irrigation
          Fertiliser
          Manager DiagnosticsVariables: same as New Zealand.Iversen_8.Simulation1.paddock.DiagnosticsVariables
          SurfaceOrganicMatter surface organic matter: InitialResidueName=wheat; InitialResidueType=wheat; InitialResidueMass=0; InitialStandingFraction=0; InitialCPR=0; InitialCNR=80; FractionFaecesAdded=0.5
          Report: same as Australia.Hudson.P1 Base Simulation.paddock.Report
          Manager LucerneSowingRule
            RowSpacing = 300
            SowingDepth = 10
            SowingRate = 480
            CultivarName = Kaituna
            SowingDate = 1979-04-30
            script: same as in New Zealand.Iversen_8.Simulation1.paddock.LucerneSowingRule
          Operations IrrigationEvents
          Plant Lucerne: CropType=Lucerne
          SoluteManager
          Manager Mower: same as New Zealand.Iversen_9.Simulation0.paddock.Mower
          Operations Cutting
          Soil Tamworth_Holford: Latitude=0; Longitude=0
            Water
              Thickness  BD    AirDry  LL15   DUL    SAT
              150        1.2   0.1     0.292  0.46   0.51
              150        1.3   0.273   0.293  0.455  0.505
              200        1.3   0.273   0.293  0.455  0.505
              300        1.3   0.273   0.3    0.455  0.505
              300        1.32  0.273   0.3    0.45   0.5
              300        1.32  0.273   0.3    0.435  0.485
              300        1.36  0.273   0.3    0.43   0.48
              300        1.45  0.273   0.32   0.406  0.45
              300        1.45  0.273   0.34   0.406  0.45
              300        1.45  0.273   0.36   0.406  0.45
              300        1.45  0.273   0.38   0.406  0.45
              SoilCrop LucerneSoil
                LL=[0.292, 0.293, 0.293, 0.3, 0.3, 0.3, 0.3, 0.32, 0.34, 0.36, 0.38]
                KL=[0.08, 0.08, 0.08, 0.06, 0.04, 0.03, 0.03, 0.03, 0.02, 0.01, 0.01]
                XF=[1, 1, 1, 1, 1, 1, 1, 1, 0, 1, 1]
            SoilWater: SummerDate=1-Nov; SummerU=6; SummerCona=3.5; WinterDate=1-Apr; WinterU=6; WinterCona=3.5; DiffusConst=40; DiffusSlope=16; Salb=0.13; CN2Bare=72; CNRed=20; CNCov=0.8; max_pond=0; Thickness=[150, 150, 200, 300, 300, 300, 300, 300, 300, 300, 300]; SWCON=[0.3, 0.3, 0.3, 0.3, 0.3, 0.3, 0.3, 0.3, 0.3, 0.3, 0.3]; ResidueInterception=0
            SoilNitrogen: fom_type=[default, manure, mucuna, lablab, shemp, stable]; fract_carb=[0.2, 0.3, 0.54, 0.57, 0.45, 0]; fract_cell=[0.7, 0.3, 0.37, 0.37, 0.47, 0.1]; fract_lign=[0.1, 0.4, 0.09, 0.06, 0.08, 0.9]
            SoilOrganicMatter: RootCN=50; RootWt=2000; SoilCN=11; EnrACoeff=7.4; EnrBCoeff=0.2; OCUnits=Total
              Thickness  OC     FBiom  FInert
              150        1.469  0.045  0.25
              150        1.04   0.025  0.4
              200        0.65   0.015  0.6
              300        0.39   0.01   0.8
              300        0.39   0.01   0.96
              300        0.26   0.01   0.96
              300        0.26   0.01   0.96
              300        0.13   0.01   0.96
              300        0.1    0.01   0.96
              300        0.1    0.01   0.96
              300        0.1    0.01   0.96
            Analysis: Thickness=[150, 150, 200, 300, 300, 300, 300, 300, 300, 300, 300]; PH=[5.5, 6.7, 6.7, 7, 7.2, 7.7, 7.7, 7.7, 7.7, 7.7, 7.7]; PHUnits=Water; BoronUnits=HotWater
            Sample Initial nitrogen: NO3Units=ppm; NH4Units=ppm; SWUnits=Volumetric; OCUnits=Total; PHUnits=Water
              Thickness  NO3  NH4
              150        2    0.0500343
              150        1.5  0.0500343
              200        1    0.0500343
              300        1    0.0300206
              300        1    0.0100069
              300        1    0.0100069
              300        0.7  0.0100069
              300        0.5  0.0100069
              300        0.5  0.0100069
              300        0.5  0.0100069
              300        0.5  0.0100069
            Sample Initial water: Thickness=[150, 150, 200, 300, 300, 300, 300, 300, 300, 300, 300]; SW=[0.3, 0.3, 0.3, 0.3, 0.3, 0.3, 0.3, 0.3, 0.3, 0.3, 0.3]; NO3Units=ppm; NH4Units=ppm; SWUnits=Volumetric; OCUnits=Total; PHUnits=Water
            CERESSoilTemperature
    Experiment Roseworthy
      Factors
        Factor Water
          Factor dry: Specifications=[IrrigationEvents]
            Operations IrrigationEvents
          Factor irr: Specifications=[IrrigationEvents]
            Operations IrrigationEvents
              1999-12-20  [Irrigation].Apply(16.5);
              1999-12-23  [Irrigation].Apply(16.75);
              1999-12-24  [Irrigation].Apply(16.5);
              1999-12-25  [Irrigation].Apply(16.75);
              1999-12-29  [Irrigation].Apply(16.75);
              2000-01-02  [Irrigation].Apply(16.75);
              2000-01-06  [Irrigation].Apply(16.5);
              2000-01-09  [Irrigation].Apply(16.5);
              2000-01-12  [Irrigation].Apply(16.75);
              2000-01-15  [Irrigation].Apply(16.5);
              2000-01-18  [Irrigation].Apply(16.5);
              2000-01-25  [Irrigation].Apply(20.5);
              2000-01-27  [Irrigation].Apply(20.5);
              2000-01-31  [Irrigation].Apply(20.5);
              2000-02-02  [Irrigation].Apply(23.5);
              2000-02-05  [Irrigation].Apply(23.5);
              2000-02-07  [Irrigation].Apply(23.5);
              2000-02-09  [Irrigation].Apply(11.5);
              2000-02-10  [Irrigation].Apply(9);
              2000-02-11  [Irrigation].Apply(8.5);
              2000-02-12  [Irrigation].Apply(9.25);
              2000-02-13  [Irrigation].Apply(9);
              2000-02-14  [Irrigation].Apply(9.5);
              2000-02-15  [Irrigation].Apply(11.5);
              2000-02-16  [Irrigation].Apply(9);
              2000-02-17  [Irrigation].Apply(9.25);
              2000-02-18  [Irrigation].Apply(9.75);
              2000-02-19  [Irrigation].Apply(9);
              2000-02-20  [Irrigation].Apply(9.75);
              2000-02-21  [Irrigation].Apply(9.75);
              2000-03-03  [Irrigation].Apply(23.5);
              2000-03-04  [Irrigation].Apply(11.5);
              2000-03-05  [Irrigation].Apply(9);
              2000-03-06  [Irrigation].Apply(9);
              2000-03-07  [Irrigation].Apply(23.5);
              2000-03-08  [Irrigation].Apply(9);
              2000-03-09  [Irrigation].Apply(23.5);
              2000-03-10  [Irrigation].Apply(11.5);
              2000-03-11  [Irrigation].Apply(23.5);
              2000-03-12  [Irrigation].Apply(5);
              2001-01-16  [Irrigation].Apply(20);
              2001-01-17  [Irrigation].Apply(20);
              2001-01-18  [Irrigation].Apply(20);
              2001-02-12  [Irrigation].Apply(20);
              2001-02-13  [Irrigation].Apply(20);
              2001-02-14  [Irrigation].Apply(20);
              2001-03-12  [Irrigation].Apply(20);
              2001-03-13  [Irrigation].Apply(20);
              2001-03-14  [Irrigation].Apply(20);
              2001-09-19  // lucerne end_crop
      Simulation 1998_2001 Sceptre
        Clock: StartDate=1998-06-04; EndDate=2001-09-20
        Summary summaryfile
        Weather: FileName=rose01.met
        SoilArbitrator Soil Arbitrator
        Zone paddock: Area=1; Slope=0
          MicroClimate: a_interception=0; b_interception=1; c_interception=0; d_interception=0; soil_albedo=0.23; SoilHeatFluxFraction=0.4; NightInterceptionFraction=0.5; ReferenceHeight=2
          Irrigation
          Fertiliser
          Manager DiagnosticsVariables: same as New Zealand.Iversen_8.Simulation1.paddock.DiagnosticsVariables
          SurfaceOrganicMatter surface organic matter: InitialResidueName=wheat; InitialResidueType=wheat; InitialResidueMass=0; InitialStandingFraction=0; InitialCPR=0; InitialCNR=80; FractionFaecesAdded=0.5
          Report: same as New Zealand.Iversen_8.Simulation1.paddock.Report
          Manager LucerneSowingRule
            RowSpacing = 150
            SowingDepth = 40
            SowingRate = 300
            CultivarName = Sceptre
            SowingDate = 1998-08-17
            script: same as in New Zealand.Iversen_8.Simulation1.paddock.LucerneSowingRule
          Operations IrrigationEvents
          Plant Lucerne: CropType=Lucerne
          SoluteManager
          Manager Mower: same as New Zealand.Iversen_9.Simulation0.paddock.Mower
          Operations Cutting
            1998-12-15  [Mower].Script.Cut();
            1999-04-10  [Mower].Script.Cut();
            1999-06-14  [Mower].Script.Cut();
            1999-09-14  [Mower].Script.Cut();
            1999-11-06  [Mower].Script.Cut();
            2000-01-19  [Mower].Script.Cut();
            2000-02-26  [Mower].Script.Cut();
            2000-03-30  [Mower].Script.Cut();
            2000-05-22  [Mower].Script.Cut();
            2000-07-29  [Mower].Script.Cut();
            2000-09-28  [Mower].Script.Cut();
            2000-11-22  [Mower].Script.Cut();
            2001-02-11  [Mower].Script.Cut();
            2001-03-07  [Mower].Script.Cut();
            2001-04-18  [Mower].Script.Cut();
            2001-07-11  [Mower].Script.Cut();
            2001-09-19  [Mower].Script.Cut();
            2001-09-19  [Mower].Script.Cut();
          Soil Roseworthy: Latitude=0; Longitude=0
            Water
              Thickness  BD    AirDry  LL15  DUL   SAT
              200        1.3   0.09    0.11  0.25  0.49
              200        1.23  0.09    0.11  0.25  0.48
              200        1.24  0.1     0.13  0.25  0.47
              200        1.26  0.1     0.15  0.26  0.42
              200        1.41  0.1     0.18  0.27  0.43
              200        1.42  0.1     0.2   0.28  0.44
              400        1.41  0.1     0.25  0.3   0.44
              400        1.41  0.1     0.31  0.33  0.44
              400        1.41  0.1     0.37  0.39  0.44
              400        1.41  0.1     0.38  0.39  0.44
              SoilCrop LucerneSoil
                LL=[0.11, 0.11, 0.13, 0.15, 0.18, 0.2, 0.25, 0.31, 0.37, 0.38]
                KL=[0.08, 0.08, 0.08, 0.08, 0.05, 0.03, 0.01, 0.01, 0.01, 0.01]
                XF=[1, 0.8, 0.7, 0.5, 0.1, 0.1, 0.1, 0.1, 0.1, 0.1]
            SoilWater: SummerDate=1-Nov; SummerU=4.2; SummerCona=2; WinterDate=1-Apr; WinterU=4.2; WinterCona=2; DiffusConst=44; DiffusSlope=16; Salb=0.14; CN2Bare=76; CNRed=20; CNCov=0.8; max_pond=0; Thickness=[200, 200, 200, 200, 200, 200, 400, 400, 400, 400]; SWCON=[0.5, 0.4, 0.3, 0.3, 0.2, 0.2, 0.1, 0.1, 0.1, 0.1]; ResidueInterception=0
            SoilNitrogen: fom_type=[default, manure, mucuna, lablab, shemp, stable]; fract_carb=[0.2, 0.3, 0.54, 0.57, 0.45, 0]; fract_cell=[0.7, 0.3, 0.37, 0.37, 0.47, 0.1]; fract_lign=[0.1, 0.4, 0.09, 0.06, 0.08, 0.9]
            SoilOrganicMatter: RootCN=45; RootWt=400; SoilCN=14.2; EnrACoeff=7.4; EnrBCoeff=0.2; OCUnits=Total
              Thickness  OC    FBiom  FInert
              200        1.48  0.05   0.1
              200        0.9   0.05   0.1
              200        0.47  0.02   0.4
              200        0.32  0.015  0.9
              200        0.22  0.01   0.95
              200        0.15  0.01   0.97
              400        0.1   0.01   0.98
              400        0.07  0.01   0.98
              400        0.05  0.01   0.99
              400        0.03  0.01   0.99
            Analysis: Thickness=[200, 200, 200, 200, 200, 200, 400, 400, 400, 400]; PH=[7.86, 8.23, 8.6, 9, 9, 9, 9, 9, 9, 9]; PHUnits=Water; BoronUnits=HotWater
            Sample Initial nitrogen: NO3Units=ppm; NH4Units=ppm; SWUnits=Volumetric; OCUnits=Total; PHUnits=Water
              Thickness  NO3       NH4
              200        6.84003   0.5
              200        3.52001   0.5
              200        1.54001   0.5
              200        1.12      0.4
              200        1.1       0.1
              200        0.680003  0.1
              400        0.650003  0.05
              400        0.310001  0.05
              400        0.310001  0.05
              400        0.300001  0.05
            Sample Initial water: Thickness=[200, 200, 200, 200, 200, 200, 400, 400, 400, 400]; SW=[0.2, 0.2, 0.2, 0.22, 0.22, 0.27, 0.27, 0.32, 0.38, 0.38]; NO3Units=ppm; NH4Units=ppm; SWUnits=Volumetric; OCUnits=Total; PHUnits=Water
            CERESSoilTemperature
    Experiment Jimbour
      Factors
        Factor SowingDate
          Factor Strip7
            Specifications:
              [LucerneSowingRule].Script.SowingDate = 1997-06-12
              [Cutting]
              [Clock].StartDate = 1997-06-10
            Operations Cutting
              1997-06-12  [Fertiliser].Apply(4, Fertiliser.Types.UreaN, 50);
              1997-10-27  [Mower].Script.Cut();
              1997-12-02  [Mower].Script.Cut();
              1998-03-11  [Mower].Script.Cut();
              1998-03-14  [Fertiliser].Apply(10, Fertiliser.Types.UreaN, 50);
              1998-05-22  [Mower].Script.Cut();
              1998-10-07  [Mower].Script.Cut();
              1998-12-24  [Mower].Script.Cut();
              1999-01-21  [Mower].Script.Cut();
              1999-02-20  [Mower].Script.Cut();
              1999-04-15  [Mower].Script.Cut();
              2000-01-06  [Mower].Script.Cut();
              2000-02-07  [Mower].Script.Cut();
              2000-05-06  [Mower].Script.Cut();
          Factor Strip8
            Specifications:
              [LucerneSowingRule].Script.SowingDate = 1997-06-12
              [Cutting]
              [Clock].StartDate =1997-05-30
            Operations Cutting
              1997-06-12  [Fertiliser].Apply(4, Fertiliser.Types.UreaN, 50);
              1997-10-27  [Mower].Script.Cut();
              1997-12-02  [Mower].Script.Cut();
              1998-03-11  [Mower].Script.Cut();
              1998-03-14  [Fertiliser].Apply(10, Fertiliser.Types.UreaN, 50);
              1998-05-22  [Mower].Script.Cut();
              1998-10-07  [Mower].Script.Cut();
              1998-12-24  [Mower].Script.Cut();
              1999-01-21  [Mower].Script.Cut();
              1999-02-20  [Mower].Script.Cut();
              1999-04-15  [Mower].Script.Cut();
              1999-07-13  [Mower].Script.Cut();
          Factor Strip3a
            Specifications:
              [LucerneSowingRule].Script.SowingDate = 1999-08-06
              [LucerneSowingRule].Script.SowingRate= 50
              [Cutting]
              [Clock].StartDate = 1999-07-21
            Operations Cutting
              1999-08-06  [Fertiliser].Apply(4, Fertiliser.Types.UreaN, 50);
          Factor Strip6
            Specifications:
              [LucerneSowingRule].Script.SowingDate = 1997-06-12
              [LucerneSowingRule].Script.SowingRate= 80
              [Cutting]
              [Clock].StartDate =1997-05-30
            Operations Cutting
              1997-06-12  [Fertiliser].Apply(4, Fertiliser.Types.UreaN, 50);
              1997-11-14  [Mower].Script.Cut();
              1998-03-04  [Mower].Script.Cut();
              1998-03-14  [Fertiliser].Apply(10, Fertiliser.Types.UreaN, 50);
              1998-06-07  [Mower].Script.Cut();
              1998-10-22  [Mower].Script.Cut();
              1999-01-20  [Mower].Script.Cut();
              1999-02-22  [Mower].Script.Cut();
      Simulation 1997_2000 Trifecta Grant
        Clock: StartDate=1997-05-30; EndDate=2000-05-16
        Summary summaryfile
        Weather: FileName=grant.met
        SoilArbitrator Soil Arbitrator
        Zone paddock: Area=1; Slope=0
          MicroClimate: a_interception=0; b_interception=1; c_interception=0; d_interception=0; soil_albedo=0.23; SoilHeatFluxFraction=0.4; NightInterceptionFraction=0.5; ReferenceHeight=2
          Irrigation
          Fertiliser
          Manager DiagnosticsVariables: same as New Zealand.Iversen_8.Simulation1.paddock.DiagnosticsVariables
          SurfaceOrganicMatter surface organic matter: InitialResidueName=wheat; InitialResidueType=wheat; InitialResidueMass=0; InitialStandingFraction=0; InitialCPR=0; InitialCNR=80; FractionFaecesAdded=0.5
          Report: same as New Zealand.Iversen_8.Simulation1.paddock.Report
          Manager LucerneSowingRule
            RowSpacing = 150
            SowingDepth = 40
            SowingRate = 100
            CultivarName = Sceptre
            SowingDate = 0001-01-01
            script: same as in New Zealand.Iversen_8.Simulation1.paddock.LucerneSowingRule
          Operations IrrigationEvents
          Plant Lucerne: CropType=Lucerne
          SoluteManager
          Manager Mower: same as New Zealand.Iversen_9.Simulation0.paddock.Mower
          Operations Cutting
          Soil Grant: Latitude=0; Longitude=0
            Water
              Thickness  BD    AirDry  LL15  DUL   SAT
              150        1.02  0.15    0.27  0.54  0.58
              150        1.03  0.22    0.27  0.53  0.58
              300        1.02  0.22    0.28  0.54  0.59
              300        1.02  0.22    0.26  0.54  0.58
              300        1.06  0.22    0.31  0.52  0.57
              300        1.11  0.22    0.32  0.5   0.55
              300        1.12  0.22    0.33  0.5   0.55
              300        1.15  0.22    0.33  0.48  0.53
              300        1.18  0.22    0.34  0.47  0.52
              300        1.2   0.22    0.33  0.46  0.51
              300        1.25  0.22    0.36  0.46  0.49
              SoilCrop LucerneSoil
                LL=[0.27, 0.27, 0.28, 0.26, 0.31, 0.32, 0.33, 0.33, 0.34, 0.33, 0.36]
                KL=[0.08, 0.08, 0.08, 0.08, 0.08, 0.08, 0.06, 0.06, 0.06, 0.06, 0.06]
                XF=[1, 1, 1, 1, 1, 1, 1, 1, 1, 1, 1]
            SoilWater: SummerDate=1-Nov; SummerU=6; SummerCona=4; WinterDate=1-Apr; WinterU=6; WinterCona=4; DiffusConst=40; DiffusSlope=16; Salb=0.13; CN2Bare=70; CNRed=20; CNCov=0.8; max_pond=0; Thickness=[150, 150, 300, 300, 300, 300, 300, 300, 300, 300, 300]; SWCON=[0.2, 0.2, 0.2, 0.2, 0.2, 0.2, 0.2, 0.2, 0.2, 0.2, 0.2]; ResidueInterception=0
            SoilNitrogen: fom_type=[default, manure, mucuna, lablab, shemp, stable]; fract_carb=[0.2, 0.3, 0.54, 0.57, 0.45, 0]; fract_cell=[0.7, 0.3, 0.37, 0.37, 0.47, 0.1]; fract_lign=[0.1, 0.4, 0.09, 0.06, 0.08, 0.9]
            SoilOrganicMatter: RootCN=40; RootWt=100; SoilCN=14; EnrACoeff=7.4; EnrBCoeff=0.2; OCUnits=Total
              Thickness  OC    FBiom  FInert
              150        1.04  0.03   0.4
              150        0.9   0.025  0.5
              300        0.89  0.015  0.75
              300        0.89  0.01   0.9
              300        0.77  0.01   0.95
              300        0.45  0.01   0.99
              300        0.27  0.01   0.99
              300        0.22  0.01   0.99
              300        0.16  0.01   0.99
              300        0.13  0.01   0.99
              300        0.12  0.01   0.99
            Analysis: Thickness=[150, 150, 300, 300, 300, 300, 300, 300, 300, 300, 300]; PH=[8.4, 8.7, 8.9, 9, 9, 9, 9, 9, 8.9, 8.9, 8.9]; PHUnits=Water; BoronUnits=HotWater
            Sample Initial nitrogen: NO3Units=ppm; NH4Units=ppm; SWUnits=Volumetric; OCUnits=Total; PHUnits=Water
              Thickness  NO3   NH4
              150        21.3  0.300015
              150        22.2  0.300015
              300        20.3  0.300015
              300        15.9  0.300015
              300        8.2   0.300015
              300        2.6   0.300015
              300        1     0.300015
              300        0.9   0.300015
              300        0.8   0.300015
              300        0.9   0.300015
              300        1     0.300015
            Sample Initial water: Thickness=[150, 150, 300, 300, 300, 300, 300, 300, 300, 300, 300]; NO3Units=ppm; NH4Units=ppm; SWUnits=Volumetric; OCUnits=Total; PHUnits=Water
              SW=[0.462, 0.503, 0.457, 0.494, 0.483, 0.496, 0.467, 0.449, 0.466, 0.469, 0.476]
            CERESSoilTemperature
    Experiment Warra
      Factors
        Factor SowingDate
          Factor SD1
            Specifications:
              [LucerneSowingRule].Script.SowingDate = 1988-05-26
              [Clock].StartDate = 1988-05-26
              [Operations]
            Operations
              1989-06-15  [Mower].Script.Cut();
              1989-09-15  [Mower].Script.Cut();
              1989-12-15  [Mower].Script.Cut();
              1990-03-15  [Mower].Script.Cut();
              1990-06-15  [Mower].Script.Cut();
              1990-09-15  [Mower].Script.Cut();
              1990-12-15  [Mower].Script.Cut();
              1991-03-15  [Mower].Script.Cut();
              1991-06-15  [Mower].Script.Cut();
              1991-09-15  [Mower].Script.Cut();
              1991-12-15  [Mower].Script.Cut();
              1992-03-15  [Mower].Script.Cut();
              1992-06-15  [Mower].Script.Cut();
              1992-09-15  [Mower].Script.Cut();
              1992-10-03  [Mower].Script.Cut();
              1992-10-03  [Mower].Script.Cut();
              1988-05-26  [Wheat].Sow(population:100,cultivar:"Hartog",depth:30,rowSpacing:250)
              1988-10-24  [Wheat].Harvest();
          Factor SD2
            Specifications:
              [LucerneSowingRule].Script.SowingDate =1989-06-20
              [Clock].StartDate = 1989-06-20
              [Operations]
            Operations
              1990-12-15  [Mower].Script.Cut();
              1991-03-15  [Mower].Script.Cut();
              1991-06-15  [Mower].Script.Cut();
              1991-09-15  [Mower].Script.Cut();
              1991-12-15  [Mower].Script.Cut();
              1992-03-15  [Mower].Script.Cut();
              1992-06-15  [Mower].Script.Cut();
              1992-09-15  [Mower].Script.Cut();
              1992-12-15  [Mower].Script.Cut();
              1993-03-15  [Mower].Script.Cut();
              1993-06-15  [Mower].Script.Cut();
              1993-09-15  [Mower].Script.Cut();
              1993-10-03  [Mower].Script.Cut();
              1989-06-20  [Wheat].Sow(population:100,cultivar:"Hartog",depth:30,rowSpacing:250)
              1988-10-24  [Wheat].Harvest();
      Simulation 1989_93 Trifecta
        Clock: StartDate=1988-05-26; EndDate=1993-11-17
        Summary summaryfile
        Weather: FileName=warra.met
        SoilArbitrator Soil Arbitrator
        Zone paddock: Area=1; Slope=0
          SoluteManager
          MicroClimate: a_interception=0; b_interception=1; c_interception=0; d_interception=0; soil_albedo=0.23; SoilHeatFluxFraction=0.4; NightInterceptionFraction=0.5; ReferenceHeight=2
          Irrigation
          Fertiliser
          Manager DiagnosticsVariables: same as New Zealand.Iversen_8.Simulation1.paddock.DiagnosticsVariables
          SurfaceOrganicMatter surface organic matter: InitialResidueName=wheat; InitialResidueType=wheat; InitialResidueMass=0; InitialStandingFraction=0; InitialCPR=0; InitialCNR=80; FractionFaecesAdded=0.5
          Report: same as New Zealand.Iversen_8.Simulation1.paddock.Report
          Manager LucerneSowingRule
            RowSpacing = 150
            SowingDepth = 40
            SowingRate = 300
            CultivarName = Trifecta
            SowingDate = 1988-05-26
```csharp
using System;
using Models.Core;
using Models.PMF;
using APSIM.Shared.Utilities;
        
namespace Models
{
    [Serializable] 
    [System.Xml.Serialization.XmlInclude(typeof(Model))]
    public class Script : Model
    {
        [Link] Plant Lucerne;
        [Link] Clock Clock;
        [Link] Summary summary;
        [Description("Spacing (mm) between rows")]
        public double RowSpacing { get; set; }
        [Description("Depth (mm) Grains are planted")]
        public double SowingDepth { get; set; }
        [Description("Seeds sown (/m2)")]
        public double SowingRate { get; set; }
        [Description("Cultivar")]
        [Display(Type=DisplayTypeEnum.CultivarName)]
        public string CultivarName { get; set; }
        [Description("Sowing Date")]
        public DateTime SowingDate { get; set; }

        [EventSubscribe("DoManagement")]
        private void OnDoManagement(object sender, EventArgs e)
        {
        summary.WriteMessage(this,SowingDate.ToString());
        if (Clock.Today == SowingDate)
                Lucerne.Sow(population: SowingRate, cultivar: CultivarName, depth: SowingDepth, rowSpacing: RowSpacing, budNumber: 1);
            //Lucerne.Sow(... Contains the following arguements:
            //Population  double  Required  Seeds sowing/m2
            //Cultivar    string  Required  "NameOfCultivar"
            //Depth       double  Optional  Depth (mm) seed sown.   Default is 100mm 
            //MaxCover    double  Optional  Proportion (0-1) of the ground row crop will cover.   Default is 1.0
            //BudNumber   double  Optional  Number of mainstems per seed sown.  Default is 1.0
            //RowSpacing  double  Optional  Spaceing (mm) between drill rows when crop is sown.  Default is 150mm
            //CropClass   string  Optional  Crop class to instantiate when crop is sown.  Default is "Plant"
        }
    }
}
```
          Operations IrrigationEvents
          Plant Lucerne: CropType=Lucerne
          Manager Mower
```csharp
using System;
using System.Collections.Generic;
using Models.Core;
using Models.PMF;
using Models.PMF.Interfaces;
using System.Xml.Serialization;

namespace Models
{
    [Serializable] 
    [System.Xml.Serialization.XmlInclude(typeof(Model))]
    public class Script : Model
    {
        [Link] Plant Lucerne;
        [Link] Summary summary;
        
        [XmlIgnore] private RemovalFractions Remove { get; set; }
        
        [EventSubscribe("Commencing")]
        private void OnSimulationCommencing(object sender, EventArgs e)
        {
            Remove = new RemovalFractions();
        }
        
        public void Cut()
        {
        summary.WriteMessage(this,"Cut event has been send");
            Remove.SetPhenologyStage = 4;
            Lucerne.RemoveBiomass("Cut", Remove);
        }
    }
}
```
          Operations Cutting
          Plant Wheat: CropType=Wheat
          Manager Harvest
```csharp
using System;
using Models.Core;
using Models.PMF;
using Models.Soils;
using Models.Utilities;
using APSIM.Shared.Utilities;

namespace Models
{
    [Serializable]
    public class Script : Model
    {
        [ScopedLinkByName] Plant Wheat;

        [EventSubscribe("DoManagement")]
        private void OnDoManagement(object sender, EventArgs e)
        {
            if (Wheat.IsReadyForHarvesting)
            {
               Wheat.Harvest();
               Wheat.EndCrop();    
            }
        
        }
        
    }
}
```
          Soil warra88_96_T8: Latitude=0; Longitude=0
            Water
              Thickness  BD    AirDry  LL15   DUL    SAT
              100        1.3   0.1     0.21   0.425  0.5
              100        1.3   0.2     0.21   0.465  0.509
              100        1.29  0.2     0.21   0.473  0.51
              300        1.31  0.2     0.225  0.468  0.505
              300        1.35  0.2     0.265  0.418  0.49
              300        1.36  0.2     0.289  0.364  0.48
              300        1.36  0.2     0.327  0.363  0.48
              SoilCrop LucerneSoil: LL=[0.21, 0.21, 0.21, 0.225, 0.265, 0.289, 0.327]; KL=[0.08, 0.08, 0.08, 0.08, 0.08, 0.08, 0.08]; XF=[1, 1, 1, 1, 1, 1, 1]
              SoilCrop WheatSoil: LL=[0.261, 0.248, 0.28, 0.306, 0.36, 0.392, 0.446]; KL=[0.06, 0.06, 0.06, 0.04, 0.04, 0.02, 0.01]; XF=[1, 1, 1, 1, 1, 1, 1]
            SoilWater: SummerDate=1-Nov; SummerU=6; SummerCona=3.5; WinterDate=1-Apr; WinterU=6; WinterCona=3.5; DiffusConst=40; DiffusSlope=16; Salb=0.13; CN2Bare=80; CNRed=20; CNCov=0.8; max_pond=0; Thickness=[100, 100, 100, 300, 300, 300, 300]; SWCON=[0.2, 0.2, 0.2, 0.2, 0.2, 0.2, 0.2]; ResidueInterception=0
            SoilNitrogen: fom_type=[default, manure, mucuna, lablab, shemp, stable]; fract_carb=[0.2, 0.3, 0.54, 0.57, 0.45, 0]; fract_cell=[0.7, 0.3, 0.37, 0.37, 0.47, 0.1]; fract_lign=[0.1, 0.4, 0.09, 0.06, 0.08, 0.9]
            SoilOrganicMatter: RootCN=40; RootWt=10; SoilCN=14.5; EnrACoeff=7.4; EnrBCoeff=0.2; OCUnits=Total
              Thickness  OC    FBiom  FInert
              100        1     0.024  0.3
              100        0.84  0.02   0.5
              100        0.77  0.015  0.75
              300        0.65  0.01   0.9
              300        0.54  0.01   0.95
              300        0.48  0.01   0.99
              300        0.43  0.01   0.99
            Analysis: Thickness=[100, 100, 100, 300, 300, 300, 300]; PH=[8.2, 8.5, 8.6, 8.6, 7.4, 5.3, 5]; PHUnits=Water; BoronUnits=HotWater
            Sample Initial nitrogen: NO3Units=ppm; NH4Units=ppm; SWUnits=Volumetric; OCUnits=Total; PHUnits=Water
              Thickness  NO3   NH4
              100        1.8   0.3
              100        4.6   0.3
              100        5.9   0.3
              300        12.3  0.3
              300        6.1   0.3
              300        4     0.5
              300        4.9   0.5
            Sample Initial water: Thickness=[100, 100, 100, 300, 300, 300, 300]; SW=[0.437, 0.434, 0.43, 0.431, 0.422, 0.416, 0.417]; NO3Units=ppm; NH4Units=ppm; SWUnits=Volumetric; OCUnits=Total; PHUnits=Water
            CERESSoilTemperature
    Experiment Rutherglen
      Factors
        Factor Defoliation: Specifications=[Cutting]
          Operations Cutting
            1998-11-11  [Mower].Script.Cut();
            1994-01-22  [Mower].Script.Cut();
            1994-03-26  [Mower].Script.Cut();
            1994-03-28  // 'Surface Organic Matter' tillage type = graze
            1994-10-19  [Mower].Script.Cut();
            1995-01-06  [Mower].Script.Cut();
            1995-01-08  // 'Surface Organic Matter' tillage type = graze
            1995-02-11  [Mower].Script.Cut();
            1995-02-13  // 'Surface Organic Matter' tillage type = graze
            1995-08-23  [Mower].Script.Cut();
            1995-10-14  [Mower].Script.Cut();
            1995-12-01  [Mower].Script.Cut();
            1996-01-18  [Mower].Script.Cut();
            1996-01-20  // 'Surface Organic Matter' tillage type = graze
            1996-03-14  [Mower].Script.Cut();
            1996-03-16  // 'Surface Organic Matter' tillage type = graze
            1996-08-17  [Mower].Script.Cut();
            1996-10-24  [Mower].Script.Cut();
            1996-12-11  [Mower].Script.Cut();
            1996-12-13  // 'Surface Organic Matter' tillage type = graze
            1997-05-30  [Mower].Script.Cut();
            1997-09-12  [Mower].Script.Cut();
            1997-11-19  [Mower].Script.Cut();
            1998-05-06  [Mower].Script.Cut();
            1998-08-08  [Mower].Script.Cut();
            1998-10-14  [Mower].Script.Cut();
            1998-12-05  [Mower].Script.Cut();
            1999-03-06  [Mower].Script.Cut();
            1999-03-08  // 'Surface Organic Matter' tillage type = graze
            1999-04-22  [Mower].Script.Cut();
            1999-04-24  // 'Surface Organic Matter' tillage type = graze
            1999-08-06  [Mower].Script.Cut();
            1999-10-14  [Mower].Script.Cut();
            1999-12-10  [Mower].Script.Cut();
            1999-12-12  // 'Surface Organic Matter' tillage type = graze
      Simulation RutherglenCL_Swim3
        Clock: StartDate=1993-01-01; EndDate=1999-12-31
        Summary summaryfile
        Weather: FileName=082039.met
        SoilArbitrator Soil Arbitrator
        Zone paddock: Area=1; Slope=0
          SurfaceOrganicMatter Surface Organic Matter: InitialResidueName=initial_grass; InitialResidueType=grass; InitialResidueMass=1000; InitialStandingFraction=0; InitialCPR=0; InitialCNR=25; FractionFaecesAdded=0.5
          MicroClimate: a_interception=0; b_interception=1; c_interception=0; d_interception=0; soil_albedo=0.23; SoilHeatFluxFraction=0.4; NightInterceptionFraction=0.5; ReferenceHeight=2
          Irrigation
          Fertiliser
          Manager DiagnosticsVariables: same as New Zealand.Iversen_8.Simulation1.paddock.DiagnosticsVariables
          Report: same as Australia.Hudson.P1 Base Simulation.paddock.Report
          Manager LucerneSowingRule
            RowSpacing = 300
            SowingDepth = 40
            SowingRate = 70
            CultivarName = Sceptre
            SowingDate = 1993-09-27
            script: same as in New Zealand.Iversen_8.Simulation1.paddock.LucerneSowingRule
          Operations IrrigationEvents
          Plant Lucerne: CropType=Lucerne
          SoluteManager
          Manager Mower: same as New Zealand.Iversen_9.Simulation0.paddock.Mower
          Operations Cutting
          Soil Brown Chromosol Ridley: SoilType=sand; Site=Rutherglen; NearestTown=Rutherglen; Region=North East; State=Victoria; Country=Australia; ApsoilNumber=822; Latitude=-36.1; Longitude=146.5; DataSource=Kirsten Verburg, CSIRO Land and Water, Canberra
            Comments=LL15 was defined as lowest observed water contents under continuous lucerne
            Water
              Thickness  BD    AirDry  LL15  DUL    SAT
              100        1.5   0.03    0.03  0.19   0.35
              100        1.63  0.03    0.03  0.19   0.35
              100        1.71  0.05    0.05  0.23   0.3
              100        1.73  0.07    0.13  0.27   0.3
              200        1.75  0.11    0.16  0.27   0.31
              200        1.76  0.13    0.16  0.27   0.31
              200        1.77  0.16    0.22  0.3    0.32
              200        1.79  0.18    0.22  0.3    0.32
              200        1.8   0.18    0.23  0.31   0.33
              200        1.8   0.18    0.23  0.3    0.32
              200        1.8   0.18    0.2   0.29   0.32
              200        1.8   0.18    0.2   0.28   0.32
              200        1.83  0.185   0.22  0.295  0.32
              200        1.83  0.2     0.23  0.295  0.32
              200        1.83  0.2     0.22  0.29   0.31
              200        1.83  0.2     0.22  0.28   0.3
              200        1.83  0.2     0.22  0.29   0.3
              200        1.83  0.2     0.22  0.28   0.29
              200        1.83  0.2     0.22  0.28   0.29
              200        1.83  0.2     0.22  0.29   0.3
              200        1.83  0.2     0.22  0.29   0.3
              200        1.83  0.2     0.22  0.29   0.3
              200        1.83  0.2     0.22  0.29   0.3
              200        1.83  0.2     0.22  0.29   0.3
              200        1.83  0.2     0.22  0.29   0.3
              200        1.83  0.2     0.22  0.29   0.3
              200        1.83  0.2     0.22  0.29   0.3
              SoilCrop LucerneSoil
                LL=[0.03, 0.03, 0.05, 0.13, 0.15, 0.16, 0.18, 0.22, 0.22, 0.21, 0.19, 0.18, 0.22, 0.23, 0.22, 0.22, 0.22, 0.22, 0.22, 0.22, 0.22, 0.22, 0.22, 0.22, 0.22, 0.22, 0.22]
                KL=[0.08, 0.08, 0.08, 0.08, 0.08, 0.07, 0.06, 0.05, 0.03, 0.01, 0.01, 0.01, 0.01, 0.01, 0.01, 0.01, 0.01, 0.01, 0.01, 0.01, 0, 0, 0, 0, 0, 0, 0]
                XF=[1, 0.8, 0.8, 0.8, 0.8, 0.8, 0.8, 0.8, 0.8, 0.8, 0.8, 0.8, 0.8, 0.8, 0.8, 0.8, 0.8, 0.8, 0.8, 0.8, 0, 0, 0, 0, 0, 0, 0]
            Analysis: PHUnits=Water; BoronUnits=HotWater
              Thickness=[100, 100, 100, 100, 200, 200, 200, 200, 200, 200, 200, 200, 200, 200, 200, 200, 200, 200, 200, 200, 200, 200, 200, 200, 200, 200, 200]
              PH=[5.3, 5, 5.1, 5.1, 5.3, 5.5, 5.8, 5.8, 5.8, 5.8, 5.8, 5.8, 5.8, 5.8, 5.8, 5.8, 5.8, 5.8, 5.8, 5.8, 5.8, 5.8, 5.8, 5.8, 5.8, 5.8, 5.8]
            SoilOrganicMatter: RootCN=30; RootWt=4000; SoilCN=12; EnrACoeff=7.4; EnrBCoeff=0.2; OCUnits=Total
              Thickness  OC    FBiom  FInert
              100        1.42  0.06   0.05
              100        0.96  0.05   0.1
              100        0.59  0.04   0.2
              100        0.46  0.02   0.5
              200        0.35  0.015  0.7
              200        0.35  0.015  0.75
              200        0.26  0.01   0.8
              200        0.15  0.01   0.85
              200        0.08  0.01   0.9
              200        0.06  0.01   0.95
              200        0.06  0.01   0.95
              200        0.06  0.01   0.95
              200        0.06  0.01   0.95
              200        0.06  0.01   0.95
              200        0.06  0.01   0.95
              200        0.06  0.01   0.95
              200        0.06  0.01   0.95
              200        0.06  0.01   0.95
              200        0.06  0.01   0.95
              200        0.06  0.01   0.95
              200        0.06  0.01   0.95
              200        0.06  0.01   0.95
              200        0.06  0.01   0.95
              200        0.06  0.01   0.95
              200        0.06  0.01   0.95
              200        0.06  0.01   0.95
              200        0.06  0.01   0.95
            CERESSoilTemperature
            Sample Initial condition: NO3Units=ppm; NH4Units=ppm; SWUnits=Volumetric; OCUnits=Total; PHUnits=Water
              Thickness  NO3  NH4  SW
              100        0.9  1.5  0.08
              100        0.9  1    0.09
              100        0.9  0.9  0.17
              100        0.9  0.6  0.16
              200        0.9  0.7  0.22
              200        0.9  0.7  0.27
              200        0.4  0.3  0.28
              200        0.5  0.5  0.28
              200        0.4  0.3  0.3
              200        0.7  0.4  0.3
              200        0.7  0.4  0.29
              200        0.7  0.4  0.28
              200        0.7  0.4  0.27
              200        0.7  0.4  0.29
              200        0.7  0.4  0.29
              200        0.7  0.4  0.28
              200        0.7  0.4  0.29
              200        0.7  0.4  0.28
              200        0.7  0.4  0.28
              200        0.7  0.4  0.29
              200        0.7  0.4  0.29
              200        0.7  0.4  0.29
              200        0.7  0.4  0.29
              200        0.7  0.4  0.29
              200        0.7  0.4  0.29
              200        0.7  0.4  0.29
              200        0.7  0.4  0.29
            SoilNitrogen: fom_type=[default, manure, mucuna, lablab, shemp, stable]; fract_carb=[0.2, 0.3, 0.54, 0.57, 0.45, 0]; fract_cell=[0.7, 0.3, 0.37, 0.37, 0.47, 0.1]; fract_lign=[0.1, 0.4, 0.09, 0.06, 0.08, 0.9]
            SoilWater: same as Australia.Jimbour.1997_2000 Trifecta Grant.paddock.Grant.SoilWater
            OutputLayers: Thickness=[100, 300, 400, 400, 400, 400, 400, 400]
    Experiment Griffith
      Factors
        Factor Defoliation: Specifications=[Cutting]
          Operations Cutting
            1995-12-01  [Mower].Script.Cut();
            1991-01-09  [Mower].Script.Cut();
            1991-02-18  [Mower].Script.Cut();
            1991-03-01  // soilbbc set water_table = 1000
            1991-07-19  [Mower].Script.Cut();
            1991-09-17  // soilbbc set water_table = 600
            1991-10-15  [Mower].Script.Cut();
            1991-11-25  [Mower].Script.Cut();
            1992-01-09  // soilbbc set water_table = 1000
            1992-01-06  [Mower].Script.Cut();
            1992-02-17  [Mower].Script.Cut();
            1992-03-04  // apswim set gwc_salt = 10240
            1992-03-23  [Mower].Script.Cut();
            1992-04-29  [Mower].Script.Cut();
            1992-05-09  [Mower].Script.Cut();
            1992-05-19  [Mower].Script.Cut();
            1992-05-29  [Mower].Script.Cut();
            1992-06-08  [Mower].Script.Cut();
            1992-06-18  [Mower].Script.Cut();
            1992-06-28  [Mower].Script.Cut();
            1992-07-08  [Mower].Script.Cut();
            1992-07-18  [Mower].Script.Cut();
            1992-07-28  [Mower].Script.Cut();
            1992-10-13  [Mower].Script.Cut();
            1992-11-26  [Mower].Script.Cut();
            1993-01-05  [Mower].Script.Cut();
            1993-02-04  [Mower].Script.Cut();
            1993-03-23  [Mower].Script.Cut();
      Simulation Lysimeter1
        Clock: StartDate=1990-10-11; EndDate=1993-04-30
        Summary summaryfile
        Weather: FileName=griffith.met
        SoilArbitrator Soil Arbitrator
        Zone paddock: Area=1; Slope=0
          MicroClimate: a_interception=0; b_interception=1; c_interception=0; d_interception=0; soil_albedo=0.23; SoilHeatFluxFraction=0.4; NightInterceptionFraction=0.5; ReferenceHeight=2
          Irrigation
          Fertiliser
          Manager DiagnosticsVariables: same as New Zealand.Iversen_8.Simulation1.paddock.DiagnosticsVariables
          SurfaceOrganicMatter surface organic matter: InitialResidueName=wheat; InitialResidueType=wheat; InitialResidueMass=0; InitialStandingFraction=0; InitialCPR=0; InitialCNR=80; FractionFaecesAdded=0.5
          Report: EventNames=[Clock].DoReport
            VariableNames:
              [Clock].Today
              [DiagnosticsVariables].Script.AccumPlantN
              [DiagnosticsVariables].Script.AccumMineralisation
              [DiagnosticsVariables].Script.AccumDenit
              [DiagnosticsVariables].Script.AccumFert
              [DiagnosticsVariables].Script.AccumLeach
              [DiagnosticsVariables].Script.AccumDetach
              [DiagnosticsVariables].Script.DeltaSoilOMN
              [DiagnosticsVariables].Script.DeltaSurfaceOMN
              [DiagnosticsVariables].Script.DeltaSoilMineralN
              [Lucerne].Root.NSupply
              [Soil].SoilWater.Eo
              [Soil].SoilWater.Es
              [DiagnosticsVariables].Script.SWC as SWC
              [DiagnosticsVariables].Script.DUL
              [Soil].SoilWater.Drainage
              [Soil].SoilWater.Runoff
              [DiagnosticsVariables].Script.OutFlowLat
              [Soil].
              [Soil].SoilWater.pond
              [DiagnosticsVariables].Script.AccumEO
              [DiagnosticsVariables].Script.AccumEP
              [DiagnosticsVariables].Script.AccumES
              [DiagnosticsVariables].Script.AccumDrainage
              [DiagnosticsVariables].Script.AccumRunoff
              [DiagnosticsVariables].Script.AccumRainfall
              [DiagnosticsVariables].Script.AccumIrrigation
              [DiagnosticsVariables].Script.AccumOutflowLat
              [DiagnosticsVariables].Script.SoilWaterDeficit
              [Lucerne].Grain.Live.Wt
              [Lucerne].Shell.Live.Wt
              [Lucerne].Stem.Live.Wt as StemWt
              [Lucerne].Stem.Live.Wt
              [Lucerne].Grain.Live.N
              [Lucerne].Shell.Live.N
              [Lucerne].Leaf.Live.Wt as LeafWt
              [Lucerne].Root.Live.Wt as RootWt
              [Lucerne].Leaf.Live.N
              [Lucerne].Root.Live.N
              [Lucerne].Leaf.Live.NConc
              [Lucerne].Root.Live.NConc
              [Lucerne].Root.WaterSupply
              [Lucerne].Root.WaterUptake
              [Lucerne].Leaf.Transpiration
              [Lucerne].Leaf.WaterDemand
              [Lucerne].Root.Depth
              [Lucerne].Leaf.CoverTotal
              [Lucerne].Leaf.CoverDead
              [Lucerne].Leaf.LAI
              [Lucerne].Leaf.Height
              [Soil].SoilWater.SWmm
              [Soil].NO3N
              [DiagnosticsVariables].Script.SoilNitrogenContent
              [Lucerne].Arbitrator.N.TotalPlantDemand
              [DiagnosticsVariables].Script.FomN
              [DiagnosticsVariables].Script.HumN
              [DiagnosticsVariables].Script.BiomN
              [DiagnosticsVariables].Script.DltNMinRes
              [DiagnosticsVariables].Script.DltNMinTot
              [Lucerne].Leaf.Fw
              [Lucerne].Leaf.Fn
              [Lucerne].Phenology.CurrentPhaseName
              [Lucerne].Phenology.CurrentStageName
              [Lucerne].Phenology.Stage
              [Lucerne].Pod.Wt
              [Lucerne].Pod.N
              [Lucerne].AboveGround.Wt *10 as shootbiomass
              [Lucerne].Shell.PodNumber.Value()
              [Lucerne].Leaf.LAIFunction.Value()
              [Soil].EC as EC
              [Lucerne].Root.LengthDensity
          Manager LucerneSowingRule
            RowSpacing = 300
            SowingDepth = 40
            SowingRate = 480
            CultivarName = southern_special
            SowingDate = 1990-10-11
            script: same as in New Zealand.Iversen_8.Simulation1.paddock.LucerneSowingRule
          Operations IrrigationEvents
            1990-10-15  [Irrigation].Apply(15.84);
            1990-10-17  [Irrigation].Apply(14.79);
            1990-10-23  [Irrigation].Apply(7.03);
            1990-10-24  [Irrigation].Apply(4.9);
            1990-10-25  [Irrigation].Apply(8.05);
            1990-10-28  [Irrigation].Apply(9.88);
            1990-10-31  [Irrigation].Apply(6.4);
            1990-11-05  [Irrigation].Apply(15.67);
            1990-11-08  [Irrigation].Apply(6.94);
            1990-11-13  [Irrigation].Apply(28.37);
            1990-11-19  [Irrigation].Apply(31.91);
            1990-11-20  [Irrigation].Apply(3.56);
            1990-11-26  [Irrigation].Apply(24.33);
            1990-11-27  [Irrigation].Apply(2.27);
            1990-12-03  [Irrigation].Apply(31.6);
            1990-12-11  [Irrigation].Apply(12.34);
            1990-12-12  [Irrigation].Apply(0.44);
            1990-12-18  [Irrigation].Apply(17.39);
            1990-12-19  [Irrigation].Apply(5);
            1990-12-27  [Irrigation].Apply(9.05);
            1990-12-28  [Irrigation].Apply(11.49);
            1991-01-03  [Irrigation].Apply(30.98);
            1991-01-04  [Irrigation].Apply(24.31);
            1991-01-16  [Irrigation].Apply(63.12);
            1991-01-23  [Irrigation].Apply(3.31);
            1991-01-24  [Irrigation].Apply(0.21);
            1991-01-30  [Irrigation].Apply(39.96);
            1991-01-31  [Irrigation].Apply(9.87);
            1991-02-05  [Irrigation].Apply(50.44);
            1991-02-06  [Irrigation].Apply(23.80);
            1991-02-20  [Irrigation].Apply(40.23);
            1991-02-21  [Irrigation].Apply(50.45);
            1991-02-27  [Irrigation].Apply(24.37);
            1991-10-23  [Irrigation].Apply(44.15);
            1991-10-24  [Irrigation].Apply(17.09);
            1991-11-06  [Irrigation].Apply(63);
            1991-11-07  [Irrigation].Apply(0.63);
            1991-11-19  [Irrigation].Apply(59.42);
            1991-11-20  [Irrigation].Apply(6.88);
            1991-12-03  [Irrigation].Apply(31.04);
            1991-12-04  [Irrigation].Apply(44.42);
            1991-12-19  [Irrigation].Apply(52.51);
            1991-12-30  [Irrigation].Apply(57.71);
            1991-12-31  [Irrigation].Apply(2.69);
            1992-01-15  [Irrigation].Apply(47.28);
            1992-01-16  [Irrigation].Apply(40.52);
            1992-01-17  [Irrigation].Apply(6.96);
            1992-02-26  [Irrigation].Apply(49.37);
            1992-02-27  [Irrigation].Apply(104.23);
            1992-03-10  [Irrigation].Apply(40.31);
            1992-03-11  [Irrigation].Apply(27.27);
            1992-03-30  [Irrigation].Apply(40.77);
            1992-03-31  [Irrigation].Apply(36.23);
            1992-04-13  [Irrigation].Apply(50.68);
            1992-04-14  [Irrigation].Apply(15.05);
            1992-10-27  [Irrigation].Apply(46.58);
            1992-10-28  [Irrigation].Apply(2.87);
            1992-12-15  [Irrigation].Apply(47.11);
            1992-12-16  [Irrigation].Apply(36.84);
            1993-01-12  [Irrigation].Apply(35.77);
            1993-01-13  [Irrigation].Apply(28.46);
            1993-02-10  [Irrigation].Apply(56.43);
            1993-02-11  [Irrigation].Apply(43.4);
            1993-03-02  [Irrigation].Apply(47.07);
            1993-03-03  [Irrigation].Apply(25.36);
          Plant Lucerne: CropType=Lucerne
          SoluteManager
          Manager Mower: same as New Zealand.Iversen_9.Simulation0.paddock.Mower
          Operations Cutting
            1991-01-09  [Mower].Script.Cut();
            1991-02-18  [Mower].Script.Cut();
            1991-10-15  [Mower].Script.Cut();
            1991-11-25  [Mower].Script.Cut();
            1992-01-06  [Mower].Script.Cut();
            1992-02-17  [Mower].Script.Cut();
            1992-03-23  [Mower].Script.Cut();
            1992-10-13  [Mower].Script.Cut();
            1992-11-26  [Mower].Script.Cut();
            1993-01-05  [Mower].Script.Cut();
            1993-02-04  [Mower].Script.Cut();
            1993-03-23  [Mower].Script.Cut();
          Soil: Latitude=0; Longitude=0
            Water
              Thickness  BD   AirDry  LL15  DUL   SAT
              100        1    0.1     0.11  0.23  0.53
              200        1.1  0.1     0.17  0.27  0.57
              300        1.1  0.1     0.3   0.39  0.57
              900        1.1  0.1     0.27  0.39  0.55
              SoilCrop LucerneSoil: LL=[0.25, 0.28, 0.28, 0.29]; KL=[0.08, 0.08, 0.08, 0.06]; XF=[1, 1, 1, 1]
            SoilWater: SummerDate=1-Nov; SummerU=9; SummerCona=5; WinterDate=1-Apr; WinterU=9; WinterCona=5; DiffusConst=40; DiffusSlope=16; Salb=0.13; CN2Bare=72; CNRed=20; CNCov=0.8; max_pond=0; Thickness=[100, 150, 250, 250, 250, 250, 250]; SWCON=[0.4, 0.4, 0.4, 0.4, 0.4, 0.4, 0]; ResidueInterception=0
            SoilNitrogen: fom_type=[default, manure, mucuna, lablab, shemp, stable]; fract_carb=[0.2, 0.3, 0.54, 0.57, 0.45, 0]; fract_cell=[0.7, 0.3, 0.37, 0.37, 0.47, 0.1]; fract_lign=[0.1, 0.4, 0.09, 0.06, 0.08, 0.9]
            SoilOrganicMatter: same as Australia.Hudson.P1 Base Simulation.paddock.soil.SoilOrganicMatter
            Analysis: PH=[6, 6.4, 6.8, 7.2, 7.6, 8, 8, 8, 8, 8, 8, 8, 8, 8, 8, 8]; PHUnits=Water; BoronUnits=HotWater
              Thickness=[100, 200, 200, 200, 200, 200, 200, 200, 200, 200, 200, 200, 200, 200, 200, 200]
            Sample Initial nitrogen: same as Australia.Hudson.P1 Base Simulation.paddock.soil.Initial nitrogen
            Sample Initial water: Thickness=[100, 150, 250, 250, 250, 250, 250]; SW=[0.46, 0.46, 0.53, 0.51, 0.48, 0.46, 0.45]; NO3Units=ppm; NH4Units=ppm; SWUnits=Volumetric; OCUnits=Total; PHUnits=Water
            CERESSoilTemperature
            OutputLayers: Thickness=[250, 250, 250, 250, 500]
            LayerStructure: Thickness=[100, 150, 250, 250, 250, 250, 250]
          Operations WaterInflow
            0001-01-01  0.32, depth: 1400)
            0001-01-01  0.01, depth: 1400)
            0001-01-01  0.6, depth: 1400)
            0001-01-01  0.54, depth: 1400)
            0001-01-01  0.34, depth: 1400)
            0001-01-01  0.27, depth: 1400)
            0001-01-01  0.46, depth: 1400)
            0001-01-01  0.31, depth: 1400)
            0001-01-01  0.33, depth: 1400)
            0001-01-01  0.17, depth: 1400)
            0001-01-01  0.23, depth: 1400)
            0001-01-01  0.18, depth: 1400)
            0001-01-01  0.18, depth: 1400)
            0001-01-01  0.19, depth: 1400)
            0001-01-01  0.17, depth: 1400)
            0001-01-01  0.18, depth: 1400)
            0001-01-01  0.18, depth: 1400)
            0001-01-01  0.19, depth: 1400)
            0001-01-01  0.18, depth: 1400)
            0001-01-01  0.21, depth: 1400)
            0001-01-01  0.17, depth: 1400)
            0001-01-01  0.01, depth: 1400)
            0001-01-01  0.01, depth: 1400)
            0001-01-01  0.07, depth: 1400)
            0001-01-01  0.09, depth: 1400)
            0001-01-01  0.13, depth: 1400)
            0001-01-01  0.05, depth: 1400)
            0001-01-01  0.08, depth: 1400)
            0001-01-01  0.1, depth: 1400)
            0001-01-01  0.19, depth: 1400)
            0001-01-01  0.07, depth: 1400)
            0001-01-01  0.06, depth: 1400)
            0001-01-01  0.35, depth: 1400)
            0001-01-01  0.31, depth: 1400)
            0001-01-01  0.57, depth: 1400)
            0001-01-01  0.51, depth: 1400)
            0001-01-01  0.49, depth: 1400)
            0001-01-01  0.5, depth: 1400)
            0001-01-01  0.62, depth: 1400)
            0001-01-01  0.57, depth: 1400)
            0001-01-01  0.61, depth: 1400)
            0001-01-01  0.05, depth: 1400)
            0001-01-01  0.05, depth: 1400)
            0001-01-01  0.14, depth: 1400)
            0001-01-01  0.07, depth: 1400)
            0001-01-01  0.02, depth: 1400)
            0001-01-01  0.31, depth: 1400)
            0001-01-01  0.68, depth: 1400)
            0001-01-01  0.6, depth: 1400)
            0001-01-01  0.69, depth: 1400)
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            0001-01-01  1.02, depth: 1400)
            0001-01-01  1.19, depth: 1400)
            0001-01-01  1.38, depth: 1400)
            0001-01-01  1.67, depth: 1400)
            0001-01-01  1.05, depth: 1400)
            0001-01-01  0.72, depth: 1400)
            0001-01-01  1.03, depth: 1400)
            0001-01-01  2.35, depth: 1400)
            0001-01-01  2.93, depth: 1400)
            0001-01-01  2.91, depth: 1400)
            0001-01-01  3.1, depth: 1400)
            0001-01-01  2.92, depth: 1400)
            0001-01-01  3.24, depth: 1400)
            0001-01-01  2.65, depth: 1400)
            0001-01-01  3.6, depth: 1400)
            0001-01-01  4.04, depth: 1400)
            0001-01-01  4.34, depth: 1400)
            0001-01-01  4.13, depth: 1400)
            0001-01-01  5.83, depth: 1400)
            0001-01-01  5.15, depth: 1400)
            0001-01-01  4.88, depth: 1400)
            0001-01-01  5.98, depth: 1400)
            0001-01-01  6.32, depth: 1400)
            0001-01-01  6.39, depth: 1400)
            0001-01-01  4.46, depth: 1400)
            0001-01-01  3.26, depth: 1400)
            0001-01-01  2.77, depth: 1400)
            0001-01-01  9.17, depth: 1400)
            0001-01-01  9.05, depth: 1400)
            0001-01-01  5.05, depth: 1400)
            0001-01-01  6.75, depth: 1400)
            0001-01-01  0.97, depth: 1400)
            0001-01-01  7.11, depth: 1400)
            0001-01-01  9.99, depth: 1400)
            0001-01-01  9.95, depth: 1400)
            0001-01-01  10.74, depth: 1400)
            0001-01-01  5.96, depth: 1400)
            0001-01-01  8.12, depth: 1400)
            0001-01-01  9.04, depth: 1400)
            0001-01-01  6.98, depth: 1400)
            0001-01-01  4.62, depth: 1400)
            0001-01-01  5.25, depth: 1400)
            0001-01-01  4.94, depth: 1400)
            0001-01-01  4.91, depth: 1400)
            0001-01-01  4.64, depth: 1400)
            0001-01-01  6.89, depth: 1400)
            0001-01-01  2.48, depth: 1400)
            0001-01-01  2.52, depth: 1400)
            0001-01-01  4.1, depth: 1400)
            0001-01-01  5.2, depth: 1400)
            0001-01-01  5.51, depth: 1400)
            0001-01-01  5.14, depth: 1400)
            0001-01-01  4, depth: 1400)
            0001-01-01  4.69, depth: 1400)
            0001-01-01  6.06, depth: 1400)
            0001-01-01  7.91, depth: 1400)
            0001-01-01  8.11, depth: 1400)
            0001-01-01  5.49, depth: 1400)
            0001-01-01  8.7, depth: 1400)
            0001-01-01  9.27, depth: 1400)
    Experiment Moora
      Factors
        Factor Defoliation: Specifications=[Cutting]
          Operations Cutting
            1999-04-08  [Mower].Script.Cut();
            1999-08-10  [Mower].Script.Cut()
            2000-04-14  [Mower].Script.Cut();
            2000-08-18  [Mower].Script.Cut();
      Simulation MooraLucerne
        Clock: StartDate=1998-08-26; EndDate=2001-02-01
        Summary summaryfile
        Weather: FileName=moora.met
        SoilArbitrator Soil Arbitrator
        Zone paddock: Area=1; Slope=0
          MicroClimate: a_interception=0; b_interception=1; c_interception=0; d_interception=0; soil_albedo=0.23; SoilHeatFluxFraction=0.4; NightInterceptionFraction=0.5; ReferenceHeight=2
          Irrigation
          Fertiliser
          Manager DiagnosticsVariables: same as New Zealand.Iversen_8.Simulation1.paddock.DiagnosticsVariables
          SurfaceOrganicMatter surface organic matter: InitialResidueName=wheat; InitialResidueType=wheat; InitialResidueMass=0; InitialStandingFraction=0; InitialCPR=0; InitialCNR=80; FractionFaecesAdded=0.5
          Report: same as Australia.Hudson.P1 Base Simulation.paddock.Report
          Manager LucerneSowingRule
            RowSpacing = 300
            SowingDepth = 40
            SowingRate = 30
            CultivarName = Sceptre
            SowingDate = 1998-08-26
            script: same as in New Zealand.Iversen_8.Simulation1.paddock.LucerneSowingRule
          Operations IrrigationEvents
          Plant Lucerne: CropType=Lucerne
          SoluteManager
          Manager Mower: same as New Zealand.Iversen_9.Simulation0.paddock.Mower
          Operations Cutting
          Soil: Latitude=0; Longitude=0
            Water
              Thickness  BD   AirDry  LL15  DUL   SAT
              100        1.8  0.01    0.02  0.06  0.32
              200        1.8  0.01    0.02  0.06  0.32
              200        1.8  0.01    0.02  0.05  0.32
              200        1.8  0.01    0.02  0.05  0.32
              300        1.8  0.01    0.02  0.05  0.32
              500        1.8  0.01    0.02  0.05  0.32
              500        1.8  0.01    0.02  0.05  0.32
              SoilCrop LucerneSoil: LL=[0.03, 0.03, 0.05, 0.13, 0.15, 0.16, 0.18]; KL=[0.08, 0.08, 0.08, 0.08, 0.08, 0.07, 0.06]; XF=[1, 0.8, 0.8, 0.8, 0.8, 0.8, 0.8]
            SoilWater: SummerDate=1-Nov; SummerU=4; SummerCona=2; WinterDate=1-Apr; WinterU=4; WinterCona=2; DiffusConst=0; DiffusSlope=0; Salb=0.18; CN2Bare=60; CNRed=20; CNCov=0.8; max_pond=0; Thickness=[100, 200, 200, 200, 300, 500, 500]; SWCON=[0.5, 0.5, 0.5, 0.5, 0.5, 0.5, 0.5]; ResidueInterception=0
            SoilNitrogen: fom_type=[default, manure, mucuna, lablab, shemp, stable]; fract_carb=[0.2, 0.3, 0.54, 0.57, 0.45, 0]; fract_cell=[0.7, 0.3, 0.37, 0.37, 0.47, 0.1]; fract_lign=[0.1, 0.4, 0.09, 0.06, 0.08, 0.9]
            SoilOrganicMatter: RootCN=20; RootWt=500; SoilCN=14.5; EnrACoeff=7.4; EnrBCoeff=0.2; OCUnits=Total
              Thickness  OC    FBiom  FInert
              100        0.9   0.035  0.3
              200        0.3   0.025  0.3
              200        0.01  0.015  0.6
              200        0.01  0.01   0.75
              300        0.01  0.01   0.9
              500        0.01  0.01   0.99
              500        0.01  0.01   0.99
            Analysis: Thickness=[100, 200, 200, 200, 300, 500, 500]; PH=[5, 5, 5, 5, 5, 5, 5]; PHUnits=Water; BoronUnits=HotWater
            Sample Initial nitrogen: NO3Units=ppm; NH4Units=ppm; SWUnits=Volumetric; OCUnits=Total; PHUnits=Water
              Thickness  NO3  NH4
              100        9.2  0.3
              200        7.6  0.3
              200        4.9  0.3
              200        2.7  0.3
              300        1.5  0.3
              500        1.8  0.5
              500        1.4  0.5
              500        -    -
              500        -    -
              500        -    -
              500        -    -
              500        -    -
              500        -    -
              500        -    -
              500        -    -
              500        -    -
            Sample Initial water: NO3Units=ppm; NH4Units=ppm; SWUnits=Volumetric; OCUnits=Total; PHUnits=Water
              Thickness=[100, 200, 200, 200, 300, 500, 500, 500, 500, 500, 500, 500, 500, 500, 500, 500]
              SW=[0.05, 0.05, 0.05, 0.05, 0.05, 0.05, 0.05, 0.05, 0.05, 0.05, 0.05, 0.05, 0.05, 0.05, 0.05, 0.05]
            CERESSoilTemperature
            OutputLayers: Thickness=[500, 500, 1000, 2500]
  Folder Argentina
    Experiment TrenqueLauquen
      Factors
        Factor Defoliation: Specifications=[Cutting]
          Operations Cutting
            2010-11-15  [Mower].Script.Cut();
            2010-12-13  [Mower].Script.Cut();
            2011-01-12  [Mower].Script.Cut();
            2011-02-14  [Mower].Script.Cut();
            2011-03-16  [Mower].Script.Cut();
            2011-05-06  [Mower].Script.Cut();
            2011-07-12  [Mower].Script.Cut();
            2011-09-14  [Mower].Script.Cut();
            2011-10-25  [Mower].Script.Cut();
            2011-11-23  [Mower].Script.Cut();
            2011-12-21  [Mower].Script.Cut();
            2012-02-02  [Mower].Script.Cut();
            2012-03-26  [Mower].Script.Cut();
            2012-04-26  [Mower].Script.Cut();
      Simulation winter active Trenque Lauquen
        Clock: StartDate=2010-04-18; EndDate=2012-04-27
        Summary summaryfile
        Weather: FileName=TrenqueLauquen.met
        SoilArbitrator Soil Arbitrator
        Zone paddock: Area=1; Slope=0
          MicroClimate: a_interception=0; b_interception=1; c_interception=0; d_interception=0; soil_albedo=0.23; SoilHeatFluxFraction=0.4; NightInterceptionFraction=0.5; ReferenceHeight=2
          Irrigation
          Fertiliser
          Manager DiagnosticsVariables: same as New Zealand.Iversen_8.Simulation1.paddock.DiagnosticsVariables
          SurfaceOrganicMatter surface organic matter: InitialResidueName=wheat; InitialResidueType=wheat; InitialResidueMass=0; InitialStandingFraction=0; InitialCPR=0; InitialCNR=80; FractionFaecesAdded=0.5
          Report: same as Australia.Hudson.P1 Base Simulation.paddock.Report
          Manager LucerneSowingRule
            RowSpacing = 300
            SowingDepth = 10
            SowingRate = 480
            CultivarName = Kaituna
            SowingDate = 2010-04-19
            script: same as in New Zealand.Iversen_8.Simulation1.paddock.LucerneSowingRule
          Operations IrrigationEvents
          Plant Lucerne: CropType=Lucerne
          SoluteManager
          Manager Mower: same as New Zealand.Iversen_9.Simulation0.paddock.Mower
          Operations Cutting
          Soil TrenqueLauquen: SoilType=Sandy loam; Site=Trenque Lauquen; State=Buenos Aires; Country=Argentina; DataSource=EEA Rafaela INTA
            Comments=These soils represent typical sandy/sandy loam soils in the regions of Bulawayo and Masvingo, Zimbabwe. Possibly about 1999?
            Water
              Thickness  BD    AirDry  LL15   DUL    SAT
              280        1.37  0.035   0.07   0.17   0.189
              190        1.38  0.031   0.061  0.182  0.202
              370        1.22  0.023   0.045  0.133  0.147
              240        1.3   0.033   0.065  0.121  0.134
              220        1.22  0.049   0.097  0.209  0.231
              SoilCrop LucerneSoil: LL=[0.07, 0.061, 0.045, 0.065, 0.097]; KL=[0.06, 0.06, 0.04, 0.04, 0.04]; XF=[1, 1, 1, 1, 0.6]
            InitialWater: PercentMethod=EvenlyDistributed; FractionFull=1
            SoilWater: SummerDate=1-nov; SummerU=6; SummerCona=3.5; WinterDate=1-apr; WinterU=2; WinterCona=2; DiffusConst=40; DiffusSlope=16; Salb=0.1; CN2Bare=0; CNRed=0.9; CNCov=0.9; max_pond=0; Thickness=[280, 190, 370, 240, 220]; SWCON=[0.5, 0.5, 0.5, 0.5, 0.5]; ResidueInterception=0
            SoilNitrogen: fom_type=[default, manure, mucuna, lablab, shemp, stable]; fract_carb=[0.2, 0.3, 0.54, 0.57, 0.45, 0]; fract_cell=[0.7, 0.3, 0.37, 0.37, 0.47, 0.1]; fract_lign=[0.1, 0.4, 0.09, 0.06, 0.08, 0.9]
            SoilOrganicMatter: RootCN=40; RootWt=1000; SoilCN=19.35; EnrACoeff=7.4; EnrBCoeff=0.2; OCUnits=Total
              Thickness  OC     FBiom   FInert
              280        1.349  0.0356  0.0042
              190        0.804  0.0152  0.0034
              370        0.353  0.0237  0.0083
              240        0.133  0.0145  0.0057
              220        0.094  0.0185  0.0077
              999999     -      -       -
            Analysis: Thickness=[280, 190, 370, 240, 220]; PH=[7.1, 8.3, 8.3, 8.8, 9.3]; PHUnits=Water; BoronUnits=HotWater
            Sample Initial nitrogen: NO3Units=kgha; NH4Units=kgha; SWUnits=Volumetric; OCUnits=Total; PHUnits=Water
              Thickness  NO3   NH4
              280        20.4  4
              190        6.4   0.4
              370        5.8   0.4
              240        2.4   0.1
              220        2.7   7.7
            CERESSoilTemperature
    Experiment Balcarce
      Factors
        Factor Defoliation: Specifications=[Cutting]
          Operations Cutting
            2013-01-09  [Mower].Script.Cut();
            2013-02-07  [Mower].Script.Cut();
            2013-03-13  [Mower].Script.Cut();
            2013-04-17  [Mower].Script.Cut();
            2013-05-05  [Mower].Script.Cut();
            2013-09-16  [Mower].Script.Cut();
            2013-10-28  [Mower].Script.Cut();
            2013-11-26  [Mower].Script.Cut();
            2013-12-27  [Mower].Script.Cut();
            2013-11-23  [Mower].Script.Cut();
            2013-12-27  [Mower].Script.Cut();
            2014-01-28  [Mower].Script.Cut();
            2014-02-24  [Mower].Script.Cut();
            2014-04-16  [Mower].Script.Cut();
      Simulation Winter dormant Balcarce
        Clock: StartDate=2012-10-17; EndDate=2014-12-31
        Summary summaryfile
        Weather: FileName=Balcarce.met
        SoilArbitrator Soil Arbitrator
        Zone paddock: Area=1; Slope=0
          MicroClimate: a_interception=0; b_interception=1; c_interception=0; d_interception=0; soil_albedo=0.23; SoilHeatFluxFraction=0.4; NightInterceptionFraction=0.5; ReferenceHeight=2
          Irrigation
          Fertiliser
          Manager DiagnosticsVariables: same as New Zealand.Iversen_8.Simulation1.paddock.DiagnosticsVariables
          SurfaceOrganicMatter surface organic matter: InitialResidueName=wheat; InitialResidueType=wheat; InitialResidueMass=0; InitialStandingFraction=0; InitialCPR=0; InitialCNR=80; FractionFaecesAdded=0.5
          Report: same as Australia.Hudson.P1 Base Simulation.paddock.Report
          Manager LucerneSowingRule
            RowSpacing = 300
            SowingDepth = 10
            SowingRate = 480
            CultivarName = WL611
            SowingDate = 2012-10-18
            script: same as in New Zealand.Iversen_8.Simulation1.paddock.LucerneSowingRule
          Operations IrrigationEvents
          Plant Lucerne: CropType=Lucerne
          SoluteManager
          Manager Mower: same as New Zealand.Iversen_9.Simulation0.paddock.Mower
          Operations Cutting
          Soil Balcarce: Site=Balcarce; NearestTown=Buenos Aires; State=Buenos Aires; Country=Argentina; Latitude=-37.8; Longitude=-58.3; DataSource=EEA Balcarce INTA
            InitialWater: PercentMethod=EvenlyDistributed; FractionFull=0.92
            SoilWater: SummerDate=1-nov; SummerU=6; SummerCona=3.5; WinterDate=1-apr; WinterU=2; WinterCona=2; DiffusConst=40; DiffusSlope=16; Salb=0.1; CN2Bare=0; CNRed=0.9; CNCov=0.9; max_pond=0; Thickness=[200, 200, 200, 200, 200, 200]; SWCON=[0.5, 0.5, 0.5, 0.5, 0.5, 0.5]; ResidueInterception=0
            SoilNitrogen: fom_type=[default, manure, mucuna, lablab, shemp, stable]; fract_carb=[0.2, 0.3, 0.54, 0.57, 0.45, 0]; fract_cell=[0.7, 0.3, 0.37, 0.37, 0.47, 0.1]; fract_lign=[0.1, 0.4, 0.09, 0.06, 0.08, 0.9]
            Water
              Thickness  BD    AirDry  LL15   DUL    SAT
              230        1.15  0.085   0.169  0.28   0.393
              80         1.15  0.105   0.15   0.276  0.387
              230        1.27  0.142   0.178  0.351  0.498
              160        1.27  0.194   0.215  0.427  0.507
              500        1.35  0.179   0.199  0.396  0.45
              SoilCrop LucerneSoil: LL=[0.169, 0.15, 0.178, 0.215, 0.199]; KL=[0.06, 0.06, 0.04, 0.04, 0.04]; XF=[1, 1, 1, 1, 0.6]
            SoilOrganicMatter: RootCN=30; RootWt=1500; SoilCN=19.69; EnrACoeff=7.4; EnrBCoeff=0.2; OCUnits=Total
              Thickness  OC     FBiom   FInert
              200        4.179  0.0457  0.0216
              200        2.552  0.0066  0.0095
              200        1.167  0.0018  0
              200        0.631  0.0009  0
              200        0.64   0       0
              200        0.64   0       0
              200        0.64   0       0
            Analysis: Thickness=[200, 200, 200, 200, 200, 200]; PH=[7, 7.4, 7.4, 7.8, 7.8, 7.8]; PHUnits=Water; BoronUnits=HotWater
            Sample Initial nitrogen: NO3Units=kgha; NH4Units=kgha; SWUnits=Volumetric; OCUnits=Total; PHUnits=Water
              Thickness  NO3   NH4
              200        15    2.8
              200        1     0
              200        11.6  0
              200        8.8   0
              200        4.7   0
              200        3.3   0
              200        3.3   0
            CERESSoilTemperature
    Experiment Pergamino
      Factors
        Factor Defoliation: Specifications=[Cutting]
          Operations Cutting
            2010-10-08  [Mower].Script.Cut();
            2010-10-08  [Fertiliser].Apply(3.7, Fertiliser.Types.UreaN, 50);
            2010-11-16  [Mower].Script.Cut();
            2010-12-10  [Mower].Script.Cut();
            2011-01-06  [Mower].Script.Cut();
            2011-02-01  [Mower].Script.Cut();
            2011-03-09  [Mower].Script.Cut();
            2011-04-25  [Mower].Script.Cut();
            2011-06-08  [Mower].Script.Cut();
            2011-09-14  [Mower].Script.Cut();
            2011-10-24  [Mower].Script.Cut();
            2011-11-17  [Mower].Script.Cut();
            2011-12-12  [Mower].Script.Cut();
            2012-01-17  [Mower].Script.Cut();
            2012-02-10  [Mower].Script.Cut();
            2012-03-19  [Mower].Script.Cut();
            2012-05-09  [Mower].Script.Cut();
            2012-06-21  [Mower].Script.Cut();
            2012-10-04  [Mower].Script.Cut();
      Simulation Winter dormant Pergamino
        Clock: StartDate=2010-01-02; EndDate=2012-12-31
        Summary summaryfile
        Weather: FileName=Per.met
        SoilArbitrator Soil Arbitrator
        Zone paddock: Area=1; Slope=0
          MicroClimate: a_interception=0; b_interception=1; c_interception=0; d_interception=0; soil_albedo=0.23; SoilHeatFluxFraction=0.4; NightInterceptionFraction=0.5; ReferenceHeight=2
          Irrigation
          Fertiliser
          Manager DiagnosticsVariables: same as New Zealand.Iversen_8.Simulation1.paddock.DiagnosticsVariables
          SurfaceOrganicMatter surface organic matter: InitialResidueName=wheat; InitialResidueType=wheat; InitialResidueMass=0; InitialStandingFraction=0; InitialCPR=0; InitialCNR=80; FractionFaecesAdded=0.5
          Report: same as New Zealand.Iversen_91.Simulation2.paddock.Report
          Manager LucerneSowingRule
            RowSpacing = 175
            SowingDepth = 10
            SowingRate = 250
            CultivarName = Kaituna
            SowingDate = 2010-03-29
            script: same as in New Zealand.Iversen_8.Simulation1.paddock.LucerneSowingRule
          Operations IrrigationEvents
          Plant Lucerne: CropType=Lucerne
          SoluteManager
          Manager Mower: same as New Zealand.Iversen_9.Simulation0.paddock.Mower
          Operations Cutting
          Soil per soil: SoilType=Typical argiudol; Site=Pergamino; NearestTown=Buenos Aires; State=Buenos Aires; Country=Argentina; Latitude=-33.9; Longitude=-60.6; DataSource=EEA Pergamino INTA
            InitialWater: PercentMethod=FilledFromTop; FractionFull=1
            SoilWater: SummerDate=1-nov; SummerU=6; SummerCona=3.5; WinterDate=1-apr; WinterU=2; WinterCona=2; DiffusConst=40; DiffusSlope=16; Salb=0.1; CN2Bare=0; CNRed=0.9; CNCov=0.9; max_pond=0; Thickness=[130, 120, 90, 410, 200, 650, 400]; SWCON=[0.5, 0.5, 0.5, 0.5, 0.5, 0.5, 0.5]; ResidueInterception=0
            SoilNitrogen: fom_type=[default, manure, mucuna, lablab, shemp, stable]; fract_carb=[0.2, 0.3, 0.54, 0.57, 0.45, 0]; fract_cell=[0.7, 0.3, 0.37, 0.37, 0.47, 0.1]; fract_lign=[0.1, 0.4, 0.09, 0.06, 0.08, 0.9]
            Water
              Thickness  BD    AirDry  LL15   DUL    SAT
              130        1.27  0.089   0.178  0.326  0.362
              120        1.32  0.125   0.178  0.327  0.363
              90         1.33  0.155   0.193  0.356  0.393
              410        1.33  0.204   0.226  0.418  0.461
              200        1.33  0.174   0.193  0.355  0.392
              650        1.33  0.145   0.16   0.293  0.323
              SoilCrop LucerneSoil: LL=[0.178, 0.178, 0.193, 0.226, 0.193, 0.16]; KL=[0.16, 0.16, 0.1, 0.1, 0.05, 0.05]; XF=[1, 1, 1, 1, 1, 1]
            SoilOrganicMatter: RootCN=30; RootWt=1500; SoilCN=18.71; EnrACoeff=7.4; EnrBCoeff=0.2; OCUnits=Total
              Thickness  OC     FBiom   FInert
              130        1.732  0.0729  0.0281
              120        1.103  0.0323  0.0269
              90         0.501  0.0099  0.0001
              410        0.385  0.0099  0
              200        0.209  0.0099  0.0001
              650        0.149  0.0099  0
              400        0.096  0.0099  0.0001
            Analysis: Thickness=[130, 120, 90, 410, 200, 650, 400]; PH=[5.9, 6.1, 6.2, 6.3, 6.5, 6.4, 7.3]; PHUnits=Water; BoronUnits=HotWater
            Sample Initial nitrogen: NO3Units=kgha; NH4Units=kgha; SWUnits=Volumetric; OCUnits=Total; PHUnits=Water
              Thickness  NO3   NH4
              130        11.6  2.7
              120        4.6   0.7
              90         3.6   0.1
              410        25.5  0.2
              200        13.2  0.1
              650        61.8  0.1
              400        51.4  0.1
            CERESSoilTemperature
    Experiment Rafaela
      Factors
        Factor Defoliation: Specifications=[Cutting]
          Operations Cutting
            2010-09-28  [Mower].Script.Cut();
            2010-11-03  [Mower].Script.Cut();
            2010-12-06  [Mower].Script.Cut();
            2011-01-12  [Mower].Script.Cut();
            2011-02-10  [Mower].Script.Cut();
            2011-03-05  [Mower].Script.Cut();
            2011-04-23  [Mower].Script.Cut();
            2011-07-04  [Mower].Script.Cut();
            2011-09-14  [Mower].Script.Cut();
            2011-10-31  [Mower].Script.Cut();
            2011-11-26  [Mower].Script.Cut();
            2011-12-20  [Mower].Script.Cut();
            2012-01-30  [Mower].Script.Cut();
            2012-03-29  [Mower].Script.Cut();
            2012-05-15  [Mower].Script.Cut();
      Simulation Winter dormant Rafaela
        Clock: StartDate=2010-01-01; EndDate=2012-08-31
        Summary summaryfile
        Weather: FileName=Raf.met
        SoilArbitrator Soil Arbitrator
        Zone paddock: Area=1; Slope=0
          MicroClimate: a_interception=0; b_interception=1; c_interception=0; d_interception=0; soil_albedo=0.23; SoilHeatFluxFraction=0.4; NightInterceptionFraction=0.5; ReferenceHeight=2
          Irrigation
          Fertiliser
          Manager DiagnosticsVariables: same as New Zealand.Iversen_8.Simulation1.paddock.DiagnosticsVariables
          SurfaceOrganicMatter surface organic matter: InitialResidueName=wheat; InitialResidueType=wheat; InitialResidueMass=0; InitialStandingFraction=0; InitialCPR=0; InitialCNR=80; FractionFaecesAdded=0.5
          Report: same as Australia.Hudson.P1 Base Simulation.paddock.Report
          Manager LucerneSowingRule
            RowSpacing = 175
            SowingDepth = 15
            SowingRate = 350
            CultivarName = Sceptre
            SowingDate = 2010-05-15
            script: same as in New Zealand.Iversen_8.Simulation1.paddock.LucerneSowingRule
          Operations IrrigationEvents
            2010-09-28  [Irrigation].Apply(23);
            2010-11-03  [Irrigation].Apply(28);
            2010-12-06  [Irrigation].Apply(56);
            2011-01-12  [Irrigation].Apply(62);
            2011-02-10  [Irrigation].Apply(30);
            2011-03-05  [Irrigation].Apply(50);
            2011-04-23  [Irrigation].Apply(56);
            2011-07-04  [Irrigation].Apply(13);
            2011-09-14  [Irrigation].Apply(66);
            2011-10-31  [Irrigation].Apply(64);
            2011-11-26  [Irrigation].Apply(24);
            2011-12-20  [Irrigation].Apply(62);
            2012-01-30  [Irrigation].Apply(82);
            2012-03-29  [Irrigation].Apply(18);
          Plant Lucerne: CropType=Lucerne
          SoluteManager
          Manager Mower: same as New Zealand.Iversen_9.Simulation0.paddock.Mower
          Operations Cutting
          Soil raf soil: SoilType=Sand; Country=Africa (Generic); ApsoilNumber=958; Latitude=-20.074444; Longitude=30.832778; DataSource=EEA Rafaela INTA
            Comments=These soils represent typical sandy/sandy loam soils in the regions of Bulawayo and Masvingo, Zimbabwe. Possibly about 1999?
            InitialWater: PercentMethod=EvenlyDistributed; FractionFull=0.3
            SoilWater: SummerDate=1-nov; SummerU=6; SummerCona=3.5; WinterDate=1-apr; WinterU=2; WinterCona=2; DiffusConst=40; DiffusSlope=16; Salb=0.1; CN2Bare=0; CNRed=0.9; CNCov=0.9; max_pond=0; Thickness=[150, 90, 80, 230, 320, 280, 250, 400]; SWCON=[0, 0, 0, 0, 0, 0, 0, 0]; ResidueInterception=0
            SoilNitrogen: fom_type=[default, manure, mucuna, lablab, shemp, stable]; fract_carb=[0.2, 0.3, 0.54, 0.57, 0.45, 0]; fract_cell=[0.7, 0.3, 0.37, 0.37, 0.47, 0.1]; fract_lign=[0.1, 0.4, 0.09, 0.06, 0.08, 0.9]
            Water
              Thickness  BD    AirDry  LL15   DUL    SAT
              150        1.18  0.089   0.177  0.338  0.474
              90         1.26  0.119   0.17   0.338  0.474
              80         1.33  0.136   0.17   0.334  0.474
              230        1.38  0.203   0.225  0.375  0.445
              320        1.35  0.227   0.252  0.392  0.445
              280        1.31  0.213   0.236  0.384  0.445
              250        1.28  0.205   0.228  0.368  0.423
              400        1.27  0.18    0.2    0.34   0.423
              SoilCrop LucerneSoil: LL=[0.177, 0.17, 0.17, 0.225, 0.252, 0.236, 0.228, 0.2]; KL=[0.16, 0.16, 0.1, 0.1, 0.05, 0.05, 0.01, 0.01]; XF=[1, 0.6, 0.5, 0.5, 0.5, 0.5, 0.1, 0.1]
            SoilOrganicMatter: RootCN=30; RootWt=1500; SoilCN=19.93; EnrACoeff=7.4; EnrBCoeff=0.2; OCUnits=Total
              Thickness  OC     FBiom   FInert
              200        1.435  0.0081  0.0056
              150        0.803  0.0048  0.0056
              275        0.483  0.0035  0.0042
              300        0.362  0.001   0.001
              225        0.245  0.0029  0.0037
              250        0.171  0.0003  0.0003
              200        0.111  0.0005  0.0008
            Analysis: Thickness=[200, 150, 275, 300, 225, 250, 200]; PH=[6.2, 6.3, 6.5, 6.7, 7.2, 7.4, 8.2]; PHUnits=Water; BoronUnits=HotWater
            Sample Initial nitrogen: NO3Units=kgha; NH4Units=kgha; SWUnits=Volumetric; OCUnits=Total; PHUnits=Water
              Thickness  NO3   NH4
              200        36.4  1.4
              150        12.5  0.3
              275        12.9  0.3
              300        5.4   0.1
              225        2.6   0.1
              250        1     0
              200        0.3   0
              999999     -     -
            CERESSoilTemperature
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