Simulations: Area=0
  DataStore
    Input: FileNames=[C:\ApsimX\Tests\Potato\Observed\potato_observations.txt]
    Input InputRadInd
      FileNames=[C:\ApsimX\Tests\Potato\Observed\Potato_radint_observations.txt]
    Input InputNodeNo: FileNames=[C:\ApsimX\Tests\Potato\Observed\cultivar_nodenumber.txt]
  Tests
    Test:
      SimulationName                 TableName  Type       ColumnNames                      Parameters
      CultivarCultivarRussetBurbank  Report     Tolerance  Plant.Phenology.StageCode.Value  1,1
      CultivarCultivarRussetBurbank  Report     Tolerance  Plant.Leaf.LAI                   1,1
      CultivarCultivarRussetBurbank  Report     Tolerance  Plant.Leaf.CoverGreen            1,1
      CultivarCultivarRussetBurbank  Report     Tolerance  Plant.Leaf.Live.Wt               1,1
      CultivarCultivarRussetBurbank  Report     Tolerance  Plant.Stem.Live.Wt               1,1
      CultivarCultivarRussetBurbank  Report     Tolerance  Plant.Tuber.Live.Wt              1,1
      CultivarCultivarRussetBurbank  Report     Tolerance  Plant.Root.Live.Wt               1,1
      CultivarCultivarRussetBurbank  Report     Tolerance  Plant.Leaf.Live.N                1,1
      CultivarCultivarRussetBurbank  Report     Tolerance  Plant.Stem.Live.N                1,1
      CultivarCultivarRussetBurbank  Report     Tolerance  Plant.Tuber.Live.N               1,1
      CultivarCultivarRussetBurbank  Report     Tolerance  Plant.Root.Live.N                1,1
  Experiment Potato
    Factors
      Factor Cultivar: Paths=[PotatoSowingRule].Script.CultivarName
        FactorValue Burbank
        FactorValue JerseyBenny
        FactorValue RedRascal
        FactorValue Horizon
        FactorValue IlamHardy
        FactorValue Karaka
        FactorValue Nooksac
        FactorValue Rua
    Simulation RussetBurbank: Area=0
      WeatherFile: FileName=lincoln.met; MaxT=12.2; MinT=9.4; Rain=0.6; Radn=3.3; vp=11.8; wind=2.8; CO2=350
      Clock: StartDate=2003-10-20; EndDate=2004-05-23
      Summary
      Zone Field: Area=0
        Soil Templeton: SoilType=Sedementary; LocalName=Lincoln; Latitude=0; Longitude=0
          Water
            Thickness  BD   AirDry  LL15  DUL   SAT
            100        1.2  0.08    0.16  0.33  0.5
            200        1.2  0.16    0.16  0.33  0.5
            300        1.2  0.15    0.15  0.31  0.44
            300        1.2  0.13    0.13  0.27  0.46
            300        1.2  0.15    0.15  0.3   0.44
            300        1.2  0.15    0.15  0.3   0.44
            SoilCrop Potato: LL=[0.13, 0.13, 0.1, 0.15, 0.3, 0.3]; KL=[0.1, 0.06, 0.04, 0.01, 0, 0]; XF=[1, 1, 1, 1, 0, 0]
          SoilWater: min_crit_temp=5; max_crit_temp=35; max_albedo=0.23; A_to_evap_fact=0.44; canopy_eos_coef=1.7; sw_top_crit=0.9; sumes1_max=100; sumes2_max=25; solute_flow_eff=[1]; solute_flux_eff=[1]; gravity_gradient=2E-05; specific_bd=2.65; hydrol_effective_depth=450; immobile_solutes=[nh4]; canopy_fact=[1, 1, 0, 0]; canopy_fact_height=[0, 600, 1800, 30000]; canopy_fact_default=0.5; act_evap_method=ritchie; irrigation_will_runoff=false; irrigation_layer=1; SummerCona=4.4; SummerU=9; SummerDate=1-Nov; WinterCona=4.4; WinterU=9; WinterDate=1-Apr; DiffusConst=88; DiffusSlope=35.4; Salb=0.18; slope=0; discharge_width=0; catchment_area=0; max_pond=0; CN2Bare=0; CNRed=-9E-05; CNCov=0
            Thickness  SWCON  KLAT
            100        0.55   0
            200        0.55   0
            300        0.55   0
            300        0.55   0
            300        0.55   0
            300        0.55   0
            mobile_solutes=[no3, urea, cl, br, org_n, org_c_pool1, org_c_pool2, org_c_pool3]
          SoilNitrogen: fom_type=[default, manure, mucuna, lablab, shemp, stable]; fract_carb=[0.2, 0.3, 0.54, 0.57, 0.45, 0]; fract_cell=[0.7, 0.3, 0.37, 0.37, 0.47, 0.1]; fract_lign=[0.1, 0.4, 0.09, 0.06, 0.08, 0.9]; wfpsN2N2O_x=[22, 88]; wfpsN2N2O_y=[0.1, 1]
          SoilOrganicMatter: RootCN=30; RootWt=3000; SoilCN=11.5; EnrACoeff=7.4; EnrBCoeff=0.2; OCUnits=Total
            Thickness  OC    FBiom  FInert
            100        3.5   0.025  0.3
            200        2.5   0.025  0.4
            300        1.2   0.015  0.75
            300        1.03  0.01   0.9
            300        0.47  0.01   0.96
            300        0.47  0.01   0.96
          Analysis: Thickness=[100, 200, 300, 300, 300, 300]; PH=[6.6, 6.2, 5.7, 5.5, 5.5, 5.5]; PHUnits=Water; BoronUnits=HotWater
          InitialWater Initial water: FractionFull=1; PercentMethod=FilledFromTop
          Sample: NO3Units=kgha; NH4Units=kgha; SWUnits=Volumetric; OCUnits=Total; PHUnits=Water
            Thickness  NO3   NH4
            100        40    0.1
            200        30    0.1
            300        14    0.1
            300        14    0.1
            300        1.38  0.1
            300        1.38  0.1
        Irrigation
        Fertiliser
          Definitions:
            Name         FractionNO3  FractionNH4  FractionUrea  FractionRockP  FractionBandedP  FractionLabileP  FractionCa  Description
            UreaN        0            0            1             0              0                0                0           -
            NO3N         1            0            0             0              0                0                0           -
            CalciteCA    0            0            0             0              0                0                1           Ca as finely ground Agricultural Lime
            CalciteFine  0            0            0             0              0                0                0.4         finely ground Agricultural Lime
            Dolomite     0            0            0             0              0                0                0.22        finely ground dolomite
            NO3N         1            0            0             0              0                0                0           N as nitrate
            NH4N         0            1            0             0              0                0                0           N as ammonium
            NH4NO3N      0.5          0.5          0             0              0                0                0           ammonium nitrate
            DAP          0            0.18         0             0              0                0                0           di-ammonium phosphate
            MAP          0            0.11         0             0              0                0                0           mono-ammonium phosphate
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        SurfaceOrganicMatter: crit_residue_wt=2000; opt_temp=20; cum_eos_max=20; cnrf_coeff=0.277; cnrf_optcn=25; c_fract=0.4; leach_rain_tot=25; min_rain_to_leach=10; crit_min_surfom_orgC=0.004; default_cpr=0; default_standing_fraction=0; standing_extinct_coeff=0.5; fractionFaecesAdded=0.5; PoolName=Wheat; type=Wheat; mass=2000; standing_fraction=0; cnr=80
          TillageTypes
        MicroClimate: air_pressure=1010; soil_emissivity=0.96; sun_angle=15; soil_heat_flux_fraction=0.4; night_interception_fraction=0.5; windspeed_default=3; refheight=2; albedo=0.26; emissivity=0.96; gsmax=0.01; r50=200; a_interception=0; b_interception=1; c_interception=0; d_interception=0; soil_albedo=0.23
          ComponentData Potato: Albedo=0.26; Emissivity=0.96; R50=200; Gsmax=0.03
          ComponentData crop: Albedo=0.26; Emissivity=0.96; R50=200; Gsmax=0.011
          ComponentData broccoli: Albedo=0.26; Emissivity=0.96; R50=200; Gsmax=0.011
          ComponentData tree: Albedo=0.15; Emissivity=0.96; R50=200; Gsmax=0.005
          ComponentData grandis: Albedo=0.15; Emissivity=0.96; R50=200; Gsmax=0.005
          ComponentData oilpalm: Albedo=0.15; Emissivity=0.96; R50=200; Gsmax=0.005
          ComponentData oilmallee: Albedo=0.15; Emissivity=0.96; R50=200; Gsmax=0.005
          ComponentData globulus: Albedo=0.15; Emissivity=0.96; R50=200; Gsmax=0.005
          ComponentData camaldulensis: Albedo=0.15; Emissivity=0.96; R50=200; Gsmax=0.005
          ComponentData grass: Albedo=0.23; Emissivity=0.96; R50=200; Gsmax=0
          ComponentData wheat: Albedo=0.26; Emissivity=0.96; R50=200; Gsmax=0.011
          ComponentData barley: Albedo=0.26; Emissivity=0.96; R50=200; Gsmax=0.011
          ComponentData canola: Albedo=0.26; Emissivity=0.96; R50=200; Gsmax=0.011
          ComponentData raphanus_raphanistrum: Albedo=0.26; Emissivity=0.96; R50=200; Gsmax=0.011
          ComponentData lolium_rigidum: Albedo=0.26; Emissivity=0.96; R50=200; Gsmax=0.011
          ComponentData chickpea: Albedo=0.26; Emissivity=0.96; R50=200; Gsmax=0.011
          ComponentData weed: Albedo=0.26; Emissivity=0.96; R50=200; Gsmax=0.011
          ComponentData oats: Albedo=0.26; Emissivity=0.96; R50=200; Gsmax=0.011
          ComponentData chickpea: Albedo=0.26; Emissivity=0.96; R50=200; Gsmax=0.011
          ComponentData fieldpea: Albedo=0.26; Emissivity=0.96; R50=200; Gsmax=0.011
          ComponentData sugar: Albedo=0.26; Emissivity=0.96; R50=200; Gsmax=0.011
          ComponentData potato: Albedo=0.15; Emissivity=0.96; R50=200; Gsmax=0
          ComponentData frenchbean: Albedo=0.26; Emissivity=0.96; R50=200; Gsmax=0.011
          ComponentData bambatsi: Albedo=0.23; Emissivity=0.96; R50=150; Gsmax=0.015
          ComponentData lucerne: Albedo=0.26; Emissivity=0.96; R50=200; Gsmax=0.011
          ComponentData maize: Albedo=0.26; Emissivity=0.96; R50=200; Gsmax=0.011
          ComponentData banksia: Albedo=0.15; Emissivity=0.96; R50=200; Gsmax=0.005
          ComponentData understorey: Albedo=0.26; Emissivity=0.96; R50=200; Gsmax=0.011
          ComponentData ryegrass: Albedo=0.23; Emissivity=0.96; R50=200; Gsmax=0
          ComponentData vine: Albedo=0.26; Emissivity=0.96; R50=200; Gsmax=0.011
          ComponentData saltbush: Albedo=0.15; Emissivity=0.96; R50=200; Gsmax=0.005
          ComponentData sorghum: Albedo=0.26; Emissivity=0.96; R50=200; Gsmax=0.011
          ComponentData danthonia: Albedo=0.23; Emissivity=0.96; R50=200; Gsmax=0
          ComponentData nativepasture: Albedo=0.15; Emissivity=0.96; R50=200; Gsmax=0
          ComponentData raphanus_raphanistrum: Albedo=0.26; Emissivity=0.96; R50=200; Gsmax=0.011
          ComponentData canola: Albedo=0.26; Emissivity=0.96; R50=200; Gsmax=0.011
          ComponentData kale2: Albedo=0.26; Emissivity=0.96; R50=200; Gsmax=0.011
          ComponentData Carrots4: Albedo=0.26; Emissivity=0.96; R50=200; Gsmax=0.011
          ComponentData crop: Albedo=0.26; Emissivity=0.96; R50=200; Gsmax=0.011
          ComponentData broccoli: Albedo=0.26; Emissivity=0.96; R50=200; Gsmax=0.011
          ComponentData tree: Albedo=0.15; Emissivity=0.96; R50=200; Gsmax=0.005
          ComponentData grandis: Albedo=0.15; Emissivity=0.96; R50=200; Gsmax=0.005
          ComponentData oilpalm: Albedo=0.15; Emissivity=0.96; R50=200; Gsmax=0.005
          ComponentData oilmallee: Albedo=0.15; Emissivity=0.96; R50=200; Gsmax=0.005
          ComponentData globulus: Albedo=0.15; Emissivity=0.96; R50=200; Gsmax=0.005
          ComponentData camaldulensis: Albedo=0.15; Emissivity=0.96; R50=200; Gsmax=0.005
          ComponentData grass: Albedo=0.23; Emissivity=0.96; R50=200; Gsmax=0
          ComponentData wheat: Albedo=0.26; Emissivity=0.96; R50=200; Gsmax=0.011
          ComponentData barley: Albedo=0.26; Emissivity=0.96; R50=200; Gsmax=0.011
          ComponentData canola: Albedo=0.26; Emissivity=0.96; R50=200; Gsmax=0.011
          ComponentData raphanus_raphanistrum: Albedo=0.26; Emissivity=0.96; R50=200; Gsmax=0.011
          ComponentData lolium_rigidum: Albedo=0.26; Emissivity=0.96; R50=200; Gsmax=0.011
          ComponentData chickpea: Albedo=0.26; Emissivity=0.96; R50=200; Gsmax=0.011
          ComponentData weed: Albedo=0.26; Emissivity=0.96; R50=200; Gsmax=0.011
          ComponentData oats: Albedo=0.26; Emissivity=0.96; R50=200; Gsmax=0.011
          ComponentData chickpea: Albedo=0.26; Emissivity=0.96; R50=200; Gsmax=0.011
          ComponentData fieldpea: Albedo=0.26; Emissivity=0.96; R50=200; Gsmax=0.011
          ComponentData sugar: Albedo=0.26; Emissivity=0.96; R50=200; Gsmax=0.011
          ComponentData potato: Albedo=0.15; Emissivity=0.96; R50=200; Gsmax=0
          ComponentData frenchbean: Albedo=0.26; Emissivity=0.96; R50=200; Gsmax=0.011
          ComponentData bambatsi: Albedo=0.23; Emissivity=0.96; R50=150; Gsmax=0.015
          ComponentData lucerne: Albedo=0.26; Emissivity=0.96; R50=200; Gsmax=0.011
          ComponentData maize: Albedo=0.26; Emissivity=0.96; R50=200; Gsmax=0.011
          ComponentData banksia: Albedo=0.15; Emissivity=0.96; R50=200; Gsmax=0.005
          ComponentData understorey: Albedo=0.26; Emissivity=0.96; R50=200; Gsmax=0.011
          ComponentData ryegrass: Albedo=0.23; Emissivity=0.96; R50=200; Gsmax=0
          ComponentData vine: Albedo=0.26; Emissivity=0.96; R50=200; Gsmax=0.011
          ComponentData saltbush: Albedo=0.15; Emissivity=0.96; R50=200; Gsmax=0.005
          ComponentData sorghum: Albedo=0.26; Emissivity=0.96; R50=200; Gsmax=0.011
          ComponentData danthonia: Albedo=0.23; Emissivity=0.96; R50=200; Gsmax=0
          ComponentData nativepasture: Albedo=0.15; Emissivity=0.96; R50=200; Gsmax=0
          ComponentData raphanus_raphanistrum: Albedo=0.26; Emissivity=0.96; R50=200; Gsmax=0.011
          ComponentData canola: Albedo=0.26; Emissivity=0.96; R50=200; Gsmax=0.011
          ComponentData kale2: Albedo=0.26; Emissivity=0.96; R50=200; Gsmax=0.011
          ComponentData Carrots4: Albedo=0.26; Emissivity=0.96; R50=200; Gsmax=0.011
        Plant Potato
          LocalCanopyData={sender=Potato, height=265.473, depth=265.473, lai=0, lai_tot=5.89321, cover=0, cover_tot=0.16205}
        Manager PotatoSowingRule
          RowSpace = 280
          RowWidth = 770
          PlantingDepth = 120
          StemNumberPerSeedTuber = 2.2
          CultivarName = RussetBurbank
          SowingDate = 2003-10-20
```csharp
        using System;
        using Models.Core;
        using Models.PMF;
        namespace Models
        {
           [Serializable] 
           [System.Xml.Serialization.XmlInclude(typeof(Model))]
            public class Script : Model
            {      
               [Link] Plant Plant;
               [Link] Clock Clock;

               [Description("Spacing (mm) between plants within rows")]
               public double RowSpace { get; set; }
               [Description("Spacing (mm) between rows")]
               public double RowWidth { get; set; }
               [Description("Depth (mm) tubers are planted")]
               public double PlantingDepth { get; set; }
               [Description("Number of stems per seed tuber")]
               public double StemNumberPerSeedTuber { get; set; }
               [Description("Cultivar")]
               public string CultivarName { get; set; }
               [Description("Sowing Date")]
               public DateTime SowingDate { get; set; }

               [EventSubscribe("StartOfDay")]
               private void OnStartOfDay(object sender, EventArgs e)
               {
				double PlantPopulation = 1/((RowWidth/1000)*(RowSpace/1000));

				if (Clock.Today.Date == SowingDate)
                    Plant.Sow(Population:PlantPopulation, Cultivar:CultivarName, Depth:PlantingDepth, BudNumber:StemNumberPerSeedTuber);
                //Plant.Sow(... Contains the following arguements:
                //Population  double  Required  Seeds sowing/m2
                //Cultivar    string  Required  "NameOfCultivar"
                //Depth       double  Optional  Depth (mm) seed sown.   Default is 100mm 
                //MaxCover    double  Optional  Proportion (0-1) of the ground row crop will cover.   Default is 1.0
                //BudNumber   double  Optional  Number of mainstems per seed sown.  Default is 1.0
                //RowSpacing  double  Optional  Spaceing (mm) between drill rows when crop is sown.  Default is 150mm
                //CropClass   string  Optional  Crop class to instantiate when crop is sown.  Default is "Plant"
			   }
            }
        }
```
        Operations
          2003-10-20  Fertiliser.Apply(100, Fertiliser.Types.UreaN, 0);
          2003-11-25  Fertiliser.Apply(69, Fertiliser.Types.UreaN,0);
          2003-11-26  Irrigation.Apply(15);
          2003-12-04  Irrigation.Apply(50);
          2003-12-16  Irrigation.Apply(15);
          2003-12-22  Irrigation.Apply(50);
          2003-12-30  Irrigation.Apply(50);
          2004-01-08  Irrigation.Apply(50);
          2004-01-21  Irrigation.Apply(50);
          2004-01-31  Irrigation.Apply(50);
          2004-02-27  Irrigation.Apply(25);
        Manager ExtraVariables
```csharp
using System;
using Models.Core;
using System.Collections.Generic;
using System.Text;
using Models.Soils;
using Models.PMF;
using Models;
using System.Xml.Serialization;
namespace Models
{
	[Serializable] 
	public class Script : Model
	{      
		[Link] Clock Clock;
		[Link] Soils.Soil Soil;
		[Link] Models.SurfaceOM.SurfaceOrganicMatter SOM;
		[Link] WeatherFile Met;   
		[Link] Fertiliser Fert;
		[Link] Irrigation Irrig;  
		[Link] Plant Plant;          
					
		[XmlIgnore] public bool InitialDay { get; set; }
		
		[XmlIgnore] public double AccumPlantN { get; set; }
		[XmlIgnore] public double AccumMineralisation { get; set; }
		[XmlIgnore] public double AccumDenit { get; set; }
		[XmlIgnore] public double AccumFert { get; set; }
		[XmlIgnore] public double AccumLeach { get; set; }
		[XmlIgnore] public double AccumDetach { get; set; }
		[XmlIgnore] public double DeltaSoilOMN { get; set; }
		[XmlIgnore] public double DeltaSurfaceOMN { get; set; }
		[XmlIgnore] public double DeltaSoilMineralN { get; set; }
		[XmlIgnore] public double SoilNitrogenContent { get; set; }
		
		[XmlIgnore] public double AccumEO { get; set; }
		[XmlIgnore] public double AccumEP { get; set; }
		[XmlIgnore] public double AccumES { get; set; }
		[XmlIgnore] public double AccumDrainage { get; set; }
		[XmlIgnore] public double AccumRunoff { get; set; }
		[XmlIgnore] public double AccumOutflowLat { get; set; }
		[XmlIgnore] public double AccumIrrigation { get; set; }
		[XmlIgnore] public double AccumRainfall { get; set; }
		[XmlIgnore] public double SoilWaterDeficit { get; set; }
		
		[XmlIgnore] public double AccumTtemerg { get; set; }
		
		[XmlIgnore] public double  InitialSoilOMN { get; set; }
		[XmlIgnore] public double  InitialSurfaceOMN { get; set; }
		[XmlIgnore] public double  InitialMineralN { get; set; }
		
		[XmlIgnore] public double SWC { get; set; }
		[XmlIgnore] public double DUL { get; set; }
		[XmlIgnore] public double OutFlowLat { get; set; }

		[XmlIgnore] public double FomN { get; set; }
		[XmlIgnore] public double BiomN { get; set; }
		[XmlIgnore] public double HumN { get; set; }
		[XmlIgnore] public double OrganicN { get; set; }
		[XmlIgnore] public double NO3N { get; set; }
		[XmlIgnore] public double NH4N { get; set; }
		[XmlIgnore] public double UreaN { get; set; }
		[XmlIgnore] public double MineralN { get; set; }
		[XmlIgnore] public double DltNMinRes { get; set; }
		[XmlIgnore] public double DltNMinTot { get; set; }
		
        public override void OnCommencing()
        {
			InitialDay = true;
		}	   
		
		[EventSubscribe("StartOfDay")]
		private void OnStartOfDay(object sender, EventArgs e)
		{
			//!!!!!! Nitrogen balance components !!!!!!
			//!!!!!!^^^^^^^^^^^^^^^^^^^^^^^^^^^^^!!!!!!
           	FomN = Utility.Math.Sum(Soil.SoilNitrogen.fom_n);
			HumN = Utility.Math.Sum(Soil.SoilNitrogen.hum_n);
		    BiomN = Utility.Math.Sum(Soil.SoilNitrogen.biom_n);
			OrganicN = FomN + HumN + BiomN;
			NO3N = Utility.Math.Sum(Soil.SoilNitrogen.no3);
			NH4N = Utility.Math.Sum(Soil.SoilNitrogen.nh4);
			UreaN = Utility.Math.Sum(Soil.SoilNitrogen.urea);
			MineralN = NO3N + NH4N + UreaN; 
			DltNMinRes = Utility.Math.Sum(Soil.SoilNitrogen.dlt_n_min_res);
			DltNMinTot = Utility.Math.Sum(Soil.SoilNitrogen.dlt_n_min);
            int layers = Soil.SoilWater.dlayer.Length;
			if (InitialDay == true)
			{
				InitialSurfaceOMN = SOM.surfaceom_n;
				InitialSoilOMN = OrganicN;
				InitialMineralN = MineralN;
				InitialDay = false;
			}
			AccumFert += Fert.NitrogenApplied;
			DeltaSurfaceOMN = SOM.surfaceom_n - InitialSurfaceOMN;
			AccumLeach = AccumLeach - Soil.SoilWater.LeachNH4 - Soil.SoilWater.LeachNO3 - Soil.SoilWater.LeachUrea; //Fails
            AccumMineralisation += Utility.Math.Sum(Soil.SoilNitrogen.dlt_n_min);
            AccumDenit -= Utility.Math.Sum(Soil.SoilNitrogen.dnit);
			AccumPlantN -= (double)this.Get("[Plant].Root.NUptake");
			DeltaSoilOMN = OrganicN - InitialSoilOMN;
			DeltaSoilMineralN = MineralN - InitialMineralN;
			SoilNitrogenContent = MineralN;
			
			//!!!!!! Water balance components !!!!!!
			//!!!!!!^^^^^^^^^^^^^^^^^^^^^^^^^^!!!!!!

			AccumIrrigation += Irrig.IrrigationApplied;
			AccumRainfall += Met.Rain;
			AccumEP -= (double)this.Get("[Plant].Leaf.Transpiration");
			SoilWaterDeficit =  (SWC - DUL);
			double OutFlowLat = Utility.Math.Sum(Soil.SoilWater.outflow_lat);
			AccumOutflowLat -= OutFlowLat;
			
			//!!!!!! Thermal time calculation !!!!!!
			//!!!!!! ^^^^^^^^^^^^^^^^^^^^^^^^ !!!!!!
			if (Plant.Phenology.StageCode.Value >= 3)
			AccumTtemerg += Plant.Phenology.ThermalTime.Value;
		}
		
		[EventSubscribe("EndOfDay")]
		private void OnEndOfDay(object sender, EventArgs e)
		{
			AccumEO -= Soil.SoilWater.eo;
			AccumES -= Soil.SoilWater.es; 
			AccumDrainage -= Soil.SoilWater.drain;
			AccumRunoff -= Soil.SoilWater.runoff;
			SWC = Utility.Math.Sum(Soil.SoilWater.sw_dep);
			DUL = Utility.Math.Sum(Soil.SoilWater.dul_dep);

		}
	}
}
```
        Report: Events=[Clock].EndOfDay; AutoCreateCSV=true
          Variables:
            [Clock].Today
            [ExtraVariables].Script.AccumTtemerg
            [Plant].Phenology.CurrentPhaseName
            [Plant].Phenology.StageCode.Value
            [ExtraVariables].Script.AccumPlantN
            [ExtraVariables].Script.AccumMineralisation
            [ExtraVariables].Script.AccumDenit
            [ExtraVariables].Script.AccumFert
            [ExtraVariables].Script.AccumLeach
            [ExtraVariables].Script.AccumDetach
            [ExtraVariables].Script.DeltaSoilOMN
            [ExtraVariables].Script.DeltaSurfaceOMN
            [ExtraVariables].Script.DeltaSoilMineralN
            [Plant].Root.NSupplyUptake
            [Soil].SoilWater.eo
            [Soil].SoilWater.es
            [ExtraVariables].Script.SWC
            [ExtraVariables].Script.DUL
            [Soil].SoilWater.drain
            [Soil].SoilWater.runoff
            [ExtraVariables].Script.OutFlowLat
            [Soil].SoilWater.pond
            [ExtraVariables].Script.AccumEO
            [ExtraVariables].Script.AccumEP
            [ExtraVariables].Script.AccumES
            [ExtraVariables].Script.AccumDrainage
            [ExtraVariables].Script.AccumRunoff
            [ExtraVariables].Script.AccumRainfall
            [ExtraVariables].Script.AccumIrrigation
            [ExtraVariables].Script.AccumOutflowLat
            [ExtraVariables].Script.SoilWaterDeficit
            [Plant].Summariser.AboveGround.Wt
            [Plant].Summariser.BelowGround.Wt
            [Plant].Summariser.Total.Wt
            [Plant].Summariser.TotalDead.Wt
            [Plant].Summariser.TotalLive.Wt
            [Plant].Leaf.Dead.Wt
            [Plant].Leaf.Live.Wt
            [Plant].Stem.Dead.Wt
            [Plant].Stem.Live.Wt
            [Plant].Tuber.Dead.Wt
            [Plant].Tuber.Live.Wt
            [Plant].Root.Dead.Wt
            [Plant].Root.Live.Wt
            [Plant].Summariser.AboveGround.N
            [Plant].Summariser.BelowGround.N
            [Plant].Summariser.Total.N
            [Plant].Summariser.TotalLive.N
            [Plant].Summariser.TotalDead.N
            [Plant].Leaf.Dead.N
            [Plant].Leaf.Live.N
            [Plant].Stem.Dead.N
            [Plant].Stem.Live.N
            [Plant].Tuber.Dead.N
            [Plant].Tuber.Live.N
            [Plant].Root.Live.N
            [Plant].Root.Dead.N
            [Plant].Leaf.Live.NConc
            [Plant].Leaf.Dead.NConc
            [Plant].Stem.Live.NConc
            [Plant].Stem.Dead.NConc
            [Plant].Tuber.Live.NConc
            [Plant].Tuber.Dead.NConc
            [Plant].Root.Live.NConc
            [Plant].Root.Dead.NConc
            [Plant].Root.WaterSupply
            [Plant].Root.WaterUptake
            [Plant].Leaf.Transpiration
            [Plant].Leaf.WaterDemand
            [Plant].Root.Depth
            [Plant].Leaf.CoverGreen
            [Plant].Leaf.CoverTotal
            [Plant].Leaf.CoverDead
            [Plant].Leaf.LAI
            [Plant].Leaf.LAIDead
            [Plant].Structure.Height
            [Plant].Leaf.Fn
            [Plant].Leaf.Fw
            [Plant].Leaf.Photosynthesis.FT.Value
            [Plant].Leaf.Photosynthesis.FVPD.Value
            [Plant].Structure.PlantTotalNodeNo
            [Plant].Structure.TotalStemPopn
            [Plant].Leaf.PlantAppearedGreenLeafNo
            [Plant].Leaf.ExpandingCohortNo
            [Plant].Leaf.AppearedCohortNo
            [Plant].Leaf.DeadCohortNo
            [Plant].Structure.MainStemNodeNo
            [Plant].Leaf.SenescingCohortNo
            [Plant].Structure.PrimaryBudTotalNodeNo
            [Plant].Leaf.LeafCohortParameters.MinimumNConc.Value
            [Plant].Stem.MinimumNConc.Value
            [Plant].Tuber.MinimumNConc.Value
            [Plant].Root.MinimumNConc.Value
            [Plant].Leaf.LeafCohortParameters.MaximumNConc.Value
            [Plant].Stem.MaximumNConc.Value
            [Plant].Tuber.MaximumNConc.Value
            [Plant].Root.MaximumNConc.Value
            [Plant].Stem.Live.StructuralWt
            [Plant].Stem.Live.NonStructuralWt
            [Plant].Leaf.SpecificArea
            [Plant].Leaf.ExpandedCohortNo
            [Soil].SoilWater.sw_dep
            [Soil].SoilNitrogen.no3
            [ExtraVariables].Script.SoilNitrogenContent
            [Plant].Arbitrator.NDemand
            [MicroClimate].ga
            [MicroClimate].gc
            [MicroClimate].net_radn
            [MicroClimate].dryleaffraction
            [MicroClimate].peta
            [MicroClimate].petr
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