Simulations: Version=58
  DataStore
    PredictedObserved: PredictedTableName=Report; ObservedTableName=Observed; FieldNameUsedForMatch=Clock.Today
    ExcelInput Observed: FileName=Observed.xlsx; SheetNames=[Observed]
  Experiment ABlock_Residues
    Memo
      This experiment was conducted in Plant and Food Researches A Block field near Lincoln, New Zealand.  A uniformly managed, unirrigated barley crop was grown and harvested prior to the estastablishment of this experiment.  A randomised complete block was layed out with 5 x 15 m plots laid out to avoid harvester wheel tracks with 4 replicates of 4 treatments:

       - <b>StandingStubble</b> where the stubble that was left by the combine harvester remained standing and any residue that
       - <b>HarvesterWindrow</b> where the residue mown from the other two treatments was piled ontop of the standing stubble to simulate a harvester windrow with the residue from approximately 2 times the area applied
       - <b>MownStubble</b> where stubble was mown at 5cm height and removed from the plots
       - <b>BareSoil</b> where stubble was mown and removed and then plots were ploughed and cultivated to leave a bare soil.

      Following the establishment of treatments CS616 soil moisture sensors were installed in each plot at 0-20, 20-40 and 40-60 cm depth and logged at 1 hourly intervals from establishment in Autumn through until the following spring.
    Factors
      Factor Cover: Specification=[SurfaceOrganicMatter]
        SurfaceOrganicMatter StandingStubble: InitialResidueName=Barley; InitialResidueType=Barley; InitialResidueMass=2026; InitialStandingFraction=1; InitialCPR=0; InitialCNR=80; FractionFaecesAdded=0.5
        SurfaceOrganicMatter HarvesterWindrow: InitialResidueName=Barley; InitialResidueType=Barley; InitialResidueMass=8300; InitialStandingFraction=0; InitialCPR=0; InitialCNR=80; FractionFaecesAdded=0.5
        SurfaceOrganicMatter MownStubble: InitialResidueName=Barley; InitialResidueType=Barley; InitialResidueMass=400; InitialStandingFraction=1; InitialCPR=0; InitialCNR=80; FractionFaecesAdded=0.5
        SurfaceOrganicMatter BareSoil: InitialResidueName=Barley; InitialResidueType=Barley; InitialResidueMass=0; InitialStandingFraction=1; InitialCPR=0; InitialCNR=80; FractionFaecesAdded=0.5
    Simulation Base
      Weather: FileName=..\..\WeatherFiles\lincoln.met
      Clock: StartDate=2010-02-25; EndDate=2010-08-11
      Summary
      Zone Field: Area=1; Slope=0
        Soil: SoilType=Sedementary; LocalName=Lincoln; Latitude=0; Longitude=0
          Water
            Thickness  BD    AirDry  LL15   DUL   SAT    KS
            200        1.3   0.06    0.08   0.27  0.31   999
            200        1.3   0.124   0.124  0.25  0.358  300
            200        1.3   0.106   0.106  0.27  0.4    100
            200        1.52  0.07    0.07   0.2   0.314  90
            200        1.52  0.07    0.07   0.2   0.314  90
            200        1.52  0.165   0.165  0.3   0.358  90
            200        1.65  0.157   0.157  0.29  0.35   90
            200        1.65  0.125   0.125  0.25  0.318  90
            200        1.65  0.125   0.125  0.25  0.318  90
            200        1.65  0.125   0.125  0.25  0.318  90
            200        1.65  0.125   0.125  0.25  0.318  90
            200        1.65  0.125   0.125  0.25  0.318  90
            200        1.65  0.125   0.125  0.25  0.318  90
            200        1.65  0.125   0.125  0.25  0.318  90
            200        1.6   0.125   0.125  0.25  0.318  90
          SoilWater: SummerDate=1-Nov; SummerU=9; SummerCona=4.4; WinterDate=1-Apr; WinterU=9; WinterCona=4.4; DiffusConst=88; DiffusSlope=35; Salb=0.13; CN2Bare=73; CNRed=20; CNCov=0.8; slope=0; discharge_width=0; catchment_area=0; max_pond=0; ResidueInterception=0
            Thickness  SWCON  KLAT
            200        0.3    0
            200        0.6    0
            200        0.6    0
            200        0.6    0
            200        0.95   0
            200        0.95   0
            200        0.95   0
            200        0.95   0
            200        0.95   0
            200        0.95   0
            200        0.95   0
            200        0.95   0
            200        0.95   0
            200        0.95   0
            200        0.95   0
          SoilOrganicMatter: RootCN=40; EnrACoeff=7.4; EnrBCoeff=0.2; OCUnits=Total
            Thickness  OC    SoilCN  FBiom  FInert  RootWt
            200        2.63  11      0.03   0.4     190.767
            200        1.25  11      0.02   0.7     156.187
            200        0.32  11      0.01   0.8     127.875
            200        0.21  11      0.01   0.9     104.695
            200        0.2   11      0.01   1       85.7171
            200        0.2   11      0.01   1       70.1792
            200        0.2   11      0.01   1       57.4579
            200        0.2   11      0.01   1       47.0426
            200        0.2   11      0.01   1       38.5152
            200        0.2   11      0.01   1       31.5336
            200        0.2   11      0.01   1       25.8175
            200        0.2   11      0.01   1       21.1376
            200        0.2   11      0.01   1       17.306
            200        0.2   11      0.01   1       14.1689
            200        0.2   11      0.01   1       11.6006
          Analysis: PH=[6, 6, 6, 6, 6, 6, 6, 6, 6, 6, 6, 6, 6, 6, 6]; PHUnits=Water; BoronUnits=0
            Thickness=[200, 200, 200, 200, 200, 200, 200, 200, 200, 200, 200, 200, 200, 200, 200]
          Sample InitialN: NO3Units=kg/ha; NH4Units=kg/ha; SWUnits=Volumetric; OCUnits=Total; PHUnits=Water
            Thickness  NO3      NH4    SW
            200        115.556  0.26   0.253
            200        77.0371  0.26   0.175
            200        57.7778  0.26   0.15
            200        33.7778  0.304  0.1
            200        33.7778  0.304  0.13
            200        0        0.304  0.25
            200        0        0.33   0.29
            200        0        0.33   0.25
            200        0.33     0.33   0.25
            200        0.33     0.33   0.25
            200        0.33     0.33   0.25
            200        0.33     0.33   0.25
            200        0.33     0.33   0.25
            200        0.33     0.33   0.25
            200        0.32     0.32   0.25
          CERESSoilTemperature
          Nutrient
            DirectedGraphInfo={Nodes=[{Name=Inert, OutlineColour=Black}, {Name=SurfaceResidue, OutlineColour=Black}, {Name=FOMLignin, OutlineColour=Black}, {Name=FOMCellulose, OutlineColour=Black}, {Name=FOMCarbohydrate, OutlineColour=Black}, {Name=Microbial, OutlineColour=Black}, {Name=Humic, OutlineColour=Black}, {Name=Urea, OutlineColour=Black}, {Name=NO3, OutlineColour=Black}, {Name=NH4, OutlineColour=Black}, {Name=Atmosphere, OutlineColour=255, 255, 255}, {Name=PlantAvailableNO3, OutlineColour=Black}, {Name=PlantAvailableNH4, OutlineColour=Black}], Arcs=[{SourceName=SurfaceResidue, DestinationName=Microbial}, {SourceName=SurfaceResidue, DestinationName=Humic}, {SourceName=FOMLignin, DestinationName=Microbial}, {SourceName=FOMLignin, DestinationName=Humic}, {SourceName=FOMCellulose, DestinationName=Microbial}, {SourceName=FOMCellulose, DestinationName=Humic}, {SourceName=FOMCarbohydrate, DestinationName=Microbial}, {SourceName=FOMCarbohydrate, DestinationName=Humic}, {SourceName=Microbial, DestinationName=Microbial}, {SourceName=Microbial, DestinationName=Humic}, {SourceName=Humic, DestinationName=Microbial}, {SourceName=Urea, DestinationName=NH4}, {SourceName=NO3, DestinationName=Atmosphere}, {SourceName=NH4, DestinationName=NO3}]}
        Irrigation
        Fertiliser
        SurfaceOrganicMatter: InitialResidueName=Barley; InitialResidueType=Barley; InitialResidueMass=2026; InitialStandingFraction=1; InitialCPR=0; InitialCNR=80; FractionFaecesAdded=0.5
        MicroClimate: a_interception=0; b_interception=1; c_interception=0; d_interception=0; soil_albedo=0.3; SoilHeatFluxFraction=0.4; NightInterceptionFraction=0.5; ReferenceHeight=2
        Report
          VariableNames:
            [Clock].Today
            [SurfaceOrganicMatter].Cover
            [SurfaceOrganicMatter].Wt
            [Soil].SoilWater.SWmm
            [Weather].Rain
            [Soil].Thickness
            [Soil].SoilWater.Es
            [Irrigation].IrrigationApplied
            [Soil].SoilWater.SW
            [Soil].SoilWater.Runoff
            [Soil].SoilWater.Infiltration
            [Soil].SoilWater.Drainage
            [Soil].LL15
            [Soil].DUL
            [Soil].LL15mm
            [Soil].DULmm
            sum([Soil].SoilWater.SWmm[1:3] as ProfileWater
            [ExtraVariables].Script.SWDep60
            [ExtraVariables].Script.FomN
            [ExtraVariables].Script.HumN
            [ExtraVariables].Script.BiomN
            [ExtraVariables].Script.DltNMinRes
            [ExtraVariables].Script.DltNMinTot
            [ExtraVariables].Script.AccumPlantN
            [ExtraVariables].Script.AccumMineralisation
            [ExtraVariables].Script.AccumDenit
            [ExtraVariables].Script.AccumFert
            [ExtraVariables].Script.AccumLeach
            [ExtraVariables].Script.AccumDetach
            [ExtraVariables].Script.DeltaSoilOMN
            [ExtraVariables].Script.DeltaSurfaceOMN
            [ExtraVariables].Script.DeltaSoilMineralN
            [ExtraVariables].Script.AccumEO
            [ExtraVariables].Script.AccumEP
            [ExtraVariables].Script.AccumES
            [ExtraVariables].Script.AccumDrainage
            [ExtraVariables].Script.AccumRunoff
            [ExtraVariables].Script.AccumRainfall
            [ExtraVariables].Script.AccumIrrigation
            [ExtraVariables].Script.AccumOutflowLat
            [ExtraVariables].Script.SoilWaterDeficit
            [Soil].SoilNitrogen.Denitrification
            [ExtraVariables].Script.MineralN
            [Soil].SoilNitrogen.NO3.kgha
            [Soil].SoilNitrogen.NH4.kgha
            [Soil].SoilNitrogen.Urea.kgha
          EventNames:
            [Clock].DoReport
        Operations
          2010-03-05  [Irrigation].Apply(26.6);
          2010-03-08  [Irrigation].Apply(30.4);
          2010-03-09  [Irrigation].Apply(100);
          2010-03-12  [Irrigation].Apply(10);
        Manager ResiduePrecipitationInterception
```csharp
using System;
using Models.Core;
using System.Collections.Generic;
using System.Text;
using Models.Soils;
using Models;
using System.Xml.Serialization;
using APSIM.Shared.Utilities;

namespace Models
{
    [Serializable] 
    public class Script : Model
    {
        [Link] Clock Clock;
        [Link] Soils.Soil Soil;
        [Link] Models.Surface.SurfaceOrganicMatter SOM;
        [Link] Weather Met;
        [Link] Irrigation Irrig;
               
        [XmlIgnore] public bool InitialDay { get; set; }

        [XmlIgnore] public double Precip { get; set; }
        [XmlIgnore] public double Maximum_interception { get; set; }
        [XmlIgnore] public double Residue_water { get; set; }
        [XmlIgnore] public double Interception_today { get; set; }
        [XmlIgnore] public double Evaporated_interception { get; set; }
        [XmlIgnore] public double SWC60 { get; set; }

        [EventSubscribe("Initialised")]
        private void OnInitialised(object sender, EventArgs e)
        {
            Precip = 0;
            Maximum_interception = 0;
            Residue_water = 0;
            Interception_today = 0;
            Evaporated_interception = 0;
            SWC60 = 0;
        }

        [EventSubscribe("DoManagementCalculations")]
        private void OnDoManagementCalculations(object sender, EventArgs e)
        {
//calculate the amount of water that is going to evaporate from the residue water pool

            if (Residue_water > Soil.SoilWater.Eo)
                Evaporated_interception = Soil.SoilWater.Eo;
            else
                Evaporated_interception = Residue_water;

            SWC60 = Soil.SoilWater.SWmm[0] + Soil.SoilWater.SWmm[1] + Soil.SoilWater.SWmm[2];

// remove evaporation from residue water pool               

            Residue_water = Residue_water - Evaporated_interception;
        }

        [EventSubscribe("DoManagement")]
        private void OnDoManagement(object sender, EventArgs e)
        {
//Set interception variables
            Precip = Met.Rain + Irrig.IrrigationApplied; 
            Maximum_interception = 0.0002 * SOM.Wt;
          
//Determine the amount of water intercepted by residue today
            if ((Precip * SOM.Cover) >= (Maximum_interception - Residue_water))
                Interception_today = (Maximum_interception - Residue_water);
            else
                Interception_today = (Precip * SOM.Cover);

// Send message to soil module to take interception out of water balance
    
            Soil.SoilWater.ResidueInterception = Interception_today;
            
//Add intercepted water into residual water pool

            Residue_water = Residue_water + Interception_today;



            

        }
    }
}
```
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