Simulations Standard toolbox: Area=0
  Tests:
    SimulationName  TableName  Type            ColumnNames  Parameters
    simulation      Report     EqualTo         column       value
    simulation      Report     LessThan        column       value
    simulation      Report     GreaterThan     column       value
    simulation      Report     AllPos          column       -
    simulation      Report     Between         column       value1,value2
    simulation      Report     Mean            column       5,value
    simulation      Report     Tolerance       column       1,5
    simulation      Report     CompareToInput  column       1,5
  Experiment={Simulation={Name=Base, Clock={Name=Clock, StartDate=1940-01-01, EndDate=1989-12-31}, Summary={Name=Summary}}}
  Folder Structural
  Folder Standard models: Area=0
    Weather: FileName=Goondiwindi.met
    Clock: StartDate=1940-01-01; EndDate=1989-12-31
    Summary
    Report: EventNames=[Clock].EndOfDay
      VariableNames:
        [Clock].Today
        [Weather].MaxT
        [Weather].MinT
        [Weather].Radn
        [Weather].Rain
    Fertiliser
      Definitions:
        Name     FractionNO3  FractionNH4  FractionUrea
        Urea     0            0            0.46
        DAP      0            0.18         0
        MAP      0            0.11         0
        UreaN    0            0            1
        NO3N     1            0            0
        NH4N     0            1            0
        NH4NO3N  0.5          0.5          0
        NH4SO4N  0            1            0
    Irrigation
    Operations
    Soil: SoilType=Black Vertosol; LocalName=Waco; Site=Jimbour; NearestTown=Jimbour, Q 4352; Region=South East Queensland; NaturalVegetation=Grassland, mainly Qld bluegrass; Latitude=0; Longitude=0
      Water
        Thickness  BD    AirDry  LL15  DUL   SAT
        150        1.02  0.15    0.29  0.54  0.59
        150        1.03  0.26    0.29  0.53  0.58
        300        1.02  0.29    0.29  0.54  0.59
        300        1.02  0.29    0.29  0.54  0.58
        300        1.06  0.3     0.3   0.52  0.57
        300        1.11  0.31    0.31  0.5   0.55
        300        1.12  0.32    0.32  0.5   0.55
        300        1.15  0.33    0.33  0.48  0.53
        300        1.18  0.34    0.34  0.47  0.52
        300        1.2   0.35    0.35  0.46  0.51
        300        1.25  0.36    0.36  0.44  0.49
        SoilCrop WheatSoil
          LL=[0.29, 0.29, 0.32, 0.38, 0.39, 0.39, 0.41, 0.48, 0.47, 0.46, 0.44]
          KL=[0.1, 0.1, 0.08, 0.06, 0.04, 0.02, 0.01, 0, 0, 0, 0]
          XF=[1, 1, 1, 1, 1, 1, 1, 0, 0, 0, 0]
        SoilCropOilPalm OilPalm: XF=[1, 1, 1, 1, 1, 1, 1, 1, 1, 0, 0, 0]
          KL=[0.06, 0.04, 0.03, 0.02, 0.02, 0.02, 0.01, 0.01, 0.01, 0, 0, 0]
      SoilWater: min_crit_temp=5; max_crit_temp=35; max_albedo=0.23; A_to_evap_fact=0.44; canopy_eos_coef=1.7; sw_top_crit=0.9; sumes1_max=100; sumes2_max=25; solute_flow_eff=[1]; solute_flux_eff=[1]; gravity_gradient=2E-05; specific_bd=2.65; hydrol_effective_depth=450; immobile_solutes=[NH4]; canopy_fact=[1, 1, 0, 0]; canopy_fact_height=[0, 600, 1800, 30000]; canopy_fact_default=0.5; act_evap_method=ritchie; irrigation_will_runoff=0; irrigation_layer=0; SummerCona=3.5; SummerU=6; SummerDate=1-Nov; WinterCona=3.5; WinterU=6; WinterDate=1-Apr; DiffusConst=40; DiffusSlope=16; Salb=0.13; max_pond=0; CN2Bare=73; CNRed=20; CNCov=0.8; Thickness=[150, 150, 300, 300, 300, 300, 300, 300, 300, 300, 300]; SWCON=[0.3, 0.3, 0.3, 0.3, 0.3, 0.3, 0.3, 0.3, 0.3, 0.3, 0.3]
        mobile_solutes=[NO3, urea, cl, br, org_n, org_c_pool1, org_c_pool2, org_c_pool3]
      SoilNitrogen
      SoilOrganicMatter: RootCN=40; RootWt=200; SoilCN=12.5; EnrACoeff=7.4; EnrBCoeff=0.2; OCUnits=Total
        Thickness  OC    FBiom  FInert
        150        1.04  0.025  0.4
        150        0.89  0.02   0.6
        300        0.89  0.015  0.8
        300        0.89  0.01   0.9
        300        0.77  0.01   0.95
        300        0.45  0.01   0.95
        300        0.27  0.01   0.95
        300        0.22  0.01   0.95
        300        0.16  0.01   0.95
        300        0.13  0.01   0.95
        300        0.12  0.01   0.95
      Analysis: PHUnits=Water; BoronUnits=HotWater
        Thickness  EC    PH
        150        0.2   8.4
        150        0.25  8.8
        300        0.31  9
        300        0.4   9.2
        300        0.59  9.2
        300        0.84  9.1
        300        0.93  9
        300        1.01  9
        300        1.06  8.9
        300        1.05  8.9
        300        1.01  8.9
      InitialWater Initial water: FractionFull=1; PercentMethod=FilledFromTop
      Sample: NO3Units=ppm; NH4Units=ppm; SWUnits=Volumetric; OCUnits=Total; PHUnits=Water
        Thickness  NO3    NH4
        150        6.503  0.599004
        150        2.101  0.100001
        300        2.101  0.100001
        300        1.701  0.100001
        300        1.701  0.100001
        300        1.701  0.100001
        300        1.701  0.100001
        300        1.701  0.100001
        300        1.701  0.100001
        300        1.701  0.100001
        300        1.701  0.100001
    SurfaceOrganicMatter: PoolName=wheat; type=wheat; mass=1000; standing_fraction=0; cnr=80
      ResidueTypes:
        {Name=wheat, fraction_C=0.08, po4ppm=10, nh4ppm=10, no3ppm=10, specific_area=0.0001, cf_contrib=1, pot_decomp_rate=0.1, fr_c=[0.3, 0.3, 0.4], fr_n=[0.3, 0.3, 0.4], fr_p=[0.3, 0.3, 0.4]}
    MicroClimate
  Folder Agroforestry
  Folder Crops
    Plant15 Wheat: AutoHarvest=true; CropType=Wheat
    OilPalm
    Plant Potato: CropType=Potato
    Slurp: CropType=Slurp; localLAIGreen=5; localLAItot=5; localLightExtinction=0.6; localCanopyHeight=500; localCanopyDepth=500; localMaximumStomatalConductance=0.011; localFrgr=1; localDemandWater=10; localDemandNitrogen=5; localKNO3=0.1; localKNH4=0; localRootDepth=500; localSurfaceRootLengthDensity=0.05
    AgPasture: alt_N_uptake=no; SwardName=AgPasture; NumSpecies=1; WaterUptakeSource=calc; SpeciesName=[Ryegrass]; SpeciesNType=[grass]; SpeciesCType=[C3]; InitialDMShoot=[2000]; InitialDMRoot=[500]; MinimumGreenWt=[300]; InitialRootDepth=[750]; ExpoLinearDepthParam=0.1; ExpoLinearCurveParam=3
    Folder Wheat cultivars
      Folder Yield Prophet cultivars
        Cultivar Early
          Alias=[agtscythe, arrino, bonnie_rock, bowerbird, crusader, dart, drysdale, emurock, hunter, hybrid_mercury, hyperno, imposeclplus, kalka, kirchauff, kukri, livingston, mace, ouyen, perengori, ruby, tamaroi, wyalkatchem, young]
          Command:
            [Phenology].Vernalisation.VernSens = 2.3
            [Phenology].Vernalisation.PhotopSens = 3.2
        Cultivar EarlyMid
          Alias=[annuello, barunga, carnamah, catalina, clf_stiletto, cobra, corack, correll, diamondbird, estoc, frame, gladius, goroke, grenadeclplus, guardian, halbred, hartog, impala, justica, kord, merlin, mitre, pugsley, shield, spitfire, stiletto, sunguard, sunstate, ventura, yallaroi, yawa, yitpi]
          Command:
            [Phenology].Vernalisation.VernSens = 1.5
            [Phenology].Vernalisation.PhotopSens = 3.0
        Cultivar VeryEarly
          Alias=[h45, h46, saintly, silverstar, tamarinrock, waagan, westonia, wollaroi, zippy]
          Command:
            [Phenology].Vernalisation.VernSens = 1.5
            [Phenology].Vernalisation.PhotopSens = 1.5
        Cultivar Mid
          Alias=[arrivato, babbler, barham, baxter, buckley, camm, carinya, clf-jnz, derrimut, dollarbird, elmoreclplus, justicaclplus, saphire, wallup]
          Command:
            [Phenology].Vernalisation.VernSens = 1.5
            [Phenology].Vernalisation.PhotopSens = 3.5
        Cultivar MidPlus: Alias=[bellaroi, lang, caparoi, suntop]
          Command:
            [Phenology].Vernalisation.VernSens = 2.0
            [Phenology].Vernalisation.PhotopSens = 3.5
        Cultivar MidLate
          Alias=[braewood, calingiri, chara, endure, envoy, gauntlet, gazelle, giles, magenta, phantom, sentinel, sunlin, sunvale, wylie]
          Command:
            [Phenology].Vernalisation.VernSens = 2.8
            [Phenology].Vernalisation.PhotopSens = 3.0
        Cultivar Late: Alias=[beaufont, bolac, forrest, kelallac, preston, strzelecki]
          Command:
            [Phenology].Vernalisation.VernSens = 2.5
            [Phenology].Vernalisation.PhotopSens = 4.0
        Cultivar WinterWheat: Alias=[lorikeet, wylah, rosella, whistler, wedgetail]
          Command:
            [Phenology].Vernalisation.VernSens = 3.9
            [Phenology].Vernalisation.PhotopSens = 3.9
            [Phenology].FloralInitiationToFlowering.Target.value = 380
        Cultivar Axe: Alias=axe
          Command:
            [Phenology].Vernalisation.VernSens = 2.0
            [Phenology].Vernalisation.PhotopSens = 3.0
        Cultivar Scout: Alias=[scout, l]
          Command:
            [Phenology].Vernalisation.VernSens = 1.8
            [Phenology].Vernalisation.PhotopSens = 3.5
            [Phenology].StartGrainFillToEndGrainFill.Target.value = 550
        Cultivar Lincoln: Alias=lincoln
          Command:
            [Phenology].Vernalisation.VernSens = 1.8
            [Phenology].Vernalisation.PhotopSens = 3.5
        Cultivar GregoryLancer: Alias=[gregory, lancer]
          Command:
            [Phenology].Vernalisation.VernSens = 2.7
            [Phenology].Vernalisation.PhotopSens = 3.2
        Cultivar Eaglehawk: Alias=eaglehawk
          Command:
            [Phenology].Vernalisation.VernSens = 2.5
            [Phenology].Vernalisation.PhotopSens = 2.5
            [Phenology].EndOfJuvenileToFloralInitiation.Target.value = 500
            [Phenology].FloralInitiationToFlowering.Target.value = 655
            [Phenology].FloweringToStartGrainFill.Target.value = 250
            [Phenology].StartGrainFillToEndGrainFill.Target.value = 500
        Cultivar Marombi: Alias=[marombi, -]
          Command:
            [Phenology].Vernalisation.VernSens = 3.9
            [Phenology].Vernalisation.PhotopSens = 4.0
            [Phenology].FloralInitiationToFlowering.Target.value = 455
    Folder OilPalm cultivars
      Cultivar Dami
        Command:
          [FrondMaxArea].XYPairs.X = 0,2,4.5,8.5,14
          [FrondMaxArea].XYPairs.Y = 0.1,1,7,12,14
      Cultivar SuperFamily
        Command:
          [FrondMaxArea].XYPairs.X = 0,2,4.5,8.5,14
          [FrondMaxArea].XYPairs.Y = 0.1,0.9,0.63,10.8,12.6
  Folder Data store and analysis models: TimeSeriesStats={TableName=PredictedObserved}
    Input
    Probability: Exceedence=true
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